// COMSOL Multiphysics 6.0.0.318 model "System.mph"
// Outline of the model tree
// Components: comp "Component ", comp1 "Component 1"
// Unit system: none

Parameters
  Ke = 1000000000
  KH = 1000000000
  Kr = 1000000000
  Kdisp = 1000000000
  KqH = 2000
  Ks = 2
  Kd = 0.05
  Kc = 1
  Kp = 0.001
  KrD = 1000000000
  Kph = 1E-05
  Q_mass = 108
  DH_mass = 59
  QHD_mass = 167
  QHH_mass = 110
  prod_mass = 58
  Qm_mass = 108
  DHp_mass = 59
  QH_mass = 109
  D_mass = 58
  QD_mass = 166

Functions
  gp1: GaussianPulse [comp] | funcname = light; location = 0.5; sigma = 0.01; normalization = peak; peakvalue = 1e-4
  gp2: GaussianPulse [comp1] | funcname = light; location = 0.5; sigma = 0.1; normalization = peak; peakvalue = 1e-4

Geometry
  geom1 "Geometry 1(1D)" [comp1] (1D, length unit m)
    i1: Interval | coord = 0, 1
    fin: Finalize "Form Union"

Physics
  reaction: ReactionEng "Reaction Engineering" [comp]
    reactor.Vr = 1
    energybalance.T = 1
    mixture.mixture = liquid
    calcTransport.dynamicViscositySel = UserDefined
    simpropChem.sSequenceNo = 13
    ActiveSpecies.SumActiveSpecies = 10
    ActiveSpecies.NumActiveVolumeSpecies = 10
    SimpropMass.Species = {Q, DH, Qm, DHp, QH, D, QHD, QHH, prod, QD}
    SimpropMass.SpeciesInputType = {Variable, Variable, Variable, Variable, Variable, Variable, Variable, Variable, Variable, Variable}
    SimpropMass.Notes = {reaction.R_Q, reaction.R_DH, reaction.R_Qm, reaction.R_DHp, reaction.R_QH, reaction.R_D, reaction.R_QHD, reaction.R_QHH, reaction.R_prod, reaction.R_QD}
    inits1: SpeciesInitialValue "Initial Values"
      VolumetricSpecies = {D, DH, DHp, Q, QD, QH, QHD, QHH, Qm, prod}
      initialValue = {0, 1, 0, 1, 0, 0, 0, 0, 0, 0}
      F0 = {0, 0, 0, 0, 0, 0, 0, 0, 0, 0}
    Q: SpeciesChem "Species: Q"
      sisDef = 1
      sSequenceNo = 4
      SpeciesSource = Reaction
      specLabel = Q
      h = R_const*((reaction.T<=reaction.Tlo_Q)*(reaction.aLo6_Q+reaction.Tlo_Q*(reaction.aLo1_Q+0.5*reaction.Tlo_Q*(reaction.aLo2_Q+2*reaction.Tlo_Q*(reaction.aLo3_Q+0.75*reaction.Tlo_Q*(reaction.aLo4_Q+0.8*reaction.Tlo_Q*reaction.aLo5_Q))/3)))+(reaction.T>reaction.Tlo_Q)*(reaction.T<=reaction.Tmid_Q)*(reaction.aLo6_Q+reaction.T*(reaction.aLo1_Q+0.5*reaction.T*(reaction.aLo2_Q+2*reaction.T*(reaction.aLo3_Q+0.75*reaction.T*(reaction.aLo4_Q+0.8*reaction.T*reaction.aLo5_Q))/3)))+(reaction.T>reaction.Tmid_Q)*(reaction.T<=reaction.Thi_Q)*(reaction.aHi6_Q+reaction.T*(reaction.aHi1_Q+0.5*reaction.T*(reaction.aHi2_Q+2*reaction.T*(reaction.aHi3_Q+0.75*reaction.T*(reaction.aHi4_Q+0.8*reaction.T*reaction.aHi5_Q))/3)))+(reaction.T>reaction.Thi_Q)*(reaction.aHi6_Q+reaction.Thi_Q*(reaction.aHi1_Q+0.5*reaction.Thi_Q*(reaction.aHi2_Q+2*reaction.Thi_Q*(reaction.aHi3_Q+0.75*reaction.Thi_Q*(reaction.aHi4_Q+0.8*reaction.Thi_Q*reaction.aHi5_Q))/3))))
      s = R_const*((reaction.T<=reaction.Tlo_Q)*(reaction.aLo7_Q+reaction.aLo1_Q*log(reaction.T/1[K])+reaction.Tlo_Q*(reaction.aLo2_Q+0.5*reaction.Tlo_Q*(reaction.aLo3_Q+2*reaction.Tlo_Q*(reaction.aLo4_Q+0.75*reaction.Tlo_Q*reaction.aLo5_Q)/3)))+(reaction.T>reaction.Tlo_Q)*(reaction.T<=reaction.Tmid_Q)*(reaction.aLo7_Q+reaction.aLo1_Q*log(reaction.T/1[K])+reaction.T*(reaction.aLo2_Q+0.5*reaction.T*(reaction.aLo3_Q+2*reaction.T*(reaction.aLo4_Q+0.75*reaction.T*reaction.aLo5_Q)/3)))+(reaction.T>reaction.Tmid_Q)*(reaction.T<=reaction.Thi_Q)*(reaction.aHi7_Q+reaction.aHi1_Q*log(reaction.T/1[K])+reaction.T*(reaction.aHi2_Q+0.5*reaction.T*(reaction.aHi3_Q+2*reaction.T*(reaction.aHi4_Q+0.75*reaction.T*reaction.aHi5_Q)/3)))+(reaction.T>reaction.Thi_Q)*(reaction.aHi7_Q+reaction.aHi1_Q*log(reaction.T/1[K])+reaction.Thi_Q*(reaction.aHi2_Q+0.5*reaction.Thi_Q*(reaction.aHi3_Q+2*reaction.Thi_Q*(reaction.aHi4_Q+0.75*reaction.Thi_Q*reaction.aHi5_Q)/3))))
      Cp = R_const*((reaction.T<=reaction.Tlo_Q)*(reaction.aLo1_Q+reaction.Tlo_Q*(reaction.aLo2_Q+reaction.Tlo_Q*(reaction.aLo3_Q+reaction.Tlo_Q*(reaction.aLo4_Q+reaction.Tlo_Q*reaction.aLo5_Q))))+(reaction.T>reaction.Tlo_Q)*(reaction.T<=reaction.Tmid_Q)*(reaction.aLo1_Q+reaction.T*(reaction.aLo2_Q+reaction.T*(reaction.aLo3_Q+reaction.T*(reaction.aLo4_Q+reaction.T*reaction.aLo5_Q))))+(reaction.T>reaction.Tmid_Q)*(reaction.T<=reaction.Thi_Q)*(reaction.aHi1_Q+reaction.T*(reaction.aHi2_Q+reaction.T*(reaction.aHi3_Q+reaction.T*(reaction.aHi4_Q+reaction.T*reaction.aHi5_Q))))+(reaction.T>reaction.Thi_Q)*(reaction.aHi1_Q+reaction.Thi_Q*(reaction.aHi2_Q+reaction.Thi_Q*(reaction.aHi3_Q+reaction.Thi_Q*(reaction.aHi4_Q+reaction.Thi_Q*reaction.aHi5_Q)))))
      ReactionTagInSpecies = {rch1, rch5, rch6, rch7, rch8}
      specName = Q
      R = -reaction.r_1-reaction.r_5-reaction.r_6-reaction.r_7+reaction.r_8
      mixtureSolvent = 1
    DH: SpeciesChem "Species: DH"
      sisDef = 1
      sSequenceNo = 5
      SpeciesSource = Reaction
      specLabel = DH
      h = R_const*((reaction.T<=reaction.Tlo_DH)*(reaction.aLo6_DH+reaction.Tlo_DH*(reaction.aLo1_DH+0.5*reaction.Tlo_DH*(reaction.aLo2_DH+2*reaction.Tlo_DH*(reaction.aLo3_DH+0.75*reaction.Tlo_DH*(reaction.aLo4_DH+0.8*reaction.Tlo_DH*reaction.aLo5_DH))/3)))+(reaction.T>reaction.Tlo_DH)*(reaction.T<=reaction.Tmid_DH)*(reaction.aLo6_DH+reaction.T*(reaction.aLo1_DH+0.5*reaction.T*(reaction.aLo2_DH+2*reaction.T*(reaction.aLo3_DH+0.75*reaction.T*(reaction.aLo4_DH+0.8*reaction.T*reaction.aLo5_DH))/3)))+(reaction.T>reaction.Tmid_DH)*(reaction.T<=reaction.Thi_DH)*(reaction.aHi6_DH+reaction.T*(reaction.aHi1_DH+0.5*reaction.T*(reaction.aHi2_DH+2*reaction.T*(reaction.aHi3_DH+0.75*reaction.T*(reaction.aHi4_DH+0.8*reaction.T*reaction.aHi5_DH))/3)))+(reaction.T>reaction.Thi_DH)*(reaction.aHi6_DH+reaction.Thi_DH*(reaction.aHi1_DH+0.5*reaction.Thi_DH*(reaction.aHi2_DH+2*reaction.Thi_DH*(reaction.aHi3_DH+0.75*reaction.Thi_DH*(reaction.aHi4_DH+0.8*reaction.Thi_DH*reaction.aHi5_DH))/3))))
      s = R_const*((reaction.T<=reaction.Tlo_DH)*(reaction.aLo7_DH+reaction.aLo1_DH*log(reaction.T/1[K])+reaction.Tlo_DH*(reaction.aLo2_DH+0.5*reaction.Tlo_DH*(reaction.aLo3_DH+2*reaction.Tlo_DH*(reaction.aLo4_DH+0.75*reaction.Tlo_DH*reaction.aLo5_DH)/3)))+(reaction.T>reaction.Tlo_DH)*(reaction.T<=reaction.Tmid_DH)*(reaction.aLo7_DH+reaction.aLo1_DH*log(reaction.T/1[K])+reaction.T*(reaction.aLo2_DH+0.5*reaction.T*(reaction.aLo3_DH+2*reaction.T*(reaction.aLo4_DH+0.75*reaction.T*reaction.aLo5_DH)/3)))+(reaction.T>reaction.Tmid_DH)*(reaction.T<=reaction.Thi_DH)*(reaction.aHi7_DH+reaction.aHi1_DH*log(reaction.T/1[K])+reaction.T*(reaction.aHi2_DH+0.5*reaction.T*(reaction.aHi3_DH+2*reaction.T*(reaction.aHi4_DH+0.75*reaction.T*reaction.aHi5_DH)/3)))+(reaction.T>reaction.Thi_DH)*(reaction.aHi7_DH+reaction.aHi1_DH*log(reaction.T/1[K])+reaction.Thi_DH*(reaction.aHi2_DH+0.5*reaction.Thi_DH*(reaction.aHi3_DH+2*reaction.Thi_DH*(reaction.aHi4_DH+0.75*reaction.Thi_DH*reaction.aHi5_DH)/3))))
      Cp = R_const*((reaction.T<=reaction.Tlo_DH)*(reaction.aLo1_DH+reaction.Tlo_DH*(reaction.aLo2_DH+reaction.Tlo_DH*(reaction.aLo3_DH+reaction.Tlo_DH*(reaction.aLo4_DH+reaction.Tlo_DH*reaction.aLo5_DH))))+(reaction.T>reaction.Tlo_DH)*(reaction.T<=reaction.Tmid_DH)*(reaction.aLo1_DH+reaction.T*(reaction.aLo2_DH+reaction.T*(reaction.aLo3_DH+reaction.T*(reaction.aLo4_DH+reaction.T*reaction.aLo5_DH))))+(reaction.T>reaction.Tmid_DH)*(reaction.T<=reaction.Thi_DH)*(reaction.aHi1_DH+reaction.T*(reaction.aHi2_DH+reaction.T*(reaction.aHi3_DH+reaction.T*(reaction.aHi4_DH+reaction.T*reaction.aHi5_DH))))+(reaction.T>reaction.Thi_DH)*(reaction.aHi1_DH+reaction.Thi_DH*(reaction.aHi2_DH+reaction.Thi_DH*(reaction.aHi3_DH+reaction.Thi_DH*(reaction.aHi4_DH+reaction.Thi_DH*reaction.aHi5_DH)))))
      ReactionTagInSpecies = rch1
      specName = DH
      R = -reaction.r_1
      mixtureSolvent = 1
    Qm: SpeciesChem "Species: Qm"
      sisDef = 1
      sSequenceNo = 6
      SpeciesSource = Reaction
      specLabel = Qm
      h = R_const*((reaction.T<=reaction.Tlo_Qm)*(reaction.aLo6_Qm+reaction.Tlo_Qm*(reaction.aLo1_Qm+0.5*reaction.Tlo_Qm*(reaction.aLo2_Qm+2*reaction.Tlo_Qm*(reaction.aLo3_Qm+0.75*reaction.Tlo_Qm*(reaction.aLo4_Qm+0.8*reaction.Tlo_Qm*reaction.aLo5_Qm))/3)))+(reaction.T>reaction.Tlo_Qm)*(reaction.T<=reaction.Tmid_Qm)*(reaction.aLo6_Qm+reaction.T*(reaction.aLo1_Qm+0.5*reaction.T*(reaction.aLo2_Qm+2*reaction.T*(reaction.aLo3_Qm+0.75*reaction.T*(reaction.aLo4_Qm+0.8*reaction.T*reaction.aLo5_Qm))/3)))+(reaction.T>reaction.Tmid_Qm)*(reaction.T<=reaction.Thi_Qm)*(reaction.aHi6_Qm+reaction.T*(reaction.aHi1_Qm+0.5*reaction.T*(reaction.aHi2_Qm+2*reaction.T*(reaction.aHi3_Qm+0.75*reaction.T*(reaction.aHi4_Qm+0.8*reaction.T*reaction.aHi5_Qm))/3)))+(reaction.T>reaction.Thi_Qm)*(reaction.aHi6_Qm+reaction.Thi_Qm*(reaction.aHi1_Qm+0.5*reaction.Thi_Qm*(reaction.aHi2_Qm+2*reaction.Thi_Qm*(reaction.aHi3_Qm+0.75*reaction.Thi_Qm*(reaction.aHi4_Qm+0.8*reaction.Thi_Qm*reaction.aHi5_Qm))/3))))
      s = R_const*((reaction.T<=reaction.Tlo_Qm)*(reaction.aLo7_Qm+reaction.aLo1_Qm*log(reaction.T/1[K])+reaction.Tlo_Qm*(reaction.aLo2_Qm+0.5*reaction.Tlo_Qm*(reaction.aLo3_Qm+2*reaction.Tlo_Qm*(reaction.aLo4_Qm+0.75*reaction.Tlo_Qm*reaction.aLo5_Qm)/3)))+(reaction.T>reaction.Tlo_Qm)*(reaction.T<=reaction.Tmid_Qm)*(reaction.aLo7_Qm+reaction.aLo1_Qm*log(reaction.T/1[K])+reaction.T*(reaction.aLo2_Qm+0.5*reaction.T*(reaction.aLo3_Qm+2*reaction.T*(reaction.aLo4_Qm+0.75*reaction.T*reaction.aLo5_Qm)/3)))+(reaction.T>reaction.Tmid_Qm)*(reaction.T<=reaction.Thi_Qm)*(reaction.aHi7_Qm+reaction.aHi1_Qm*log(reaction.T/1[K])+reaction.T*(reaction.aHi2_Qm+0.5*reaction.T*(reaction.aHi3_Qm+2*reaction.T*(reaction.aHi4_Qm+0.75*reaction.T*reaction.aHi5_Qm)/3)))+(reaction.T>reaction.Thi_Qm)*(reaction.aHi7_Qm+reaction.aHi1_Qm*log(reaction.T/1[K])+reaction.Thi_Qm*(reaction.aHi2_Qm+0.5*reaction.Thi_Qm*(reaction.aHi3_Qm+2*reaction.Thi_Qm*(reaction.aHi4_Qm+0.75*reaction.Thi_Qm*reaction.aHi5_Qm)/3))))
      Cp = R_const*((reaction.T<=reaction.Tlo_Qm)*(reaction.aLo1_Qm+reaction.Tlo_Qm*(reaction.aLo2_Qm+reaction.Tlo_Qm*(reaction.aLo3_Qm+reaction.Tlo_Qm*(reaction.aLo4_Qm+reaction.Tlo_Qm*reaction.aLo5_Qm))))+(reaction.T>reaction.Tlo_Qm)*(reaction.T<=reaction.Tmid_Qm)*(reaction.aLo1_Qm+reaction.T*(reaction.aLo2_Qm+reaction.T*(reaction.aLo3_Qm+reaction.T*(reaction.aLo4_Qm+reaction.T*reaction.aLo5_Qm))))+(reaction.T>reaction.Tmid_Qm)*(reaction.T<=reaction.Thi_Qm)*(reaction.aHi1_Qm+reaction.T*(reaction.aHi2_Qm+reaction.T*(reaction.aHi3_Qm+reaction.T*(reaction.aHi4_Qm+reaction.T*reaction.aHi5_Qm))))+(reaction.T>reaction.Thi_Qm)*(reaction.aHi1_Qm+reaction.Thi_Qm*(reaction.aHi2_Qm+reaction.Thi_Qm*(reaction.aHi3_Qm+reaction.Thi_Qm*(reaction.aHi4_Qm+reaction.Thi_Qm*reaction.aHi5_Qm)))))
      ReactionTagInSpecies = {rch1, rch2}
      specName = Qm
      R = reaction.r_1-reaction.r_2
      mixtureSolvent = 1
    DHp: SpeciesChem "Species: DHp"
      sisDef = 1
      sSequenceNo = 7
      SpeciesSource = Reaction
      specLabel = DHp
      h = R_const*((reaction.T<=reaction.Tlo_DHp)*(reaction.aLo6_DHp+reaction.Tlo_DHp*(reaction.aLo1_DHp+0.5*reaction.Tlo_DHp*(reaction.aLo2_DHp+2*reaction.Tlo_DHp*(reaction.aLo3_DHp+0.75*reaction.Tlo_DHp*(reaction.aLo4_DHp+0.8*reaction.Tlo_DHp*reaction.aLo5_DHp))/3)))+(reaction.T>reaction.Tlo_DHp)*(reaction.T<=reaction.Tmid_DHp)*(reaction.aLo6_DHp+reaction.T*(reaction.aLo1_DHp+0.5*reaction.T*(reaction.aLo2_DHp+2*reaction.T*(reaction.aLo3_DHp+0.75*reaction.T*(reaction.aLo4_DHp+0.8*reaction.T*reaction.aLo5_DHp))/3)))+(reaction.T>reaction.Tmid_DHp)*(reaction.T<=reaction.Thi_DHp)*(reaction.aHi6_DHp+reaction.T*(reaction.aHi1_DHp+0.5*reaction.T*(reaction.aHi2_DHp+2*reaction.T*(reaction.aHi3_DHp+0.75*reaction.T*(reaction.aHi4_DHp+0.8*reaction.T*reaction.aHi5_DHp))/3)))+(reaction.T>reaction.Thi_DHp)*(reaction.aHi6_DHp+reaction.Thi_DHp*(reaction.aHi1_DHp+0.5*reaction.Thi_DHp*(reaction.aHi2_DHp+2*reaction.Thi_DHp*(reaction.aHi3_DHp+0.75*reaction.Thi_DHp*(reaction.aHi4_DHp+0.8*reaction.Thi_DHp*reaction.aHi5_DHp))/3))))
      s = R_const*((reaction.T<=reaction.Tlo_DHp)*(reaction.aLo7_DHp+reaction.aLo1_DHp*log(reaction.T/1[K])+reaction.Tlo_DHp*(reaction.aLo2_DHp+0.5*reaction.Tlo_DHp*(reaction.aLo3_DHp+2*reaction.Tlo_DHp*(reaction.aLo4_DHp+0.75*reaction.Tlo_DHp*reaction.aLo5_DHp)/3)))+(reaction.T>reaction.Tlo_DHp)*(reaction.T<=reaction.Tmid_DHp)*(reaction.aLo7_DHp+reaction.aLo1_DHp*log(reaction.T/1[K])+reaction.T*(reaction.aLo2_DHp+0.5*reaction.T*(reaction.aLo3_DHp+2*reaction.T*(reaction.aLo4_DHp+0.75*reaction.T*reaction.aLo5_DHp)/3)))+(reaction.T>reaction.Tmid_DHp)*(reaction.T<=reaction.Thi_DHp)*(reaction.aHi7_DHp+reaction.aHi1_DHp*log(reaction.T/1[K])+reaction.T*(reaction.aHi2_DHp+0.5*reaction.T*(reaction.aHi3_DHp+2*reaction.T*(reaction.aHi4_DHp+0.75*reaction.T*reaction.aHi5_DHp)/3)))+(reaction.T>reaction.Thi_DHp)*(reaction.aHi7_DHp+reaction.aHi1_DHp*log(reaction.T/1[K])+reaction.Thi_DHp*(reaction.aHi2_DHp+0.5*reaction.Thi_DHp*(reaction.aHi3_DHp+2*reaction.Thi_DHp*(reaction.aHi4_DHp+0.75*reaction.Thi_DHp*reaction.aHi5_DHp)/3))))
      Cp = R_const*((reaction.T<=reaction.Tlo_DHp)*(reaction.aLo1_DHp+reaction.Tlo_DHp*(reaction.aLo2_DHp+reaction.Tlo_DHp*(reaction.aLo3_DHp+reaction.Tlo_DHp*(reaction.aLo4_DHp+reaction.Tlo_DHp*reaction.aLo5_DHp))))+(reaction.T>reaction.Tlo_DHp)*(reaction.T<=reaction.Tmid_DHp)*(reaction.aLo1_DHp+reaction.T*(reaction.aLo2_DHp+reaction.T*(reaction.aLo3_DHp+reaction.T*(reaction.aLo4_DHp+reaction.T*reaction.aLo5_DHp))))+(reaction.T>reaction.Tmid_DHp)*(reaction.T<=reaction.Thi_DHp)*(reaction.aHi1_DHp+reaction.T*(reaction.aHi2_DHp+reaction.T*(reaction.aHi3_DHp+reaction.T*(reaction.aHi4_DHp+reaction.T*reaction.aHi5_DHp))))+(reaction.T>reaction.Thi_DHp)*(reaction.aHi1_DHp+reaction.Thi_DHp*(reaction.aHi2_DHp+reaction.Thi_DHp*(reaction.aHi3_DHp+reaction.Thi_DHp*(reaction.aHi4_DHp+reaction.Thi_DHp*reaction.aHi5_DHp)))))
      ReactionTagInSpecies = {rch1, rch2}
      specName = DHp
      R = reaction.r_1-reaction.r_2
      mixtureSolvent = 1
    QH: SpeciesChem "Species: QH"
      sisDef = 1
      sSequenceNo = 8
      SpeciesSource = Reaction
      specLabel = QH
      h = R_const*((reaction.T<=reaction.Tlo_QH)*(reaction.aLo6_QH+reaction.Tlo_QH*(reaction.aLo1_QH+0.5*reaction.Tlo_QH*(reaction.aLo2_QH+2*reaction.Tlo_QH*(reaction.aLo3_QH+0.75*reaction.Tlo_QH*(reaction.aLo4_QH+0.8*reaction.Tlo_QH*reaction.aLo5_QH))/3)))+(reaction.T>reaction.Tlo_QH)*(reaction.T<=reaction.Tmid_QH)*(reaction.aLo6_QH+reaction.T*(reaction.aLo1_QH+0.5*reaction.T*(reaction.aLo2_QH+2*reaction.T*(reaction.aLo3_QH+0.75*reaction.T*(reaction.aLo4_QH+0.8*reaction.T*reaction.aLo5_QH))/3)))+(reaction.T>reaction.Tmid_QH)*(reaction.T<=reaction.Thi_QH)*(reaction.aHi6_QH+reaction.T*(reaction.aHi1_QH+0.5*reaction.T*(reaction.aHi2_QH+2*reaction.T*(reaction.aHi3_QH+0.75*reaction.T*(reaction.aHi4_QH+0.8*reaction.T*reaction.aHi5_QH))/3)))+(reaction.T>reaction.Thi_QH)*(reaction.aHi6_QH+reaction.Thi_QH*(reaction.aHi1_QH+0.5*reaction.Thi_QH*(reaction.aHi2_QH+2*reaction.Thi_QH*(reaction.aHi3_QH+0.75*reaction.Thi_QH*(reaction.aHi4_QH+0.8*reaction.Thi_QH*reaction.aHi5_QH))/3))))
      s = R_const*((reaction.T<=reaction.Tlo_QH)*(reaction.aLo7_QH+reaction.aLo1_QH*log(reaction.T/1[K])+reaction.Tlo_QH*(reaction.aLo2_QH+0.5*reaction.Tlo_QH*(reaction.aLo3_QH+2*reaction.Tlo_QH*(reaction.aLo4_QH+0.75*reaction.Tlo_QH*reaction.aLo5_QH)/3)))+(reaction.T>reaction.Tlo_QH)*(reaction.T<=reaction.Tmid_QH)*(reaction.aLo7_QH+reaction.aLo1_QH*log(reaction.T/1[K])+reaction.T*(reaction.aLo2_QH+0.5*reaction.T*(reaction.aLo3_QH+2*reaction.T*(reaction.aLo4_QH+0.75*reaction.T*reaction.aLo5_QH)/3)))+(reaction.T>reaction.Tmid_QH)*(reaction.T<=reaction.Thi_QH)*(reaction.aHi7_QH+reaction.aHi1_QH*log(reaction.T/1[K])+reaction.T*(reaction.aHi2_QH+0.5*reaction.T*(reaction.aHi3_QH+2*reaction.T*(reaction.aHi4_QH+0.75*reaction.T*reaction.aHi5_QH)/3)))+(reaction.T>reaction.Thi_QH)*(reaction.aHi7_QH+reaction.aHi1_QH*log(reaction.T/1[K])+reaction.Thi_QH*(reaction.aHi2_QH+0.5*reaction.Thi_QH*(reaction.aHi3_QH+2*reaction.Thi_QH*(reaction.aHi4_QH+0.75*reaction.Thi_QH*reaction.aHi5_QH)/3))))
      Cp = R_const*((reaction.T<=reaction.Tlo_QH)*(reaction.aLo1_QH+reaction.Tlo_QH*(reaction.aLo2_QH+reaction.Tlo_QH*(reaction.aLo3_QH+reaction.Tlo_QH*(reaction.aLo4_QH+reaction.Tlo_QH*reaction.aLo5_QH))))+(reaction.T>reaction.Tlo_QH)*(reaction.T<=reaction.Tmid_QH)*(reaction.aLo1_QH+reaction.T*(reaction.aLo2_QH+reaction.T*(reaction.aLo3_QH+reaction.T*(reaction.aLo4_QH+reaction.T*reaction.aLo5_QH))))+(reaction.T>reaction.Tmid_QH)*(reaction.T<=reaction.Thi_QH)*(reaction.aHi1_QH+reaction.T*(reaction.aHi2_QH+reaction.T*(reaction.aHi3_QH+reaction.T*(reaction.aHi4_QH+reaction.T*reaction.aHi5_QH))))+(reaction.T>reaction.Thi_QH)*(reaction.aHi1_QH+reaction.Thi_QH*(reaction.aHi2_QH+reaction.Thi_QH*(reaction.aHi3_QH+reaction.Thi_QH*(reaction.aHi4_QH+reaction.Thi_QH*reaction.aHi5_QH)))))
      ReactionTagInSpecies = {rch2, rch3, rch5, rch7}
      specName = QH
      R = reaction.r_2-reaction.r_3+2*reaction.r_5+reaction.r_7
      mixtureSolvent = 1
    D: SpeciesChem "Species: D"
      sisDef = 1
      sSequenceNo = 9
      SpeciesSource = Reaction
      specLabel = D
      h = R_const*((reaction.T<=reaction.Tlo_D)*(reaction.aLo6_D+reaction.Tlo_D*(reaction.aLo1_D+0.5*reaction.Tlo_D*(reaction.aLo2_D+2*reaction.Tlo_D*(reaction.aLo3_D+0.75*reaction.Tlo_D*(reaction.aLo4_D+0.8*reaction.Tlo_D*reaction.aLo5_D))/3)))+(reaction.T>reaction.Tlo_D)*(reaction.T<=reaction.Tmid_D)*(reaction.aLo6_D+reaction.T*(reaction.aLo1_D+0.5*reaction.T*(reaction.aLo2_D+2*reaction.T*(reaction.aLo3_D+0.75*reaction.T*(reaction.aLo4_D+0.8*reaction.T*reaction.aLo5_D))/3)))+(reaction.T>reaction.Tmid_D)*(reaction.T<=reaction.Thi_D)*(reaction.aHi6_D+reaction.T*(reaction.aHi1_D+0.5*reaction.T*(reaction.aHi2_D+2*reaction.T*(reaction.aHi3_D+0.75*reaction.T*(reaction.aHi4_D+0.8*reaction.T*reaction.aHi5_D))/3)))+(reaction.T>reaction.Thi_D)*(reaction.aHi6_D+reaction.Thi_D*(reaction.aHi1_D+0.5*reaction.Thi_D*(reaction.aHi2_D+2*reaction.Thi_D*(reaction.aHi3_D+0.75*reaction.Thi_D*(reaction.aHi4_D+0.8*reaction.Thi_D*reaction.aHi5_D))/3))))
      s = R_const*((reaction.T<=reaction.Tlo_D)*(reaction.aLo7_D+reaction.aLo1_D*log(reaction.T/1[K])+reaction.Tlo_D*(reaction.aLo2_D+0.5*reaction.Tlo_D*(reaction.aLo3_D+2*reaction.Tlo_D*(reaction.aLo4_D+0.75*reaction.Tlo_D*reaction.aLo5_D)/3)))+(reaction.T>reaction.Tlo_D)*(reaction.T<=reaction.Tmid_D)*(reaction.aLo7_D+reaction.aLo1_D*log(reaction.T/1[K])+reaction.T*(reaction.aLo2_D+0.5*reaction.T*(reaction.aLo3_D+2*reaction.T*(reaction.aLo4_D+0.75*reaction.T*reaction.aLo5_D)/3)))+(reaction.T>reaction.Tmid_D)*(reaction.T<=reaction.Thi_D)*(reaction.aHi7_D+reaction.aHi1_D*log(reaction.T/1[K])+reaction.T*(reaction.aHi2_D+0.5*reaction.T*(reaction.aHi3_D+2*reaction.T*(reaction.aHi4_D+0.75*reaction.T*reaction.aHi5_D)/3)))+(reaction.T>reaction.Thi_D)*(reaction.aHi7_D+reaction.aHi1_D*log(reaction.T/1[K])+reaction.Thi_D*(reaction.aHi2_D+0.5*reaction.Thi_D*(reaction.aHi3_D+2*reaction.Thi_D*(reaction.aHi4_D+0.75*reaction.Thi_D*reaction.aHi5_D)/3))))
      Cp = R_const*((reaction.T<=reaction.Tlo_D)*(reaction.aLo1_D+reaction.Tlo_D*(reaction.aLo2_D+reaction.Tlo_D*(reaction.aLo3_D+reaction.Tlo_D*(reaction.aLo4_D+reaction.Tlo_D*reaction.aLo5_D))))+(reaction.T>reaction.Tlo_D)*(reaction.T<=reaction.Tmid_D)*(reaction.aLo1_D+reaction.T*(reaction.aLo2_D+reaction.T*(reaction.aLo3_D+reaction.T*(reaction.aLo4_D+reaction.T*reaction.aLo5_D))))+(reaction.T>reaction.Tmid_D)*(reaction.T<=reaction.Thi_D)*(reaction.aHi1_D+reaction.T*(reaction.aHi2_D+reaction.T*(reaction.aHi3_D+reaction.T*(reaction.aHi4_D+reaction.T*reaction.aHi5_D))))+(reaction.T>reaction.Thi_D)*(reaction.aHi1_D+reaction.Thi_D*(reaction.aHi2_D+reaction.Thi_D*(reaction.aHi3_D+reaction.Thi_D*(reaction.aHi4_D+reaction.Thi_D*reaction.aHi5_D)))))
      ReactionTagInSpecies = {rch2, rch3, rch8, rch9}
      specName = D
      R = reaction.r_2-reaction.r_3+reaction.r_8-2*reaction.r_9
      mixtureSolvent = 1
    QHD: SpeciesChem "Species: QHD"
      sisDef = 1
      sSequenceNo = 10
      SpeciesSource = Reaction
      specLabel = QHD
      h = R_const*((reaction.T<=reaction.Tlo_QHD)*(reaction.aLo6_QHD+reaction.Tlo_QHD*(reaction.aLo1_QHD+0.5*reaction.Tlo_QHD*(reaction.aLo2_QHD+2*reaction.Tlo_QHD*(reaction.aLo3_QHD+0.75*reaction.Tlo_QHD*(reaction.aLo4_QHD+0.8*reaction.Tlo_QHD*reaction.aLo5_QHD))/3)))+(reaction.T>reaction.Tlo_QHD)*(reaction.T<=reaction.Tmid_QHD)*(reaction.aLo6_QHD+reaction.T*(reaction.aLo1_QHD+0.5*reaction.T*(reaction.aLo2_QHD+2*reaction.T*(reaction.aLo3_QHD+0.75*reaction.T*(reaction.aLo4_QHD+0.8*reaction.T*reaction.aLo5_QHD))/3)))+(reaction.T>reaction.Tmid_QHD)*(reaction.T<=reaction.Thi_QHD)*(reaction.aHi6_QHD+reaction.T*(reaction.aHi1_QHD+0.5*reaction.T*(reaction.aHi2_QHD+2*reaction.T*(reaction.aHi3_QHD+0.75*reaction.T*(reaction.aHi4_QHD+0.8*reaction.T*reaction.aHi5_QHD))/3)))+(reaction.T>reaction.Thi_QHD)*(reaction.aHi6_QHD+reaction.Thi_QHD*(reaction.aHi1_QHD+0.5*reaction.Thi_QHD*(reaction.aHi2_QHD+2*reaction.Thi_QHD*(reaction.aHi3_QHD+0.75*reaction.Thi_QHD*(reaction.aHi4_QHD+0.8*reaction.Thi_QHD*reaction.aHi5_QHD))/3))))
      s = R_const*((reaction.T<=reaction.Tlo_QHD)*(reaction.aLo7_QHD+reaction.aLo1_QHD*log(reaction.T/1[K])+reaction.Tlo_QHD*(reaction.aLo2_QHD+0.5*reaction.Tlo_QHD*(reaction.aLo3_QHD+2*reaction.Tlo_QHD*(reaction.aLo4_QHD+0.75*reaction.Tlo_QHD*reaction.aLo5_QHD)/3)))+(reaction.T>reaction.Tlo_QHD)*(reaction.T<=reaction.Tmid_QHD)*(reaction.aLo7_QHD+reaction.aLo1_QHD*log(reaction.T/1[K])+reaction.T*(reaction.aLo2_QHD+0.5*reaction.T*(reaction.aLo3_QHD+2*reaction.T*(reaction.aLo4_QHD+0.75*reaction.T*reaction.aLo5_QHD)/3)))+(reaction.T>reaction.Tmid_QHD)*(reaction.T<=reaction.Thi_QHD)*(reaction.aHi7_QHD+reaction.aHi1_QHD*log(reaction.T/1[K])+reaction.T*(reaction.aHi2_QHD+0.5*reaction.T*(reaction.aHi3_QHD+2*reaction.T*(reaction.aHi4_QHD+0.75*reaction.T*reaction.aHi5_QHD)/3)))+(reaction.T>reaction.Thi_QHD)*(reaction.aHi7_QHD+reaction.aHi1_QHD*log(reaction.T/1[K])+reaction.Thi_QHD*(reaction.aHi2_QHD+0.5*reaction.Thi_QHD*(reaction.aHi3_QHD+2*reaction.Thi_QHD*(reaction.aHi4_QHD+0.75*reaction.Thi_QHD*reaction.aHi5_QHD)/3))))
      Cp = R_const*((reaction.T<=reaction.Tlo_QHD)*(reaction.aLo1_QHD+reaction.Tlo_QHD*(reaction.aLo2_QHD+reaction.Tlo_QHD*(reaction.aLo3_QHD+reaction.Tlo_QHD*(reaction.aLo4_QHD+reaction.Tlo_QHD*reaction.aLo5_QHD))))+(reaction.T>reaction.Tlo_QHD)*(reaction.T<=reaction.Tmid_QHD)*(reaction.aLo1_QHD+reaction.T*(reaction.aLo2_QHD+reaction.T*(reaction.aLo3_QHD+reaction.T*(reaction.aLo4_QHD+reaction.T*reaction.aLo5_QHD))))+(reaction.T>reaction.Tmid_QHD)*(reaction.T<=reaction.Thi_QHD)*(reaction.aHi1_QHD+reaction.T*(reaction.aHi2_QHD+reaction.T*(reaction.aHi3_QHD+reaction.T*(reaction.aHi4_QHD+reaction.T*reaction.aHi5_QHD))))+(reaction.T>reaction.Thi_QHD)*(reaction.aHi1_QHD+reaction.Thi_QHD*(reaction.aHi2_QHD+reaction.Thi_QHD*(reaction.aHi3_QHD+reaction.Thi_QHD*(reaction.aHi4_QHD+reaction.Thi_QHD*reaction.aHi5_QHD)))))
      ReactionTagInSpecies = {rch3, rch4, rch7}
      specName = QHD
      R = reaction.r_3-reaction.r_4-reaction.r_7
      mixtureSolvent = 1
    QHH: SpeciesChem "Species: QHH"
      sisDef = 1
      sSequenceNo = 11
      SpeciesSource = Reaction
      specLabel = QHH
      h = R_const*((reaction.T<=reaction.Tlo_QHH)*(reaction.aLo6_QHH+reaction.Tlo_QHH*(reaction.aLo1_QHH+0.5*reaction.Tlo_QHH*(reaction.aLo2_QHH+2*reaction.Tlo_QHH*(reaction.aLo3_QHH+0.75*reaction.Tlo_QHH*(reaction.aLo4_QHH+0.8*reaction.Tlo_QHH*reaction.aLo5_QHH))/3)))+(reaction.T>reaction.Tlo_QHH)*(reaction.T<=reaction.Tmid_QHH)*(reaction.aLo6_QHH+reaction.T*(reaction.aLo1_QHH+0.5*reaction.T*(reaction.aLo2_QHH+2*reaction.T*(reaction.aLo3_QHH+0.75*reaction.T*(reaction.aLo4_QHH+0.8*reaction.T*reaction.aLo5_QHH))/3)))+(reaction.T>reaction.Tmid_QHH)*(reaction.T<=reaction.Thi_QHH)*(reaction.aHi6_QHH+reaction.T*(reaction.aHi1_QHH+0.5*reaction.T*(reaction.aHi2_QHH+2*reaction.T*(reaction.aHi3_QHH+0.75*reaction.T*(reaction.aHi4_QHH+0.8*reaction.T*reaction.aHi5_QHH))/3)))+(reaction.T>reaction.Thi_QHH)*(reaction.aHi6_QHH+reaction.Thi_QHH*(reaction.aHi1_QHH+0.5*reaction.Thi_QHH*(reaction.aHi2_QHH+2*reaction.Thi_QHH*(reaction.aHi3_QHH+0.75*reaction.Thi_QHH*(reaction.aHi4_QHH+0.8*reaction.Thi_QHH*reaction.aHi5_QHH))/3))))
      s = R_const*((reaction.T<=reaction.Tlo_QHH)*(reaction.aLo7_QHH+reaction.aLo1_QHH*log(reaction.T/1[K])+reaction.Tlo_QHH*(reaction.aLo2_QHH+0.5*reaction.Tlo_QHH*(reaction.aLo3_QHH+2*reaction.Tlo_QHH*(reaction.aLo4_QHH+0.75*reaction.Tlo_QHH*reaction.aLo5_QHH)/3)))+(reaction.T>reaction.Tlo_QHH)*(reaction.T<=reaction.Tmid_QHH)*(reaction.aLo7_QHH+reaction.aLo1_QHH*log(reaction.T/1[K])+reaction.T*(reaction.aLo2_QHH+0.5*reaction.T*(reaction.aLo3_QHH+2*reaction.T*(reaction.aLo4_QHH+0.75*reaction.T*reaction.aLo5_QHH)/3)))+(reaction.T>reaction.Tmid_QHH)*(reaction.T<=reaction.Thi_QHH)*(reaction.aHi7_QHH+reaction.aHi1_QHH*log(reaction.T/1[K])+reaction.T*(reaction.aHi2_QHH+0.5*reaction.T*(reaction.aHi3_QHH+2*reaction.T*(reaction.aHi4_QHH+0.75*reaction.T*reaction.aHi5_QHH)/3)))+(reaction.T>reaction.Thi_QHH)*(reaction.aHi7_QHH+reaction.aHi1_QHH*log(reaction.T/1[K])+reaction.Thi_QHH*(reaction.aHi2_QHH+0.5*reaction.Thi_QHH*(reaction.aHi3_QHH+2*reaction.Thi_QHH*(reaction.aHi4_QHH+0.75*reaction.Thi_QHH*reaction.aHi5_QHH)/3))))
      Cp = R_const*((reaction.T<=reaction.Tlo_QHH)*(reaction.aLo1_QHH+reaction.Tlo_QHH*(reaction.aLo2_QHH+reaction.Tlo_QHH*(reaction.aLo3_QHH+reaction.Tlo_QHH*(reaction.aLo4_QHH+reaction.Tlo_QHH*reaction.aLo5_QHH))))+(reaction.T>reaction.Tlo_QHH)*(reaction.T<=reaction.Tmid_QHH)*(reaction.aLo1_QHH+reaction.T*(reaction.aLo2_QHH+reaction.T*(reaction.aLo3_QHH+reaction.T*(reaction.aLo4_QHH+reaction.T*reaction.aLo5_QHH))))+(reaction.T>reaction.Tmid_QHH)*(reaction.T<=reaction.Thi_QHH)*(reaction.aHi1_QHH+reaction.T*(reaction.aHi2_QHH+reaction.T*(reaction.aHi3_QHH+reaction.T*(reaction.aHi4_QHH+reaction.T*reaction.aHi5_QHH))))+(reaction.T>reaction.Thi_QHH)*(reaction.aHi1_QHH+reaction.Thi_QHH*(reaction.aHi2_QHH+reaction.Thi_QHH*(reaction.aHi3_QHH+reaction.Thi_QHH*(reaction.aHi4_QHH+reaction.Thi_QHH*reaction.aHi5_QHH)))))
      ReactionTagInSpecies = {rch4, rch5}
      specName = QHH
      R = reaction.r_4-reaction.r_5
      mixtureSolvent = 1
    prod: SpeciesChem "Species: prod"
      sisDef = 1
      sSequenceNo = 12
      SpeciesSource = Reaction
      specLabel = prod
      h = R_const*((reaction.T<=reaction.Tlo_prod)*(reaction.aLo6_prod+reaction.Tlo_prod*(reaction.aLo1_prod+0.5*reaction.Tlo_prod*(reaction.aLo2_prod+2*reaction.Tlo_prod*(reaction.aLo3_prod+0.75*reaction.Tlo_prod*(reaction.aLo4_prod+0.8*reaction.Tlo_prod*reaction.aLo5_prod))/3)))+(reaction.T>reaction.Tlo_prod)*(reaction.T<=reaction.Tmid_prod)*(reaction.aLo6_prod+reaction.T*(reaction.aLo1_prod+0.5*reaction.T*(reaction.aLo2_prod+2*reaction.T*(reaction.aLo3_prod+0.75*reaction.T*(reaction.aLo4_prod+0.8*reaction.T*reaction.aLo5_prod))/3)))+(reaction.T>reaction.Tmid_prod)*(reaction.T<=reaction.Thi_prod)*(reaction.aHi6_prod+reaction.T*(reaction.aHi1_prod+0.5*reaction.T*(reaction.aHi2_prod+2*reaction.T*(reaction.aHi3_prod+0.75*reaction.T*(reaction.aHi4_prod+0.8*reaction.T*reaction.aHi5_prod))/3)))+(reaction.T>reaction.Thi_prod)*(reaction.aHi6_prod+reaction.Thi_prod*(reaction.aHi1_prod+0.5*reaction.Thi_prod*(reaction.aHi2_prod+2*reaction.Thi_prod*(reaction.aHi3_prod+0.75*reaction.Thi_prod*(reaction.aHi4_prod+0.8*reaction.Thi_prod*reaction.aHi5_prod))/3))))
      s = R_const*((reaction.T<=reaction.Tlo_prod)*(reaction.aLo7_prod+reaction.aLo1_prod*log(reaction.T/1[K])+reaction.Tlo_prod*(reaction.aLo2_prod+0.5*reaction.Tlo_prod*(reaction.aLo3_prod+2*reaction.Tlo_prod*(reaction.aLo4_prod+0.75*reaction.Tlo_prod*reaction.aLo5_prod)/3)))+(reaction.T>reaction.Tlo_prod)*(reaction.T<=reaction.Tmid_prod)*(reaction.aLo7_prod+reaction.aLo1_prod*log(reaction.T/1[K])+reaction.T*(reaction.aLo2_prod+0.5*reaction.T*(reaction.aLo3_prod+2*reaction.T*(reaction.aLo4_prod+0.75*reaction.T*reaction.aLo5_prod)/3)))+(reaction.T>reaction.Tmid_prod)*(reaction.T<=reaction.Thi_prod)*(reaction.aHi7_prod+reaction.aHi1_prod*log(reaction.T/1[K])+reaction.T*(reaction.aHi2_prod+0.5*reaction.T*(reaction.aHi3_prod+2*reaction.T*(reaction.aHi4_prod+0.75*reaction.T*reaction.aHi5_prod)/3)))+(reaction.T>reaction.Thi_prod)*(reaction.aHi7_prod+reaction.aHi1_prod*log(reaction.T/1[K])+reaction.Thi_prod*(reaction.aHi2_prod+0.5*reaction.Thi_prod*(reaction.aHi3_prod+2*reaction.Thi_prod*(reaction.aHi4_prod+0.75*reaction.Thi_prod*reaction.aHi5_prod)/3))))
      Cp = R_const*((reaction.T<=reaction.Tlo_prod)*(reaction.aLo1_prod+reaction.Tlo_prod*(reaction.aLo2_prod+reaction.Tlo_prod*(reaction.aLo3_prod+reaction.Tlo_prod*(reaction.aLo4_prod+reaction.Tlo_prod*reaction.aLo5_prod))))+(reaction.T>reaction.Tlo_prod)*(reaction.T<=reaction.Tmid_prod)*(reaction.aLo1_prod+reaction.T*(reaction.aLo2_prod+reaction.T*(reaction.aLo3_prod+reaction.T*(reaction.aLo4_prod+reaction.T*reaction.aLo5_prod))))+(reaction.T>reaction.Tmid_prod)*(reaction.T<=reaction.Thi_prod)*(reaction.aHi1_prod+reaction.T*(reaction.aHi2_prod+reaction.T*(reaction.aHi3_prod+reaction.T*(reaction.aHi4_prod+reaction.T*reaction.aHi5_prod))))+(reaction.T>reaction.Thi_prod)*(reaction.aHi1_prod+reaction.Thi_prod*(reaction.aHi2_prod+reaction.Thi_prod*(reaction.aHi3_prod+reaction.Thi_prod*(reaction.aHi4_prod+reaction.Thi_prod*reaction.aHi5_prod)))))
      ReactionTagInSpecies = {rch4, rch6, rch9}
      specName = prod
      R = reaction.r_4+reaction.r_6+reaction.r_9
      mixtureSolvent = 1
    QD: SpeciesChem "Species: QD"
      sisDef = 1
      sSequenceNo = 13
      SpeciesSource = Reaction
      specLabel = QD
      h = R_const*((reaction.T<=reaction.Tlo_QD)*(reaction.aLo6_QD+reaction.Tlo_QD*(reaction.aLo1_QD+0.5*reaction.Tlo_QD*(reaction.aLo2_QD+2*reaction.Tlo_QD*(reaction.aLo3_QD+0.75*reaction.Tlo_QD*(reaction.aLo4_QD+0.8*reaction.Tlo_QD*reaction.aLo5_QD))/3)))+(reaction.T>reaction.Tlo_QD)*(reaction.T<=reaction.Tmid_QD)*(reaction.aLo6_QD+reaction.T*(reaction.aLo1_QD+0.5*reaction.T*(reaction.aLo2_QD+2*reaction.T*(reaction.aLo3_QD+0.75*reaction.T*(reaction.aLo4_QD+0.8*reaction.T*reaction.aLo5_QD))/3)))+(reaction.T>reaction.Tmid_QD)*(reaction.T<=reaction.Thi_QD)*(reaction.aHi6_QD+reaction.T*(reaction.aHi1_QD+0.5*reaction.T*(reaction.aHi2_QD+2*reaction.T*(reaction.aHi3_QD+0.75*reaction.T*(reaction.aHi4_QD+0.8*reaction.T*reaction.aHi5_QD))/3)))+(reaction.T>reaction.Thi_QD)*(reaction.aHi6_QD+reaction.Thi_QD*(reaction.aHi1_QD+0.5*reaction.Thi_QD*(reaction.aHi2_QD+2*reaction.Thi_QD*(reaction.aHi3_QD+0.75*reaction.Thi_QD*(reaction.aHi4_QD+0.8*reaction.Thi_QD*reaction.aHi5_QD))/3))))
      s = R_const*((reaction.T<=reaction.Tlo_QD)*(reaction.aLo7_QD+reaction.aLo1_QD*log(reaction.T/1[K])+reaction.Tlo_QD*(reaction.aLo2_QD+0.5*reaction.Tlo_QD*(reaction.aLo3_QD+2*reaction.Tlo_QD*(reaction.aLo4_QD+0.75*reaction.Tlo_QD*reaction.aLo5_QD)/3)))+(reaction.T>reaction.Tlo_QD)*(reaction.T<=reaction.Tmid_QD)*(reaction.aLo7_QD+reaction.aLo1_QD*log(reaction.T/1[K])+reaction.T*(reaction.aLo2_QD+0.5*reaction.T*(reaction.aLo3_QD+2*reaction.T*(reaction.aLo4_QD+0.75*reaction.T*reaction.aLo5_QD)/3)))+(reaction.T>reaction.Tmid_QD)*(reaction.T<=reaction.Thi_QD)*(reaction.aHi7_QD+reaction.aHi1_QD*log(reaction.T/1[K])+reaction.T*(reaction.aHi2_QD+0.5*reaction.T*(reaction.aHi3_QD+2*reaction.T*(reaction.aHi4_QD+0.75*reaction.T*reaction.aHi5_QD)/3)))+(reaction.T>reaction.Thi_QD)*(reaction.aHi7_QD+reaction.aHi1_QD*log(reaction.T/1[K])+reaction.Thi_QD*(reaction.aHi2_QD+0.5*reaction.Thi_QD*(reaction.aHi3_QD+2*reaction.Thi_QD*(reaction.aHi4_QD+0.75*reaction.Thi_QD*reaction.aHi5_QD)/3))))
      Cp = R_const*((reaction.T<=reaction.Tlo_QD)*(reaction.aLo1_QD+reaction.Tlo_QD*(reaction.aLo2_QD+reaction.Tlo_QD*(reaction.aLo3_QD+reaction.Tlo_QD*(reaction.aLo4_QD+reaction.Tlo_QD*reaction.aLo5_QD))))+(reaction.T>reaction.Tlo_QD)*(reaction.T<=reaction.Tmid_QD)*(reaction.aLo1_QD+reaction.T*(reaction.aLo2_QD+reaction.T*(reaction.aLo3_QD+reaction.T*(reaction.aLo4_QD+reaction.T*reaction.aLo5_QD))))+(reaction.T>reaction.Tmid_QD)*(reaction.T<=reaction.Thi_QD)*(reaction.aHi1_QD+reaction.T*(reaction.aHi2_QD+reaction.T*(reaction.aHi3_QD+reaction.T*(reaction.aHi4_QD+reaction.T*reaction.aHi5_QD))))+(reaction.T>reaction.Thi_QD)*(reaction.aHi1_QD+reaction.Thi_QD*(reaction.aHi2_QD+reaction.Thi_QD*(reaction.aHi3_QD+reaction.Thi_QD*(reaction.aHi4_QD+reaction.Thi_QD*reaction.aHi5_QD)))))
      ReactionTagInSpecies = {rch7, rch8}
      specName = QD
      R = reaction.r_7-reaction.r_8
      mixtureSolvent = 1
    rch1: ReactionChem "Ke: Q + DH => Qm + DHp"
      reset = 1
      formulaID = irrev_DH_DHp_Q_Qm_
      KeqNum = reaction.c_Qm*reaction.c_DHp*(1[m^3/mol])^2
      KeqDen = reaction.c_Q*reaction.c_DH*(1[m^3/mol])^2
      rIsValid = 1
      rType = irrev
      stoichArray = {-1, -1, 1, 1}
      fwdSpecies = {Q, DH}
      revSpecies = {Qm, DHp}
      fwdSpeciesTags = {Q, DH}
      revSpeciesTags = {Qm, DHp}
      Species = {Q, DH, Qm, DHp}
      textOverallOrder = Overall forward reaction order: 2
      bulkFwdOrder = 2
      bulkRevOrder = 2
      formula = Q+DH=>Qm+DHp
      kf = Ke*light(0.5)
    rch2: ReactionChem "KH: Qm + DHp => QH + D"
      reset = 1
      formulaID = irrev_D_DHp_QH_Qm_
      KeqNum = reaction.c_QH*reaction.c_D*(1[m^3/mol])^2
      KeqDen = reaction.c_Qm*reaction.c_DHp*(1[m^3/mol])^2
      rIsValid = 1
      rType = irrev
      stoichArray = {-1, -1, 1, 1}
      fwdSpecies = {Qm, DHp}
      revSpecies = {QH, D}
      fwdSpeciesTags = {Qm, DHp}
      revSpeciesTags = {QH, D}
      Species = {Qm, DHp, QH, D}
      textOverallOrder = Overall forward reaction order: 2
      bulkFwdOrder = 2
      bulkRevOrder = 2
      formula = Qm+DHp=>QH+D
      kf = KH
    rch3: ReactionChem "Kr: QH + D => QHD"
      reset = 1
      formulaID = irrev_D_QH_QHD_
      KeqNum = reaction.c_QHD*1[m^3/mol]
      KeqDen = reaction.c_QH*reaction.c_D*(1[m^3/mol])^2
      rIsValid = 1
      rType = irrev
      stoichArray = {-1, -1, 1}
      fwdSpecies = {QH, D}
      revSpecies = QHD
      fwdSpeciesTags = {QH, D}
      revSpeciesTags = QHD
      Species = {QH, D, QHD}
      textOverallOrder = Overall forward reaction order: 2
      bulkFwdOrder = 2
      bulkRevOrder = 1
      formula = QH+D=>QHD
      kf = Kr
    rch4: ReactionChem "Kp: QHD =>QHH + prod"
      reset = 1
      formulaID = irrev_prod_QHD_QHH_
      KeqNum = reaction.c_QHH*reaction.c_prod*(1[m^3/mol])^2
      KeqDen = reaction.c_QHD*1[m^3/mol]
      rIsValid = 1
      rType = irrev
      stoichArray = {-1, 1, 1}
      fwdSpecies = QHD
      revSpecies = {QHH, prod}
      fwdSpeciesTags = QHD
      revSpeciesTags = {QHH, prod}
      Species = {QHD, QHH, prod}
      textOverallOrder = Overall forward reaction order: 1
      bulkFwdOrder = 1
      bulkRevOrder = 2
      formula = QHD=>QHH+prod
      kf = Kp
    rch5: ReactionChem "KqH/Kdisp: Q + QHH <=> 2 QH"
      reset = 1
      formulaID = rev_Q_QH_QHH_
      KeqNum = (reaction.c_QH*1[m^3/mol])^2
      KeqDen = reaction.c_Q*reaction.c_QHH*(1[m^3/mol])^2
      rIsValid = 1
      stoichArray = {-1, -1, 2}
      fwdSpecies = {Q, QHH}
      revSpecies = QH
      fwdSpeciesTags = {Q, QHH}
      revSpeciesTags = QH
      Species = {Q, QHH, QH}
      textOverallOrder = Overall forward reaction order: 2 Overall reverse reaction order: 2
      bulkFwdOrder = 2
      bulkRevOrder = 2
      formula = Q+QHH<=>2QH
      kf = KqH
      kr = Kdisp
    rch6: ReactionChem "Kph: Q => prod"
      reset = 1
      formulaID = irrev_prod_Q_
      KeqNum = reaction.c_prod*1[m^3/mol]
      KeqDen = reaction.c_Q*1[m^3/mol]
      rIsValid = 1
      rType = irrev
      stoichArray = {-1, 1}
      fwdSpecies = Q
      revSpecies = prod
      fwdSpeciesTags = Q
      revSpeciesTags = prod
      Species = {Q, prod}
      textOverallOrder = Overall forward reaction order: 1
      bulkFwdOrder = 1
      bulkRevOrder = 1
      formula = Q=>prod
      kf = Kph
    rch7: ReactionChem "Ks: Q + QHD =>QH + QD"
      reset = 1
      formulaID = irrev_Q_QD_QH_QHD_
      KeqNum = reaction.c_QH*reaction.c_QD*(1[m^3/mol])^2
      KeqDen = reaction.c_Q*reaction.c_QHD*(1[m^3/mol])^2
      rIsValid = 1
      rType = irrev
      stoichArray = {-1, -1, 1, 1}
      fwdSpecies = {Q, QHD}
      revSpecies = {QH, QD}
      fwdSpeciesTags = {Q, QHD}
      revSpeciesTags = {QH, QD}
      Species = {Q, QHD, QH, QD}
      textOverallOrder = Overall forward reaction order: 2
      bulkFwdOrder = 2
      bulkRevOrder = 2
      formula = Q+QHD=>QH+QD
      kf = Ks
    rch8: ReactionChem "Kd/Kc: QD <=>Q + D"
      reset = 1
      formulaID = rev_D_Q_QD_
      KeqNum = reaction.c_Q*reaction.c_D*(1[m^3/mol])^2
      KeqDen = reaction.c_QD*1[m^3/mol]
      rIsValid = 1
      stoichArray = {-1, 1, 1}
      fwdSpecies = QD
      revSpecies = {Q, D}
      fwdSpeciesTags = QD
      revSpeciesTags = {Q, D}
      Species = {QD, Q, D}
      textOverallOrder = Overall forward reaction order: 1 Overall reverse reaction order: 2
      bulkFwdOrder = 1
      bulkRevOrder = 2
      formula = QD<=>Q+D
      kf = Kd
      kr = Kc
    rch9: ReactionChem "KrD: 2 D => prod"
      reset = 1
      formulaID = irrev_D_prod_
      KeqNum = reaction.c_prod*1[m^3/mol]
      KeqDen = (reaction.c_D*1[m^3/mol])^2
      rIsValid = 1
      rType = irrev
      stoichArray = {-2, 1}
      fwdSpecies = D
      revSpecies = prod
      fwdSpeciesTags = D
      revSpeciesTags = prod
      Species = {D, prod}
      textOverallOrder = Overall forward reaction order: 2
      bulkFwdOrder = 2
      bulkRevOrder = 1
      formula = 2D=>prod
      kf = KrD
    sync1: ReactionToMph "Generate Space-Dependent Model 1"
      geomToUse = geom1
      massbalance = tds
      study = Transient
      model = comp1
      genom = geom1
      studyname = std2
      Chemistry = chem1
  chem1: Chemistry [geom1] on all domains
    ShapeProperty.order = 1
    TPFeatureInput.T_src = userdef
    TPFeatureInput.T = 1
    mixture.mixture = liquid
    ChemistryModelInputParameter.MassTransfer = tds
    ChemistryModelInputParameter.Species = {D, DH, DHp, Q, QD, QH, QHD, QHH, Qm, prod}
    ChemistryModelInputParameter.SpeciesInputType = {Variable, Variable, Variable, Variable, Variable, Variable, Variable, Variable, Variable, Variable}
    ChemistryModelInputParameter.ConcentrationInput = {cD, cDH, cDHp, cQ, cQD, cQH, cQHD, cQHH, cQm, cprod}
    ChemistryModelInputParameter.ConcentrationValue = {Solved for, Solved for, Solved for, Solved for, Solved for, Solved for, Solved for, Solved for, Solved for, Solved for}
    ChemistryModelInputParameter.PackageSpecies = {none, none, none, none, none, none, none, none, none, none}
    ChemistryModelInputParameter.Notes = {chem.R_D, chem.R_DH, chem.R_DHp, chem.R_Q, chem.R_QD, chem.R_QH, chem.R_QHD, chem.R_QHH, chem.R_Qm, chem.R_prod}
    ChemistryModelInputParameter.Unit = {mol/m^3, mol/m^3, mol/m^3, mol/m^3, mol/m^3, mol/m^3, mol/m^3, mol/m^3, mol/m^3, mol/m^3}
    ChemistryModelInputParameter.uselog = {cD, cDH, cDHp, cQ, cQD, cQH, cQHD, cQHH, cQm, cprod}
    calcTransport.calcTransport = 0
    calcTransport.dynamicViscositySel = UserDefined
    simpropChem.sSequenceNo = 13
    ActiveSpecies.SumActiveSpecies = 10
    ActiveSpecies.NumActiveVolumeSpecies = 10
    rch1: ReactionChem "Ke: Q + DH => Qm + DHp" on all domains
      reset = 1
      formulaID = irrev_DH_DHp_Q_Qm_
      KeqNum = chem.c_Qm*chem.c_DHp*(1[m^3/mol])^2
      KeqDen = chem.c_Q*chem.c_DH*(1[m^3/mol])^2
      rIsValid = 1
      rType = irrev
      stoichArray = {-1, -1, 1, 1}
      fwdSpecies = {Q, DH}
      revSpecies = {Qm, DHp}
      fwdSpeciesTags = {Q, DH}
      revSpeciesTags = {Qm, DHp}
      Species = {Q, DH, Qm, DHp}
      textOverallOrder = Overall forward reaction order: 2
      bulkFwdOrder = 2
      bulkRevOrder = 2
      formula = Q+DH=>Qm+DHp
      kf = Ke*light(x)
    Q: SpeciesChem "Species: Q" on all domains
      h = R_const*((chem.T<=chem.Tlo_Q)*(chem.aLo6_Q+chem.Tlo_Q*(chem.aLo1_Q+0.5*chem.Tlo_Q*(chem.aLo2_Q+2*chem.Tlo_Q*(chem.aLo3_Q+0.75*chem.Tlo_Q*(chem.aLo4_Q+0.8*chem.Tlo_Q*chem.aLo5_Q))/3)))+(chem.T>chem.Tlo_Q)*(chem.T<=chem.Tmid_Q)*(chem.aLo6_Q+chem.T*(chem.aLo1_Q+0.5*chem.T*(chem.aLo2_Q+2*chem.T*(chem.aLo3_Q+0.75*chem.T*(chem.aLo4_Q+0.8*chem.T*chem.aLo5_Q))/3)))+(chem.T>chem.Tmid_Q)*(chem.T<=chem.Thi_Q)*(chem.aHi6_Q+chem.T*(chem.aHi1_Q+0.5*chem.T*(chem.aHi2_Q+2*chem.T*(chem.aHi3_Q+0.75*chem.T*(chem.aHi4_Q+0.8*chem.T*chem.aHi5_Q))/3)))+(chem.T>chem.Thi_Q)*(chem.aHi6_Q+chem.Thi_Q*(chem.aHi1_Q+0.5*chem.Thi_Q*(chem.aHi2_Q+2*chem.Thi_Q*(chem.aHi3_Q+0.75*chem.Thi_Q*(chem.aHi4_Q+0.8*chem.Thi_Q*chem.aHi5_Q))/3))))
      s = R_const*((chem.T<=chem.Tlo_Q)*(chem.aLo7_Q+chem.aLo1_Q*log(chem.T/1[K])+chem.Tlo_Q*(chem.aLo2_Q+0.5*chem.Tlo_Q*(chem.aLo3_Q+2*chem.Tlo_Q*(chem.aLo4_Q+0.75*chem.Tlo_Q*chem.aLo5_Q)/3)))+(chem.T>chem.Tlo_Q)*(chem.T<=chem.Tmid_Q)*(chem.aLo7_Q+chem.aLo1_Q*log(chem.T/1[K])+chem.T*(chem.aLo2_Q+0.5*chem.T*(chem.aLo3_Q+2*chem.T*(chem.aLo4_Q+0.75*chem.T*chem.aLo5_Q)/3)))+(chem.T>chem.Tmid_Q)*(chem.T<=chem.Thi_Q)*(chem.aHi7_Q+chem.aHi1_Q*log(chem.T/1[K])+chem.T*(chem.aHi2_Q+0.5*chem.T*(chem.aHi3_Q+2*chem.T*(chem.aHi4_Q+0.75*chem.T*chem.aHi5_Q)/3)))+(chem.T>chem.Thi_Q)*(chem.aHi7_Q+chem.aHi1_Q*log(chem.T/1[K])+chem.Thi_Q*(chem.aHi2_Q+0.5*chem.Thi_Q*(chem.aHi3_Q+2*chem.Thi_Q*(chem.aHi4_Q+0.75*chem.Thi_Q*chem.aHi5_Q)/3))))
      Cp = R_const*((chem.T<=chem.Tlo_Q)*(chem.aLo1_Q+chem.Tlo_Q*(chem.aLo2_Q+chem.Tlo_Q*(chem.aLo3_Q+chem.Tlo_Q*(chem.aLo4_Q+chem.Tlo_Q*chem.aLo5_Q))))+(chem.T>chem.Tlo_Q)*(chem.T<=chem.Tmid_Q)*(chem.aLo1_Q+chem.T*(chem.aLo2_Q+chem.T*(chem.aLo3_Q+chem.T*(chem.aLo4_Q+chem.T*chem.aLo5_Q))))+(chem.T>chem.Tmid_Q)*(chem.T<=chem.Thi_Q)*(chem.aHi1_Q+chem.T*(chem.aHi2_Q+chem.T*(chem.aHi3_Q+chem.T*(chem.aHi4_Q+chem.T*chem.aHi5_Q))))+(chem.T>chem.Thi_Q)*(chem.aHi1_Q+chem.Thi_Q*(chem.aHi2_Q+chem.Thi_Q*(chem.aHi3_Q+chem.Thi_Q*(chem.aHi4_Q+chem.Thi_Q*chem.aHi5_Q)))))
      ReactionTagInSpecies = {rch1, rch5, rch6, rch7, rch8}
      R = -chem.r_1-chem.r_5-chem.r_6-chem.r_7+chem.r_8
      mixtureSolvent = 1
      M = Q_mass
    DH: SpeciesChem "Species: DH" on all domains
      h = R_const*((chem.T<=chem.Tlo_DH)*(chem.aLo6_DH+chem.Tlo_DH*(chem.aLo1_DH+0.5*chem.Tlo_DH*(chem.aLo2_DH+2*chem.Tlo_DH*(chem.aLo3_DH+0.75*chem.Tlo_DH*(chem.aLo4_DH+0.8*chem.Tlo_DH*chem.aLo5_DH))/3)))+(chem.T>chem.Tlo_DH)*(chem.T<=chem.Tmid_DH)*(chem.aLo6_DH+chem.T*(chem.aLo1_DH+0.5*chem.T*(chem.aLo2_DH+2*chem.T*(chem.aLo3_DH+0.75*chem.T*(chem.aLo4_DH+0.8*chem.T*chem.aLo5_DH))/3)))+(chem.T>chem.Tmid_DH)*(chem.T<=chem.Thi_DH)*(chem.aHi6_DH+chem.T*(chem.aHi1_DH+0.5*chem.T*(chem.aHi2_DH+2*chem.T*(chem.aHi3_DH+0.75*chem.T*(chem.aHi4_DH+0.8*chem.T*chem.aHi5_DH))/3)))+(chem.T>chem.Thi_DH)*(chem.aHi6_DH+chem.Thi_DH*(chem.aHi1_DH+0.5*chem.Thi_DH*(chem.aHi2_DH+2*chem.Thi_DH*(chem.aHi3_DH+0.75*chem.Thi_DH*(chem.aHi4_DH+0.8*chem.Thi_DH*chem.aHi5_DH))/3))))
      s = R_const*((chem.T<=chem.Tlo_DH)*(chem.aLo7_DH+chem.aLo1_DH*log(chem.T/1[K])+chem.Tlo_DH*(chem.aLo2_DH+0.5*chem.Tlo_DH*(chem.aLo3_DH+2*chem.Tlo_DH*(chem.aLo4_DH+0.75*chem.Tlo_DH*chem.aLo5_DH)/3)))+(chem.T>chem.Tlo_DH)*(chem.T<=chem.Tmid_DH)*(chem.aLo7_DH+chem.aLo1_DH*log(chem.T/1[K])+chem.T*(chem.aLo2_DH+0.5*chem.T*(chem.aLo3_DH+2*chem.T*(chem.aLo4_DH+0.75*chem.T*chem.aLo5_DH)/3)))+(chem.T>chem.Tmid_DH)*(chem.T<=chem.Thi_DH)*(chem.aHi7_DH+chem.aHi1_DH*log(chem.T/1[K])+chem.T*(chem.aHi2_DH+0.5*chem.T*(chem.aHi3_DH+2*chem.T*(chem.aHi4_DH+0.75*chem.T*chem.aHi5_DH)/3)))+(chem.T>chem.Thi_DH)*(chem.aHi7_DH+chem.aHi1_DH*log(chem.T/1[K])+chem.Thi_DH*(chem.aHi2_DH+0.5*chem.Thi_DH*(chem.aHi3_DH+2*chem.Thi_DH*(chem.aHi4_DH+0.75*chem.Thi_DH*chem.aHi5_DH)/3))))
      Cp = R_const*((chem.T<=chem.Tlo_DH)*(chem.aLo1_DH+chem.Tlo_DH*(chem.aLo2_DH+chem.Tlo_DH*(chem.aLo3_DH+chem.Tlo_DH*(chem.aLo4_DH+chem.Tlo_DH*chem.aLo5_DH))))+(chem.T>chem.Tlo_DH)*(chem.T<=chem.Tmid_DH)*(chem.aLo1_DH+chem.T*(chem.aLo2_DH+chem.T*(chem.aLo3_DH+chem.T*(chem.aLo4_DH+chem.T*chem.aLo5_DH))))+(chem.T>chem.Tmid_DH)*(chem.T<=chem.Thi_DH)*(chem.aHi1_DH+chem.T*(chem.aHi2_DH+chem.T*(chem.aHi3_DH+chem.T*(chem.aHi4_DH+chem.T*chem.aHi5_DH))))+(chem.T>chem.Thi_DH)*(chem.aHi1_DH+chem.Thi_DH*(chem.aHi2_DH+chem.Thi_DH*(chem.aHi3_DH+chem.Thi_DH*(chem.aHi4_DH+chem.Thi_DH*chem.aHi5_DH)))))
      mixtureSolvent = 1
      M = root.DH_mass
    Qm: SpeciesChem "Species: Qm" on all domains
      z = -1
      h = R_const*((chem.T<=chem.Tlo_Qm)*(chem.aLo6_Qm+chem.Tlo_Qm*(chem.aLo1_Qm+0.5*chem.Tlo_Qm*(chem.aLo2_Qm+2*chem.Tlo_Qm*(chem.aLo3_Qm+0.75*chem.Tlo_Qm*(chem.aLo4_Qm+0.8*chem.Tlo_Qm*chem.aLo5_Qm))/3)))+(chem.T>chem.Tlo_Qm)*(chem.T<=chem.Tmid_Qm)*(chem.aLo6_Qm+chem.T*(chem.aLo1_Qm+0.5*chem.T*(chem.aLo2_Qm+2*chem.T*(chem.aLo3_Qm+0.75*chem.T*(chem.aLo4_Qm+0.8*chem.T*chem.aLo5_Qm))/3)))+(chem.T>chem.Tmid_Qm)*(chem.T<=chem.Thi_Qm)*(chem.aHi6_Qm+chem.T*(chem.aHi1_Qm+0.5*chem.T*(chem.aHi2_Qm+2*chem.T*(chem.aHi3_Qm+0.75*chem.T*(chem.aHi4_Qm+0.8*chem.T*chem.aHi5_Qm))/3)))+(chem.T>chem.Thi_Qm)*(chem.aHi6_Qm+chem.Thi_Qm*(chem.aHi1_Qm+0.5*chem.Thi_Qm*(chem.aHi2_Qm+2*chem.Thi_Qm*(chem.aHi3_Qm+0.75*chem.Thi_Qm*(chem.aHi4_Qm+0.8*chem.Thi_Qm*chem.aHi5_Qm))/3))))
      s = R_const*((chem.T<=chem.Tlo_Qm)*(chem.aLo7_Qm+chem.aLo1_Qm*log(chem.T/1[K])+chem.Tlo_Qm*(chem.aLo2_Qm+0.5*chem.Tlo_Qm*(chem.aLo3_Qm+2*chem.Tlo_Qm*(chem.aLo4_Qm+0.75*chem.Tlo_Qm*chem.aLo5_Qm)/3)))+(chem.T>chem.Tlo_Qm)*(chem.T<=chem.Tmid_Qm)*(chem.aLo7_Qm+chem.aLo1_Qm*log(chem.T/1[K])+chem.T*(chem.aLo2_Qm+0.5*chem.T*(chem.aLo3_Qm+2*chem.T*(chem.aLo4_Qm+0.75*chem.T*chem.aLo5_Qm)/3)))+(chem.T>chem.Tmid_Qm)*(chem.T<=chem.Thi_Qm)*(chem.aHi7_Qm+chem.aHi1_Qm*log(chem.T/1[K])+chem.T*(chem.aHi2_Qm+0.5*chem.T*(chem.aHi3_Qm+2*chem.T*(chem.aHi4_Qm+0.75*chem.T*chem.aHi5_Qm)/3)))+(chem.T>chem.Thi_Qm)*(chem.aHi7_Qm+chem.aHi1_Qm*log(chem.T/1[K])+chem.Thi_Qm*(chem.aHi2_Qm+0.5*chem.Thi_Qm*(chem.aHi3_Qm+2*chem.Thi_Qm*(chem.aHi4_Qm+0.75*chem.Thi_Qm*chem.aHi5_Qm)/3))))
      Cp = R_const*((chem.T<=chem.Tlo_Qm)*(chem.aLo1_Qm+chem.Tlo_Qm*(chem.aLo2_Qm+chem.Tlo_Qm*(chem.aLo3_Qm+chem.Tlo_Qm*(chem.aLo4_Qm+chem.Tlo_Qm*chem.aLo5_Qm))))+(chem.T>chem.Tlo_Qm)*(chem.T<=chem.Tmid_Qm)*(chem.aLo1_Qm+chem.T*(chem.aLo2_Qm+chem.T*(chem.aLo3_Qm+chem.T*(chem.aLo4_Qm+chem.T*chem.aLo5_Qm))))+(chem.T>chem.Tmid_Qm)*(chem.T<=chem.Thi_Qm)*(chem.aHi1_Qm+chem.T*(chem.aHi2_Qm+chem.T*(chem.aHi3_Qm+chem.T*(chem.aHi4_Qm+chem.T*chem.aHi5_Qm))))+(chem.T>chem.Thi_Qm)*(chem.aHi1_Qm+chem.Thi_Qm*(chem.aHi2_Qm+chem.Thi_Qm*(chem.aHi3_Qm+chem.Thi_Qm*(chem.aHi4_Qm+chem.Thi_Qm*chem.aHi5_Qm)))))
      ReactionTagInSpecies = {rch1, rch2}
      R = chem.r_1-chem.r_2
      mixtureSolvent = 1
      M = root.Qm_mass
    DHp: SpeciesChem "Species: DHp" on all domains
      z = 1
      h = R_const*((chem.T<=chem.Tlo_DHp)*(chem.aLo6_DHp+chem.Tlo_DHp*(chem.aLo1_DHp+0.5*chem.Tlo_DHp*(chem.aLo2_DHp+2*chem.Tlo_DHp*(chem.aLo3_DHp+0.75*chem.Tlo_DHp*(chem.aLo4_DHp+0.8*chem.Tlo_DHp*chem.aLo5_DHp))/3)))+(chem.T>chem.Tlo_DHp)*(chem.T<=chem.Tmid_DHp)*(chem.aLo6_DHp+chem.T*(chem.aLo1_DHp+0.5*chem.T*(chem.aLo2_DHp+2*chem.T*(chem.aLo3_DHp+0.75*chem.T*(chem.aLo4_DHp+0.8*chem.T*chem.aLo5_DHp))/3)))+(chem.T>chem.Tmid_DHp)*(chem.T<=chem.Thi_DHp)*(chem.aHi6_DHp+chem.T*(chem.aHi1_DHp+0.5*chem.T*(chem.aHi2_DHp+2*chem.T*(chem.aHi3_DHp+0.75*chem.T*(chem.aHi4_DHp+0.8*chem.T*chem.aHi5_DHp))/3)))+(chem.T>chem.Thi_DHp)*(chem.aHi6_DHp+chem.Thi_DHp*(chem.aHi1_DHp+0.5*chem.Thi_DHp*(chem.aHi2_DHp+2*chem.Thi_DHp*(chem.aHi3_DHp+0.75*chem.Thi_DHp*(chem.aHi4_DHp+0.8*chem.Thi_DHp*chem.aHi5_DHp))/3))))
      s = R_const*((chem.T<=chem.Tlo_DHp)*(chem.aLo7_DHp+chem.aLo1_DHp*log(chem.T/1[K])+chem.Tlo_DHp*(chem.aLo2_DHp+0.5*chem.Tlo_DHp*(chem.aLo3_DHp+2*chem.Tlo_DHp*(chem.aLo4_DHp+0.75*chem.Tlo_DHp*chem.aLo5_DHp)/3)))+(chem.T>chem.Tlo_DHp)*(chem.T<=chem.Tmid_DHp)*(chem.aLo7_DHp+chem.aLo1_DHp*log(chem.T/1[K])+chem.T*(chem.aLo2_DHp+0.5*chem.T*(chem.aLo3_DHp+2*chem.T*(chem.aLo4_DHp+0.75*chem.T*chem.aLo5_DHp)/3)))+(chem.T>chem.Tmid_DHp)*(chem.T<=chem.Thi_DHp)*(chem.aHi7_DHp+chem.aHi1_DHp*log(chem.T/1[K])+chem.T*(chem.aHi2_DHp+0.5*chem.T*(chem.aHi3_DHp+2*chem.T*(chem.aHi4_DHp+0.75*chem.T*chem.aHi5_DHp)/3)))+(chem.T>chem.Thi_DHp)*(chem.aHi7_DHp+chem.aHi1_DHp*log(chem.T/1[K])+chem.Thi_DHp*(chem.aHi2_DHp+0.5*chem.Thi_DHp*(chem.aHi3_DHp+2*chem.Thi_DHp*(chem.aHi4_DHp+0.75*chem.Thi_DHp*chem.aHi5_DHp)/3))))
      Cp = R_const*((chem.T<=chem.Tlo_DHp)*(chem.aLo1_DHp+chem.Tlo_DHp*(chem.aLo2_DHp+chem.Tlo_DHp*(chem.aLo3_DHp+chem.Tlo_DHp*(chem.aLo4_DHp+chem.Tlo_DHp*chem.aLo5_DHp))))+(chem.T>chem.Tlo_DHp)*(chem.T<=chem.Tmid_DHp)*(chem.aLo1_DHp+chem.T*(chem.aLo2_DHp+chem.T*(chem.aLo3_DHp+chem.T*(chem.aLo4_DHp+chem.T*chem.aLo5_DHp))))+(chem.T>chem.Tmid_DHp)*(chem.T<=chem.Thi_DHp)*(chem.aHi1_DHp+chem.T*(chem.aHi2_DHp+chem.T*(chem.aHi3_DHp+chem.T*(chem.aHi4_DHp+chem.T*chem.aHi5_DHp))))+(chem.T>chem.Thi_DHp)*(chem.aHi1_DHp+chem.Thi_DHp*(chem.aHi2_DHp+chem.Thi_DHp*(chem.aHi3_DHp+chem.Thi_DHp*(chem.aHi4_DHp+chem.Thi_DHp*chem.aHi5_DHp)))))
      ReactionTagInSpecies = {rch1, rch2}
      R = chem.r_1-chem.r_2
      mixtureSolvent = 1
      M = root.DHp_mass
    rch2: ReactionChem "KH: Qm + DHp => QH + D" on all domains
      reset = 1
      formulaID = irrev_D_DHp_QH_Qm_
      KeqNum = chem.c_QH*chem.c_D*(1[m^3/mol])^2
      KeqDen = chem.c_Qm*chem.c_DHp*(1[m^3/mol])^2
      rIsValid = 1
      rType = irrev
      stoichArray = {-1, -1, 1, 1}
      fwdSpecies = {Qm, DHp}
      revSpecies = {QH, D}
      fwdSpeciesTags = {Qm, DHp}
      revSpeciesTags = {QH, D}
      Species = {Qm, DHp, QH, D}
      textOverallOrder = Overall forward reaction order: 2
      bulkFwdOrder = 2
      bulkRevOrder = 2
      formula = Qm+DHp=>QH+D
      kf = KH
    QH: SpeciesChem "Species: QH" on all domains
      h = R_const*((chem.T<=chem.Tlo_QH)*(chem.aLo6_QH+chem.Tlo_QH*(chem.aLo1_QH+0.5*chem.Tlo_QH*(chem.aLo2_QH+2*chem.Tlo_QH*(chem.aLo3_QH+0.75*chem.Tlo_QH*(chem.aLo4_QH+0.8*chem.Tlo_QH*chem.aLo5_QH))/3)))+(chem.T>chem.Tlo_QH)*(chem.T<=chem.Tmid_QH)*(chem.aLo6_QH+chem.T*(chem.aLo1_QH+0.5*chem.T*(chem.aLo2_QH+2*chem.T*(chem.aLo3_QH+0.75*chem.T*(chem.aLo4_QH+0.8*chem.T*chem.aLo5_QH))/3)))+(chem.T>chem.Tmid_QH)*(chem.T<=chem.Thi_QH)*(chem.aHi6_QH+chem.T*(chem.aHi1_QH+0.5*chem.T*(chem.aHi2_QH+2*chem.T*(chem.aHi3_QH+0.75*chem.T*(chem.aHi4_QH+0.8*chem.T*chem.aHi5_QH))/3)))+(chem.T>chem.Thi_QH)*(chem.aHi6_QH+chem.Thi_QH*(chem.aHi1_QH+0.5*chem.Thi_QH*(chem.aHi2_QH+2*chem.Thi_QH*(chem.aHi3_QH+0.75*chem.Thi_QH*(chem.aHi4_QH+0.8*chem.Thi_QH*chem.aHi5_QH))/3))))
      s = R_const*((chem.T<=chem.Tlo_QH)*(chem.aLo7_QH+chem.aLo1_QH*log(chem.T/1[K])+chem.Tlo_QH*(chem.aLo2_QH+0.5*chem.Tlo_QH*(chem.aLo3_QH+2*chem.Tlo_QH*(chem.aLo4_QH+0.75*chem.Tlo_QH*chem.aLo5_QH)/3)))+(chem.T>chem.Tlo_QH)*(chem.T<=chem.Tmid_QH)*(chem.aLo7_QH+chem.aLo1_QH*log(chem.T/1[K])+chem.T*(chem.aLo2_QH+0.5*chem.T*(chem.aLo3_QH+2*chem.T*(chem.aLo4_QH+0.75*chem.T*chem.aLo5_QH)/3)))+(chem.T>chem.Tmid_QH)*(chem.T<=chem.Thi_QH)*(chem.aHi7_QH+chem.aHi1_QH*log(chem.T/1[K])+chem.T*(chem.aHi2_QH+0.5*chem.T*(chem.aHi3_QH+2*chem.T*(chem.aHi4_QH+0.75*chem.T*chem.aHi5_QH)/3)))+(chem.T>chem.Thi_QH)*(chem.aHi7_QH+chem.aHi1_QH*log(chem.T/1[K])+chem.Thi_QH*(chem.aHi2_QH+0.5*chem.Thi_QH*(chem.aHi3_QH+2*chem.Thi_QH*(chem.aHi4_QH+0.75*chem.Thi_QH*chem.aHi5_QH)/3))))
      Cp = R_const*((chem.T<=chem.Tlo_QH)*(chem.aLo1_QH+chem.Tlo_QH*(chem.aLo2_QH+chem.Tlo_QH*(chem.aLo3_QH+chem.Tlo_QH*(chem.aLo4_QH+chem.Tlo_QH*chem.aLo5_QH))))+(chem.T>chem.Tlo_QH)*(chem.T<=chem.Tmid_QH)*(chem.aLo1_QH+chem.T*(chem.aLo2_QH+chem.T*(chem.aLo3_QH+chem.T*(chem.aLo4_QH+chem.T*chem.aLo5_QH))))+(chem.T>chem.Tmid_QH)*(chem.T<=chem.Thi_QH)*(chem.aHi1_QH+chem.T*(chem.aHi2_QH+chem.T*(chem.aHi3_QH+chem.T*(chem.aHi4_QH+chem.T*chem.aHi5_QH))))+(chem.T>chem.Thi_QH)*(chem.aHi1_QH+chem.Thi_QH*(chem.aHi2_QH+chem.Thi_QH*(chem.aHi3_QH+chem.Thi_QH*(chem.aHi4_QH+chem.Thi_QH*chem.aHi5_QH)))))
      ReactionTagInSpecies = {rch2, rch3, rch5, rch7}
      R = chem.r_2-chem.r_3+2*chem.r_5+chem.r_7
      mixtureSolvent = 1
      M = root.QH_mass
    D: SpeciesChem "Species: D" on all domains
      h = R_const*((chem.T<=chem.Tlo_D)*(chem.aLo6_D+chem.Tlo_D*(chem.aLo1_D+0.5*chem.Tlo_D*(chem.aLo2_D+2*chem.Tlo_D*(chem.aLo3_D+0.75*chem.Tlo_D*(chem.aLo4_D+0.8*chem.Tlo_D*chem.aLo5_D))/3)))+(chem.T>chem.Tlo_D)*(chem.T<=chem.Tmid_D)*(chem.aLo6_D+chem.T*(chem.aLo1_D+0.5*chem.T*(chem.aLo2_D+2*chem.T*(chem.aLo3_D+0.75*chem.T*(chem.aLo4_D+0.8*chem.T*chem.aLo5_D))/3)))+(chem.T>chem.Tmid_D)*(chem.T<=chem.Thi_D)*(chem.aHi6_D+chem.T*(chem.aHi1_D+0.5*chem.T*(chem.aHi2_D+2*chem.T*(chem.aHi3_D+0.75*chem.T*(chem.aHi4_D+0.8*chem.T*chem.aHi5_D))/3)))+(chem.T>chem.Thi_D)*(chem.aHi6_D+chem.Thi_D*(chem.aHi1_D+0.5*chem.Thi_D*(chem.aHi2_D+2*chem.Thi_D*(chem.aHi3_D+0.75*chem.Thi_D*(chem.aHi4_D+0.8*chem.Thi_D*chem.aHi5_D))/3))))
      s = R_const*((chem.T<=chem.Tlo_D)*(chem.aLo7_D+chem.aLo1_D*log(chem.T/1[K])+chem.Tlo_D*(chem.aLo2_D+0.5*chem.Tlo_D*(chem.aLo3_D+2*chem.Tlo_D*(chem.aLo4_D+0.75*chem.Tlo_D*chem.aLo5_D)/3)))+(chem.T>chem.Tlo_D)*(chem.T<=chem.Tmid_D)*(chem.aLo7_D+chem.aLo1_D*log(chem.T/1[K])+chem.T*(chem.aLo2_D+0.5*chem.T*(chem.aLo3_D+2*chem.T*(chem.aLo4_D+0.75*chem.T*chem.aLo5_D)/3)))+(chem.T>chem.Tmid_D)*(chem.T<=chem.Thi_D)*(chem.aHi7_D+chem.aHi1_D*log(chem.T/1[K])+chem.T*(chem.aHi2_D+0.5*chem.T*(chem.aHi3_D+2*chem.T*(chem.aHi4_D+0.75*chem.T*chem.aHi5_D)/3)))+(chem.T>chem.Thi_D)*(chem.aHi7_D+chem.aHi1_D*log(chem.T/1[K])+chem.Thi_D*(chem.aHi2_D+0.5*chem.Thi_D*(chem.aHi3_D+2*chem.Thi_D*(chem.aHi4_D+0.75*chem.Thi_D*chem.aHi5_D)/3))))
      Cp = R_const*((chem.T<=chem.Tlo_D)*(chem.aLo1_D+chem.Tlo_D*(chem.aLo2_D+chem.Tlo_D*(chem.aLo3_D+chem.Tlo_D*(chem.aLo4_D+chem.Tlo_D*chem.aLo5_D))))+(chem.T>chem.Tlo_D)*(chem.T<=chem.Tmid_D)*(chem.aLo1_D+chem.T*(chem.aLo2_D+chem.T*(chem.aLo3_D+chem.T*(chem.aLo4_D+chem.T*chem.aLo5_D))))+(chem.T>chem.Tmid_D)*(chem.T<=chem.Thi_D)*(chem.aHi1_D+chem.T*(chem.aHi2_D+chem.T*(chem.aHi3_D+chem.T*(chem.aHi4_D+chem.T*chem.aHi5_D))))+(chem.T>chem.Thi_D)*(chem.aHi1_D+chem.Thi_D*(chem.aHi2_D+chem.Thi_D*(chem.aHi3_D+chem.Thi_D*(chem.aHi4_D+chem.Thi_D*chem.aHi5_D)))))
      ReactionTagInSpecies = {rch2, rch3, rch8, rch9}
      R = chem.r_2-chem.r_3+chem.r_8-2*chem.r_9
      mixtureSolvent = 1
      M = root.D_mass
    rch3: ReactionChem "Kr: QH + D => QHD" on all domains
      reset = 1
      formulaID = irrev_D_QH_QHD_
      KeqNum = chem.c_QHD*1[m^3/mol]
      KeqDen = chem.c_QH*chem.c_D*(1[m^3/mol])^2
      rIsValid = 1
      rType = irrev
      stoichArray = {-1, -1, 1}
      fwdSpecies = {QH, D}
      revSpecies = QHD
      fwdSpeciesTags = {QH, D}
      revSpeciesTags = QHD
      Species = {QH, D, QHD}
      textOverallOrder = Overall forward reaction order: 2
      bulkFwdOrder = 2
      bulkRevOrder = 1
      formula = QH+D=>QHD
      kf = Kr
    QHD: SpeciesChem "Species: QHD" on all domains
      h = R_const*((chem.T<=chem.Tlo_QHD)*(chem.aLo6_QHD+chem.Tlo_QHD*(chem.aLo1_QHD+0.5*chem.Tlo_QHD*(chem.aLo2_QHD+2*chem.Tlo_QHD*(chem.aLo3_QHD+0.75*chem.Tlo_QHD*(chem.aLo4_QHD+0.8*chem.Tlo_QHD*chem.aLo5_QHD))/3)))+(chem.T>chem.Tlo_QHD)*(chem.T<=chem.Tmid_QHD)*(chem.aLo6_QHD+chem.T*(chem.aLo1_QHD+0.5*chem.T*(chem.aLo2_QHD+2*chem.T*(chem.aLo3_QHD+0.75*chem.T*(chem.aLo4_QHD+0.8*chem.T*chem.aLo5_QHD))/3)))+(chem.T>chem.Tmid_QHD)*(chem.T<=chem.Thi_QHD)*(chem.aHi6_QHD+chem.T*(chem.aHi1_QHD+0.5*chem.T*(chem.aHi2_QHD+2*chem.T*(chem.aHi3_QHD+0.75*chem.T*(chem.aHi4_QHD+0.8*chem.T*chem.aHi5_QHD))/3)))+(chem.T>chem.Thi_QHD)*(chem.aHi6_QHD+chem.Thi_QHD*(chem.aHi1_QHD+0.5*chem.Thi_QHD*(chem.aHi2_QHD+2*chem.Thi_QHD*(chem.aHi3_QHD+0.75*chem.Thi_QHD*(chem.aHi4_QHD+0.8*chem.Thi_QHD*chem.aHi5_QHD))/3))))
      s = R_const*((chem.T<=chem.Tlo_QHD)*(chem.aLo7_QHD+chem.aLo1_QHD*log(chem.T/1[K])+chem.Tlo_QHD*(chem.aLo2_QHD+0.5*chem.Tlo_QHD*(chem.aLo3_QHD+2*chem.Tlo_QHD*(chem.aLo4_QHD+0.75*chem.Tlo_QHD*chem.aLo5_QHD)/3)))+(chem.T>chem.Tlo_QHD)*(chem.T<=chem.Tmid_QHD)*(chem.aLo7_QHD+chem.aLo1_QHD*log(chem.T/1[K])+chem.T*(chem.aLo2_QHD+0.5*chem.T*(chem.aLo3_QHD+2*chem.T*(chem.aLo4_QHD+0.75*chem.T*chem.aLo5_QHD)/3)))+(chem.T>chem.Tmid_QHD)*(chem.T<=chem.Thi_QHD)*(chem.aHi7_QHD+chem.aHi1_QHD*log(chem.T/1[K])+chem.T*(chem.aHi2_QHD+0.5*chem.T*(chem.aHi3_QHD+2*chem.T*(chem.aHi4_QHD+0.75*chem.T*chem.aHi5_QHD)/3)))+(chem.T>chem.Thi_QHD)*(chem.aHi7_QHD+chem.aHi1_QHD*log(chem.T/1[K])+chem.Thi_QHD*(chem.aHi2_QHD+0.5*chem.Thi_QHD*(chem.aHi3_QHD+2*chem.Thi_QHD*(chem.aHi4_QHD+0.75*chem.Thi_QHD*chem.aHi5_QHD)/3))))
      Cp = R_const*((chem.T<=chem.Tlo_QHD)*(chem.aLo1_QHD+chem.Tlo_QHD*(chem.aLo2_QHD+chem.Tlo_QHD*(chem.aLo3_QHD+chem.Tlo_QHD*(chem.aLo4_QHD+chem.Tlo_QHD*chem.aLo5_QHD))))+(chem.T>chem.Tlo_QHD)*(chem.T<=chem.Tmid_QHD)*(chem.aLo1_QHD+chem.T*(chem.aLo2_QHD+chem.T*(chem.aLo3_QHD+chem.T*(chem.aLo4_QHD+chem.T*chem.aLo5_QHD))))+(chem.T>chem.Tmid_QHD)*(chem.T<=chem.Thi_QHD)*(chem.aHi1_QHD+chem.T*(chem.aHi2_QHD+chem.T*(chem.aHi3_QHD+chem.T*(chem.aHi4_QHD+chem.T*chem.aHi5_QHD))))+(chem.T>chem.Thi_QHD)*(chem.aHi1_QHD+chem.Thi_QHD*(chem.aHi2_QHD+chem.Thi_QHD*(chem.aHi3_QHD+chem.Thi_QHD*(chem.aHi4_QHD+chem.Thi_QHD*chem.aHi5_QHD)))))
      ReactionTagInSpecies = {rch3, rch4, rch7}
      R = chem.r_3-chem.r_4-chem.r_7
      mixtureSolvent = 1
      M = root.QHD_mass
    rch4: ReactionChem "Kp: QHD =>QHH + prod" on all domains
      reset = 1
      formulaID = irrev_prod_QHD_QHH_
      KeqNum = chem.c_QHH*chem.c_prod*(1[m^3/mol])^2
      KeqDen = chem.c_QHD*1[m^3/mol]
      rIsValid = 1
      rType = irrev
      stoichArray = {-1, 1, 1}
      fwdSpecies = QHD
      revSpecies = {QHH, prod}
      fwdSpeciesTags = QHD
      revSpeciesTags = {QHH, prod}
      Species = {QHD, QHH, prod}
      textOverallOrder = Overall forward reaction order: 1
      bulkFwdOrder = 1
      bulkRevOrder = 2
      formula = QHD=>QHH+prod
      kf = Kp
    QHH: SpeciesChem "Species: QHH" on all domains
      h = R_const*((chem.T<=chem.Tlo_QHH)*(chem.aLo6_QHH+chem.Tlo_QHH*(chem.aLo1_QHH+0.5*chem.Tlo_QHH*(chem.aLo2_QHH+2*chem.Tlo_QHH*(chem.aLo3_QHH+0.75*chem.Tlo_QHH*(chem.aLo4_QHH+0.8*chem.Tlo_QHH*chem.aLo5_QHH))/3)))+(chem.T>chem.Tlo_QHH)*(chem.T<=chem.Tmid_QHH)*(chem.aLo6_QHH+chem.T*(chem.aLo1_QHH+0.5*chem.T*(chem.aLo2_QHH+2*chem.T*(chem.aLo3_QHH+0.75*chem.T*(chem.aLo4_QHH+0.8*chem.T*chem.aLo5_QHH))/3)))+(chem.T>chem.Tmid_QHH)*(chem.T<=chem.Thi_QHH)*(chem.aHi6_QHH+chem.T*(chem.aHi1_QHH+0.5*chem.T*(chem.aHi2_QHH+2*chem.T*(chem.aHi3_QHH+0.75*chem.T*(chem.aHi4_QHH+0.8*chem.T*chem.aHi5_QHH))/3)))+(chem.T>chem.Thi_QHH)*(chem.aHi6_QHH+chem.Thi_QHH*(chem.aHi1_QHH+0.5*chem.Thi_QHH*(chem.aHi2_QHH+2*chem.Thi_QHH*(chem.aHi3_QHH+0.75*chem.Thi_QHH*(chem.aHi4_QHH+0.8*chem.Thi_QHH*chem.aHi5_QHH))/3))))
      s = R_const*((chem.T<=chem.Tlo_QHH)*(chem.aLo7_QHH+chem.aLo1_QHH*log(chem.T/1[K])+chem.Tlo_QHH*(chem.aLo2_QHH+0.5*chem.Tlo_QHH*(chem.aLo3_QHH+2*chem.Tlo_QHH*(chem.aLo4_QHH+0.75*chem.Tlo_QHH*chem.aLo5_QHH)/3)))+(chem.T>chem.Tlo_QHH)*(chem.T<=chem.Tmid_QHH)*(chem.aLo7_QHH+chem.aLo1_QHH*log(chem.T/1[K])+chem.T*(chem.aLo2_QHH+0.5*chem.T*(chem.aLo3_QHH+2*chem.T*(chem.aLo4_QHH+0.75*chem.T*chem.aLo5_QHH)/3)))+(chem.T>chem.Tmid_QHH)*(chem.T<=chem.Thi_QHH)*(chem.aHi7_QHH+chem.aHi1_QHH*log(chem.T/1[K])+chem.T*(chem.aHi2_QHH+0.5*chem.T*(chem.aHi3_QHH+2*chem.T*(chem.aHi4_QHH+0.75*chem.T*chem.aHi5_QHH)/3)))+(chem.T>chem.Thi_QHH)*(chem.aHi7_QHH+chem.aHi1_QHH*log(chem.T/1[K])+chem.Thi_QHH*(chem.aHi2_QHH+0.5*chem.Thi_QHH*(chem.aHi3_QHH+2*chem.Thi_QHH*(chem.aHi4_QHH+0.75*chem.Thi_QHH*chem.aHi5_QHH)/3))))
      Cp = R_const*((chem.T<=chem.Tlo_QHH)*(chem.aLo1_QHH+chem.Tlo_QHH*(chem.aLo2_QHH+chem.Tlo_QHH*(chem.aLo3_QHH+chem.Tlo_QHH*(chem.aLo4_QHH+chem.Tlo_QHH*chem.aLo5_QHH))))+(chem.T>chem.Tlo_QHH)*(chem.T<=chem.Tmid_QHH)*(chem.aLo1_QHH+chem.T*(chem.aLo2_QHH+chem.T*(chem.aLo3_QHH+chem.T*(chem.aLo4_QHH+chem.T*chem.aLo5_QHH))))+(chem.T>chem.Tmid_QHH)*(chem.T<=chem.Thi_QHH)*(chem.aHi1_QHH+chem.T*(chem.aHi2_QHH+chem.T*(chem.aHi3_QHH+chem.T*(chem.aHi4_QHH+chem.T*chem.aHi5_QHH))))+(chem.T>chem.Thi_QHH)*(chem.aHi1_QHH+chem.Thi_QHH*(chem.aHi2_QHH+chem.Thi_QHH*(chem.aHi3_QHH+chem.Thi_QHH*(chem.aHi4_QHH+chem.Thi_QHH*chem.aHi5_QHH)))))
      ReactionTagInSpecies = {rch4, rch5}
      R = chem.r_4-chem.r_5
      mixtureSolvent = 1
      M = root.QHH_mass
    prod: SpeciesChem "Species: prod" on all domains
      h = R_const*((chem.T<=chem.Tlo_prod)*(chem.aLo6_prod+chem.Tlo_prod*(chem.aLo1_prod+0.5*chem.Tlo_prod*(chem.aLo2_prod+2*chem.Tlo_prod*(chem.aLo3_prod+0.75*chem.Tlo_prod*(chem.aLo4_prod+0.8*chem.Tlo_prod*chem.aLo5_prod))/3)))+(chem.T>chem.Tlo_prod)*(chem.T<=chem.Tmid_prod)*(chem.aLo6_prod+chem.T*(chem.aLo1_prod+0.5*chem.T*(chem.aLo2_prod+2*chem.T*(chem.aLo3_prod+0.75*chem.T*(chem.aLo4_prod+0.8*chem.T*chem.aLo5_prod))/3)))+(chem.T>chem.Tmid_prod)*(chem.T<=chem.Thi_prod)*(chem.aHi6_prod+chem.T*(chem.aHi1_prod+0.5*chem.T*(chem.aHi2_prod+2*chem.T*(chem.aHi3_prod+0.75*chem.T*(chem.aHi4_prod+0.8*chem.T*chem.aHi5_prod))/3)))+(chem.T>chem.Thi_prod)*(chem.aHi6_prod+chem.Thi_prod*(chem.aHi1_prod+0.5*chem.Thi_prod*(chem.aHi2_prod+2*chem.Thi_prod*(chem.aHi3_prod+0.75*chem.Thi_prod*(chem.aHi4_prod+0.8*chem.Thi_prod*chem.aHi5_prod))/3))))
      s = R_const*((chem.T<=chem.Tlo_prod)*(chem.aLo7_prod+chem.aLo1_prod*log(chem.T/1[K])+chem.Tlo_prod*(chem.aLo2_prod+0.5*chem.Tlo_prod*(chem.aLo3_prod+2*chem.Tlo_prod*(chem.aLo4_prod+0.75*chem.Tlo_prod*chem.aLo5_prod)/3)))+(chem.T>chem.Tlo_prod)*(chem.T<=chem.Tmid_prod)*(chem.aLo7_prod+chem.aLo1_prod*log(chem.T/1[K])+chem.T*(chem.aLo2_prod+0.5*chem.T*(chem.aLo3_prod+2*chem.T*(chem.aLo4_prod+0.75*chem.T*chem.aLo5_prod)/3)))+(chem.T>chem.Tmid_prod)*(chem.T<=chem.Thi_prod)*(chem.aHi7_prod+chem.aHi1_prod*log(chem.T/1[K])+chem.T*(chem.aHi2_prod+0.5*chem.T*(chem.aHi3_prod+2*chem.T*(chem.aHi4_prod+0.75*chem.T*chem.aHi5_prod)/3)))+(chem.T>chem.Thi_prod)*(chem.aHi7_prod+chem.aHi1_prod*log(chem.T/1[K])+chem.Thi_prod*(chem.aHi2_prod+0.5*chem.Thi_prod*(chem.aHi3_prod+2*chem.Thi_prod*(chem.aHi4_prod+0.75*chem.Thi_prod*chem.aHi5_prod)/3))))
      Cp = R_const*((chem.T<=chem.Tlo_prod)*(chem.aLo1_prod+chem.Tlo_prod*(chem.aLo2_prod+chem.Tlo_prod*(chem.aLo3_prod+chem.Tlo_prod*(chem.aLo4_prod+chem.Tlo_prod*chem.aLo5_prod))))+(chem.T>chem.Tlo_prod)*(chem.T<=chem.Tmid_prod)*(chem.aLo1_prod+chem.T*(chem.aLo2_prod+chem.T*(chem.aLo3_prod+chem.T*(chem.aLo4_prod+chem.T*chem.aLo5_prod))))+(chem.T>chem.Tmid_prod)*(chem.T<=chem.Thi_prod)*(chem.aHi1_prod+chem.T*(chem.aHi2_prod+chem.T*(chem.aHi3_prod+chem.T*(chem.aHi4_prod+chem.T*chem.aHi5_prod))))+(chem.T>chem.Thi_prod)*(chem.aHi1_prod+chem.Thi_prod*(chem.aHi2_prod+chem.Thi_prod*(chem.aHi3_prod+chem.Thi_prod*(chem.aHi4_prod+chem.Thi_prod*chem.aHi5_prod)))))
      ReactionTagInSpecies = {rch4, rch6, rch9}
      R = chem.r_4+chem.r_6+chem.r_9
      mixtureSolvent = 1
      M = root.prod_mass
    rch5: ReactionChem "KqH/Kdisp: Q + QHH <=> 2 QH" on all domains
      reset = 1
      formulaID = rev_Q_QH_QHH_
      KeqNum = (chem.c_QH*1[m^3/mol])^2
      KeqDen = chem.c_Q*chem.c_QHH*(1[m^3/mol])^2
      rIsValid = 1
      stoichArray = {-1, -1, 2}
      fwdSpecies = {Q, QHH}
      revSpecies = QH
      fwdSpeciesTags = {Q, QHH}
      revSpeciesTags = QH
      Species = {Q, QHH, QH}
      textOverallOrder = Overall forward reaction order: 2 Overall reverse reaction order: 2
      bulkFwdOrder = 2
      bulkRevOrder = 2
      formula = Q+QHH<=>2QH
      kf = KqH
      kr = Kdisp
    rch6: ReactionChem "Kph: Q => prod" on all domains
      reset = 1
      formulaID = irrev_prod_Q_
      KeqNum = chem.c_prod*1[m^3/mol]
      KeqDen = chem.c_Q*1[m^3/mol]
      rIsValid = 1
      rType = irrev
      stoichArray = {-1, 1}
      fwdSpecies = Q
      revSpecies = prod
      fwdSpeciesTags = Q
      revSpeciesTags = prod
      Species = {Q, prod}
      textOverallOrder = Overall forward reaction order: 1
      bulkFwdOrder = 1
      bulkRevOrder = 1
      formula = Q=>prod
      kf = Kph
    rch7: ReactionChem "Ks: Q + QHD =>QH + QD" on all domains
      reset = 1
      formulaID = irrev_Q_QD_QH_QHD_
      KeqNum = chem.c_QH*chem.c_QD*(1[m^3/mol])^2
      KeqDen = chem.c_Q*chem.c_QHD*(1[m^3/mol])^2
      rIsValid = 1
      rType = irrev
      stoichArray = {-1, -1, 1, 1}
      fwdSpecies = {Q, QHD}
      revSpecies = {QH, QD}
      fwdSpeciesTags = {Q, QHD}
      revSpeciesTags = {QH, QD}
      Species = {Q, QHD, QH, QD}
      textOverallOrder = Overall forward reaction order: 2
      bulkFwdOrder = 2
      bulkRevOrder = 2
      formula = Q+QHD=>QH+QD
      kf = Ks
    QD: SpeciesChem "Species: QD" on all domains
      h = R_const*((chem.T<=chem.Tlo_QD)*(chem.aLo6_QD+chem.Tlo_QD*(chem.aLo1_QD+0.5*chem.Tlo_QD*(chem.aLo2_QD+2*chem.Tlo_QD*(chem.aLo3_QD+0.75*chem.Tlo_QD*(chem.aLo4_QD+0.8*chem.Tlo_QD*chem.aLo5_QD))/3)))+(chem.T>chem.Tlo_QD)*(chem.T<=chem.Tmid_QD)*(chem.aLo6_QD+chem.T*(chem.aLo1_QD+0.5*chem.T*(chem.aLo2_QD+2*chem.T*(chem.aLo3_QD+0.75*chem.T*(chem.aLo4_QD+0.8*chem.T*chem.aLo5_QD))/3)))+(chem.T>chem.Tmid_QD)*(chem.T<=chem.Thi_QD)*(chem.aHi6_QD+chem.T*(chem.aHi1_QD+0.5*chem.T*(chem.aHi2_QD+2*chem.T*(chem.aHi3_QD+0.75*chem.T*(chem.aHi4_QD+0.8*chem.T*chem.aHi5_QD))/3)))+(chem.T>chem.Thi_QD)*(chem.aHi6_QD+chem.Thi_QD*(chem.aHi1_QD+0.5*chem.Thi_QD*(chem.aHi2_QD+2*chem.Thi_QD*(chem.aHi3_QD+0.75*chem.Thi_QD*(chem.aHi4_QD+0.8*chem.Thi_QD*chem.aHi5_QD))/3))))
      s = R_const*((chem.T<=chem.Tlo_QD)*(chem.aLo7_QD+chem.aLo1_QD*log(chem.T/1[K])+chem.Tlo_QD*(chem.aLo2_QD+0.5*chem.Tlo_QD*(chem.aLo3_QD+2*chem.Tlo_QD*(chem.aLo4_QD+0.75*chem.Tlo_QD*chem.aLo5_QD)/3)))+(chem.T>chem.Tlo_QD)*(chem.T<=chem.Tmid_QD)*(chem.aLo7_QD+chem.aLo1_QD*log(chem.T/1[K])+chem.T*(chem.aLo2_QD+0.5*chem.T*(chem.aLo3_QD+2*chem.T*(chem.aLo4_QD+0.75*chem.T*chem.aLo5_QD)/3)))+(chem.T>chem.Tmid_QD)*(chem.T<=chem.Thi_QD)*(chem.aHi7_QD+chem.aHi1_QD*log(chem.T/1[K])+chem.T*(chem.aHi2_QD+0.5*chem.T*(chem.aHi3_QD+2*chem.T*(chem.aHi4_QD+0.75*chem.T*chem.aHi5_QD)/3)))+(chem.T>chem.Thi_QD)*(chem.aHi7_QD+chem.aHi1_QD*log(chem.T/1[K])+chem.Thi_QD*(chem.aHi2_QD+0.5*chem.Thi_QD*(chem.aHi3_QD+2*chem.Thi_QD*(chem.aHi4_QD+0.75*chem.Thi_QD*chem.aHi5_QD)/3))))
      Cp = R_const*((chem.T<=chem.Tlo_QD)*(chem.aLo1_QD+chem.Tlo_QD*(chem.aLo2_QD+chem.Tlo_QD*(chem.aLo3_QD+chem.Tlo_QD*(chem.aLo4_QD+chem.Tlo_QD*chem.aLo5_QD))))+(chem.T>chem.Tlo_QD)*(chem.T<=chem.Tmid_QD)*(chem.aLo1_QD+chem.T*(chem.aLo2_QD+chem.T*(chem.aLo3_QD+chem.T*(chem.aLo4_QD+chem.T*chem.aLo5_QD))))+(chem.T>chem.Tmid_QD)*(chem.T<=chem.Thi_QD)*(chem.aHi1_QD+chem.T*(chem.aHi2_QD+chem.T*(chem.aHi3_QD+chem.T*(chem.aHi4_QD+chem.T*chem.aHi5_QD))))+(chem.T>chem.Thi_QD)*(chem.aHi1_QD+chem.Thi_QD*(chem.aHi2_QD+chem.Thi_QD*(chem.aHi3_QD+chem.Thi_QD*(chem.aHi4_QD+chem.Thi_QD*chem.aHi5_QD)))))
      ReactionTagInSpecies = {rch7, rch8}
      R = chem.r_7-chem.r_8
      mixtureSolvent = 1
      M = root.QD_mass
    rch8: ReactionChem "Kd/Kc: QD <=>Q + D" on all domains
      reset = 1
      formulaID = rev_D_Q_QD_
      KeqNum = chem.c_Q*chem.c_D*(1[m^3/mol])^2
      KeqDen = chem.c_QD*1[m^3/mol]
      rIsValid = 1
      stoichArray = {-1, 1, 1}
      fwdSpecies = QD
      revSpecies = {Q, D}
      fwdSpeciesTags = QD
      revSpeciesTags = {Q, D}
      Species = {QD, Q, D}
      textOverallOrder = Overall forward reaction order: 1 Overall reverse reaction order: 2
      bulkFwdOrder = 1
      bulkRevOrder = 2
      formula = QD<=>Q+D
      kf = Kd
      kr = Kc
    rch9: ReactionChem "KrD: 2 D => prod" on all domains
      reset = 1
      formulaID = irrev_D_prod_
      KeqNum = chem.c_prod*1[m^3/mol]
      KeqDen = (chem.c_D*1[m^3/mol])^2
      rIsValid = 1
      rType = irrev
      stoichArray = {-2, 1}
      fwdSpecies = D
      revSpecies = prod
      fwdSpeciesTags = D
      revSpeciesTags = prod
      Species = {D, prod}
      textOverallOrder = Overall forward reaction order: 2
      bulkFwdOrder = 2
      bulkRevOrder = 1
      formula = 2D=>prod
      kf = KrD
  tds: DilutedSpecies "Transport of Diluted Species" [geom1] on all domains
    dependent variable cD = {cD, cDH, cDHp, cQ, cQD, cQH, cQHD, cQHH, cQm, cprod}
    cdm1: ConvectionDiffusionMigration "Transport Properties 1" (default)
      DiffusionCoefficientSource = chem
      Dchem_cD = 1e-7[m^2/s]
    nflx1: NoFlux (default)
    init1: init "Initial Values 1" (default) | initc = {0, 1, 0, 1, 0, 0, 0, 0, 0, 0}
    reac1: Reactions on all domains
      R_cD_src = root.comp1.chem.R_D
      R_cDH_src = root.comp1.chem.R_DH
      R_cDHp_src = root.comp1.chem.R_DHp
      R_cQ_src = root.comp1.chem.R_Q
      R_cQD_src = root.comp1.chem.R_QD
      R_cQH_src = root.comp1.chem.R_QH
      R_cQHD_src = root.comp1.chem.R_QHD
      R_cQHH_src = root.comp1.chem.R_QHH
      R_cQm_src = root.comp1.chem.R_Qm
      R_cprod_src = root.comp1.chem.R_prod

Mesh
  mesh1 "Mesh 1" [geom1]
    size: MeshSizeDefault | hmax = 0.0001; hauto = 1; custom = on
    edg1: Edge on remaining entities

Studies
  std1 "Study concentrations"
    time: Transient "Time Dependent" | tlist = range(0,2.0e-5,2.0e-4); solve for = {reaction}
  std2 "Study diffusion"
    time: Transient "Time Dependent" | tlist = range(0,2.0e-5,5e-4); solve for = {chem1, tds}

Solver configurations
  sol1 "Solution 1" (study std1)
    v1: Variables "Dependent Variables 1"
    t1: Time "Time-Dependent Solver 1"
      tlist = range(0,2.0e-5,2.0e-4)
      tout = tsteps
      rtol = 1.0E-5
      maxorder = 2
      masssingular = yes
      dDef: Direct | linsolver = pardiso
      fc1: FullyCoupled | dtech = auto
  sol2 "Solution 2" (study std2)
    v1: Variables "Dependent Variables 1"
    t1: Time "Time-Dependent Solver 1"
      tlist = range(0,2.0e-5,5e-4)
      tout = tsteps
      rtol = 0.005
      maxorder = 2
      eventtol = 0.0001
      stabcntrl = on
      masssingular = yes
      rescaleafterinitbw = on
      fc1: FullyCoupled | maxiter = 8; damp = 0.9; jtech = once; stabacc = aacc; aaccdim = 5; aaccmix = 0.9; aaccdelay = 1
      i1: Iterative "AMG, concentrations (tds)" | maxlinit = 50
        mg1: Multigrid | prefun = saamg; maxcoarsedof = 50000; saamgcompwise = on

Datasets
  dset1: Solution "Data" | solution = sol1
  dset2: Solution | solution = sol2

Plots
  pg1: PlotGroup1D "Stable" | data = dset1
    glob1: Global
      expr = {reaction.c_Q, reaction.c_DH, reaction.c_QHD, reaction.c_QHH, reaction.c_prod}
      descr = {Q, DH, QHD, QHH, prod}
      functype = discrete
  pg2: PlotGroup1D "Radicals" | data = dset1
    glob1: Global
      expr = {reaction.c_Qm, reaction.c_DHp, reaction.c_QH, reaction.c_D, reaction.c_QD}
      descr = {Qm, DHp, QH, D, QD}
  pg3: PlotGroup1D "D" | data = dset1
    glob1: Global | expr = reaction.c_D; descr = D
  pg4: PlotGroup1D "Stable 2" | data = dset2; title = Concentrations, All Species
    lngr11: LineGraph "Light" on all domains | expr = light(x)*1e4; xdata = expr; xdataexpr = x; autosolution = off
    lngr2: LineGraph "Species DH" on all domains | expr = cDH; xdata = expr; xdataexpr = x; autosolution = off
    lngr4: LineGraph "Species Q" on all domains | expr = cQ; xdata = expr; xdataexpr = x; autosolution = off
    lngr8: LineGraph "Species QHH" on all domains | expr = cQHH; xdata = expr; xdataexpr = x; autosolution = off
    lngr10: LineGraph "Species prod" (disabled) on all domains
      expr = cprod
      xdata = expr
      xdataexpr = x
      autosolution = off
  pg5: PlotGroup1D "Radicals 2" | data = dset2; title = Concentrations, All Species
    lngr11: LineGraph "Light" on all domains | expr = light(x)*1e-5; xdata = expr; xdataexpr = x; autosolution = off
    lngr1: LineGraph "Species D" on all domains
      expr = cD
      descr = Concentration
      xdata = expr
      xdataexpr = x
      autosolution = off
    lngr3: LineGraph "Species DHp" on all domains | expr = cDHp; xdata = expr; xdataexpr = x; autosolution = off
    lngr5: LineGraph "Species QD" on all domains | expr = cQD; xdata = expr; xdataexpr = x; autosolution = off
    lngr6: LineGraph "Species QH" on all domains | expr = cQH; xdata = expr; xdataexpr = x; autosolution = off
    lngr7: LineGraph "Species QHD" on all domains | expr = cQHD; xdata = expr; xdataexpr = x; autosolution = off
    lngr9: LineGraph "Species Qm" on all domains | expr = cQm; xdata = expr; xdataexpr = x; autosolution = off
  pg6: PlotGroup1D "D 2" | data = dset2; title = Concentrations, All Species
    lngr1: LineGraph "Species D" on all domains
      expr = cD
      descr = Concentration
      xdata = expr
      xdataexpr = x
      autosolution = off

Exports
  anim1: Animation "Animation stable" | target = player; framesel = all
  anim2: Animation "Animation radicals" | target = player; framesel = all; frametime = 0.2

Methods
  solve_full: CodeEditor
    public class solve_full extends ApplicationMethod {
      public void execute() {
        model.study("std1").run();
        model.result().evaluationGroup("eg1").run();
        model.result().export("tbl1").run();
      }
    }
  input_file_err: CodeEditor "method2"
    public class input_file_err extends ApplicationMethod {
      public void execute() {
        //    To import content from file, use:
        //    model.param().loadFile("FILENAME");
        // model.param().loadFile("D:/Works/PolimerSolve/Comsol/New task/Untitled.scv");
        //    model.param().loadFile("upload:///Untitled.scv", "", "");
        model.result().table("tbl1").loadFile("D:\\Works\\PolimerSolve\\Comsol\\New_task\\params.csv");
      }
    }