// COMSOL Multiphysics 6.0.0.318 model "Simplify test.mph"
// Outline of the model tree

Parameters
  Ke = 1000000000
  KH = 1000000000
  Kr = 1000000000
  Kp = 0.001
  KqH = 2000
  Kdisp = 1000000000
  Kph = 0.00001
  Ks = 2
  Kd = 0.05
  Kc = 1
  D0 = 0
  DH0 = 1
  DHp0 = 0
  Q0 = 1
  QD0 = 0
  QH0 = 0
  QHD0 = 0
  QHH0 = 0
  Qm0 = 0
  prod0 = 0
  KrD = 1000000000
  Q_mass = 108 [g/mol]
  DH_mass = 59 [g/mol]
  QHD_mass = 167 [g/mol]
  QHH_mass = 110 [g/mol]
  prod_mass = 58 [g/mol]
  Qm_mass = 108 [g/mol]
  DHp_mass = 59 [g/mol]
  QH_mass = 109 [g/mol]
  D_mass = 58 [g/mol]
  QD_mass = 166 [g/mol]
  time_end = 2e-4
  light_start = 0
  light_end = 1e-3
  light_step = 1e-4
  light = 0.0001
  MONO0 = 1
  Kact = 1000000
  Kpol = 1

Physics
  reaction: ReactionEng "Reaction Engineering"
    reactor.Vr = 1
    energybalance.T = 1
    mixture.mixture = liquid
    calcTransport.dynamicViscositySel = UserDefined
    simpropChem.sSequenceNo = 17
    ActiveSpecies.SumActiveSpecies = 11
    ActiveSpecies.NumActiveVolumeSpecies = 11
    SimpropMass.Species = {Q, DH, QH, D, QHD, QHH, prod, QD, MONO, MONOR, POL}
    SimpropMass.SpeciesInputType = {Variable, Variable, Variable, Variable, Variable, Variable, Variable, Variable, Variable, Variable, Variable}
    SimpropMass.Notes = {reaction.R_Q, reaction.R_DH, reaction.R_QH, reaction.R_D, reaction.R_QHD, reaction.R_QHH, reaction.R_prod, reaction.R_QD, reaction.R_MONO, reaction.R_MONOR, reaction.R_POL}
    inits1: SpeciesInitialValue "Initial Values"
      VolumetricSpecies = {D, DH, MONO, MONOR, POL, Q, QD, QH, QHD, QHH, prod}
      initialValue = {D0 [mol/l], DH0 [mol/l], MONO0 [mol/l], 0 [mol/l], 0 [mol/l], Q0 [mol/l], QD0 [mol/l], QH0 [mol/l], QHD0 [mol/l], QHH0 [mol/l], prod0 [mol/l]}
      F0 = {D0 [mol/l], DH0 [mol/l], MONO0 [mol/l], 0 [mol/l], 0, Q0 [mol/l], QD0 [mol/l], QH0 [mol/l], QHD0 [mol/l], QHH0 [mol/l], prod0 [mol/l]}
    Q: SpeciesChem "Species: Q"
      sisDef = 1
      sSequenceNo = 4
      SpeciesSource = Reaction
      specLabel = Q
      h = R_const*((reaction.T<=reaction.Tlo_Q)*(reaction.aLo6_Q+reaction.Tlo_Q*(reaction.aLo1_Q+0.5*reaction.Tlo_Q*(reaction.aLo2_Q+2*reaction.Tlo_Q*(reaction.aLo3_Q+0.75*reaction.Tlo_Q*(reaction.aLo4_Q+0.8*reaction.Tlo_Q*reaction.aLo5_Q))/3)))+(reaction.T>reaction.Tlo_Q)*(reaction.T<=reaction.Tmid_Q)*(reaction.aLo6_Q+reaction.T*(reaction.aLo1_Q+0.5*reaction.T*(reaction.aLo2_Q+2*reaction.T*(reaction.aLo3_Q+0.75*reaction.T*(reaction.aLo4_Q+0.8*reaction.T*reaction.aLo5_Q))/3)))+(reaction.T>reaction.Tmid_Q)*(reaction.T<=reaction.Thi_Q)*(reaction.aHi6_Q+reaction.T*(reaction.aHi1_Q+0.5*reaction.T*(reaction.aHi2_Q+2*reaction.T*(reaction.aHi3_Q+0.75*reaction.T*(reaction.aHi4_Q+0.8*reaction.T*reaction.aHi5_Q))/3)))+(reaction.T>reaction.Thi_Q)*(reaction.aHi6_Q+reaction.Thi_Q*(reaction.aHi1_Q+0.5*reaction.Thi_Q*(reaction.aHi2_Q+2*reaction.Thi_Q*(reaction.aHi3_Q+0.75*reaction.Thi_Q*(reaction.aHi4_Q+0.8*reaction.Thi_Q*reaction.aHi5_Q))/3))))
      s = R_const*((reaction.T<=reaction.Tlo_Q)*(reaction.aLo7_Q+reaction.aLo1_Q*log(reaction.T/1[K])+reaction.Tlo_Q*(reaction.aLo2_Q+0.5*reaction.Tlo_Q*(reaction.aLo3_Q+2*reaction.Tlo_Q*(reaction.aLo4_Q+0.75*reaction.Tlo_Q*reaction.aLo5_Q)/3)))+(reaction.T>reaction.Tlo_Q)*(reaction.T<=reaction.Tmid_Q)*(reaction.aLo7_Q+reaction.aLo1_Q*log(reaction.T/1[K])+reaction.T*(reaction.aLo2_Q+0.5*reaction.T*(reaction.aLo3_Q+2*reaction.T*(reaction.aLo4_Q+0.75*reaction.T*reaction.aLo5_Q)/3)))+(reaction.T>reaction.Tmid_Q)*(reaction.T<=reaction.Thi_Q)*(reaction.aHi7_Q+reaction.aHi1_Q*log(reaction.T/1[K])+reaction.T*(reaction.aHi2_Q+0.5*reaction.T*(reaction.aHi3_Q+2*reaction.T*(reaction.aHi4_Q+0.75*reaction.T*reaction.aHi5_Q)/3)))+(reaction.T>reaction.Thi_Q)*(reaction.aHi7_Q+reaction.aHi1_Q*log(reaction.T/1[K])+reaction.Thi_Q*(reaction.aHi2_Q+0.5*reaction.Thi_Q*(reaction.aHi3_Q+2*reaction.Thi_Q*(reaction.aHi4_Q+0.75*reaction.Thi_Q*reaction.aHi5_Q)/3))))
      Cp = R_const*((reaction.T<=reaction.Tlo_Q)*(reaction.aLo1_Q+reaction.Tlo_Q*(reaction.aLo2_Q+reaction.Tlo_Q*(reaction.aLo3_Q+reaction.Tlo_Q*(reaction.aLo4_Q+reaction.Tlo_Q*reaction.aLo5_Q))))+(reaction.T>reaction.Tlo_Q)*(reaction.T<=reaction.Tmid_Q)*(reaction.aLo1_Q+reaction.T*(reaction.aLo2_Q+reaction.T*(reaction.aLo3_Q+reaction.T*(reaction.aLo4_Q+reaction.T*reaction.aLo5_Q))))+(reaction.T>reaction.Tmid_Q)*(reaction.T<=reaction.Thi_Q)*(reaction.aHi1_Q+reaction.T*(reaction.aHi2_Q+reaction.T*(reaction.aHi3_Q+reaction.T*(reaction.aHi4_Q+reaction.T*reaction.aHi5_Q))))+(reaction.T>reaction.Thi_Q)*(reaction.aHi1_Q+reaction.Thi_Q*(reaction.aHi2_Q+reaction.Thi_Q*(reaction.aHi3_Q+reaction.Thi_Q*(reaction.aHi4_Q+reaction.Thi_Q*reaction.aHi5_Q)))))
      ReactionTagInSpecies = {rch1, rch5, rch6, rch7, rch8}
      specName = Q
      R = -reaction.r_1-reaction.r_5-reaction.r_6-reaction.r_7+reaction.r_8
      mixtureSolvent = 1
    DH: SpeciesChem "Species: DH"
      sisDef = 1
      sSequenceNo = 5
      SpeciesSource = Reaction
      specLabel = DH
      h = R_const*((reaction.T<=reaction.Tlo_DH)*(reaction.aLo6_DH+reaction.Tlo_DH*(reaction.aLo1_DH+0.5*reaction.Tlo_DH*(reaction.aLo2_DH+2*reaction.Tlo_DH*(reaction.aLo3_DH+0.75*reaction.Tlo_DH*(reaction.aLo4_DH+0.8*reaction.Tlo_DH*reaction.aLo5_DH))/3)))+(reaction.T>reaction.Tlo_DH)*(reaction.T<=reaction.Tmid_DH)*(reaction.aLo6_DH+reaction.T*(reaction.aLo1_DH+0.5*reaction.T*(reaction.aLo2_DH+2*reaction.T*(reaction.aLo3_DH+0.75*reaction.T*(reaction.aLo4_DH+0.8*reaction.T*reaction.aLo5_DH))/3)))+(reaction.T>reaction.Tmid_DH)*(reaction.T<=reaction.Thi_DH)*(reaction.aHi6_DH+reaction.T*(reaction.aHi1_DH+0.5*reaction.T*(reaction.aHi2_DH+2*reaction.T*(reaction.aHi3_DH+0.75*reaction.T*(reaction.aHi4_DH+0.8*reaction.T*reaction.aHi5_DH))/3)))+(reaction.T>reaction.Thi_DH)*(reaction.aHi6_DH+reaction.Thi_DH*(reaction.aHi1_DH+0.5*reaction.Thi_DH*(reaction.aHi2_DH+2*reaction.Thi_DH*(reaction.aHi3_DH+0.75*reaction.Thi_DH*(reaction.aHi4_DH+0.8*reaction.Thi_DH*reaction.aHi5_DH))/3))))
      s = R_const*((reaction.T<=reaction.Tlo_DH)*(reaction.aLo7_DH+reaction.aLo1_DH*log(reaction.T/1[K])+reaction.Tlo_DH*(reaction.aLo2_DH+0.5*reaction.Tlo_DH*(reaction.aLo3_DH+2*reaction.Tlo_DH*(reaction.aLo4_DH+0.75*reaction.Tlo_DH*reaction.aLo5_DH)/3)))+(reaction.T>reaction.Tlo_DH)*(reaction.T<=reaction.Tmid_DH)*(reaction.aLo7_DH+reaction.aLo1_DH*log(reaction.T/1[K])+reaction.T*(reaction.aLo2_DH+0.5*reaction.T*(reaction.aLo3_DH+2*reaction.T*(reaction.aLo4_DH+0.75*reaction.T*reaction.aLo5_DH)/3)))+(reaction.T>reaction.Tmid_DH)*(reaction.T<=reaction.Thi_DH)*(reaction.aHi7_DH+reaction.aHi1_DH*log(reaction.T/1[K])+reaction.T*(reaction.aHi2_DH+0.5*reaction.T*(reaction.aHi3_DH+2*reaction.T*(reaction.aHi4_DH+0.75*reaction.T*reaction.aHi5_DH)/3)))+(reaction.T>reaction.Thi_DH)*(reaction.aHi7_DH+reaction.aHi1_DH*log(reaction.T/1[K])+reaction.Thi_DH*(reaction.aHi2_DH+0.5*reaction.Thi_DH*(reaction.aHi3_DH+2*reaction.Thi_DH*(reaction.aHi4_DH+0.75*reaction.Thi_DH*reaction.aHi5_DH)/3))))
      Cp = R_const*((reaction.T<=reaction.Tlo_DH)*(reaction.aLo1_DH+reaction.Tlo_DH*(reaction.aLo2_DH+reaction.Tlo_DH*(reaction.aLo3_DH+reaction.Tlo_DH*(reaction.aLo4_DH+reaction.Tlo_DH*reaction.aLo5_DH))))+(reaction.T>reaction.Tlo_DH)*(reaction.T<=reaction.Tmid_DH)*(reaction.aLo1_DH+reaction.T*(reaction.aLo2_DH+reaction.T*(reaction.aLo3_DH+reaction.T*(reaction.aLo4_DH+reaction.T*reaction.aLo5_DH))))+(reaction.T>reaction.Tmid_DH)*(reaction.T<=reaction.Thi_DH)*(reaction.aHi1_DH+reaction.T*(reaction.aHi2_DH+reaction.T*(reaction.aHi3_DH+reaction.T*(reaction.aHi4_DH+reaction.T*reaction.aHi5_DH))))+(reaction.T>reaction.Thi_DH)*(reaction.aHi1_DH+reaction.Thi_DH*(reaction.aHi2_DH+reaction.Thi_DH*(reaction.aHi3_DH+reaction.Thi_DH*(reaction.aHi4_DH+reaction.Thi_DH*reaction.aHi5_DH)))))
      ReactionTagInSpecies = {rch1, rch10}
      specName = DH
      R = -reaction.r_1+reaction.r_10
      mixtureSolvent = 1
    QH: SpeciesChem "Species: QH"
      sisDef = 1
      sSequenceNo = 8
      SpeciesSource = Reaction
      specLabel = QH
      h = R_const*((reaction.T<=reaction.Tlo_QH)*(reaction.aLo6_QH+reaction.Tlo_QH*(reaction.aLo1_QH+0.5*reaction.Tlo_QH*(reaction.aLo2_QH+2*reaction.Tlo_QH*(reaction.aLo3_QH+0.75*reaction.Tlo_QH*(reaction.aLo4_QH+0.8*reaction.Tlo_QH*reaction.aLo5_QH))/3)))+(reaction.T>reaction.Tlo_QH)*(reaction.T<=reaction.Tmid_QH)*(reaction.aLo6_QH+reaction.T*(reaction.aLo1_QH+0.5*reaction.T*(reaction.aLo2_QH+2*reaction.T*(reaction.aLo3_QH+0.75*reaction.T*(reaction.aLo4_QH+0.8*reaction.T*reaction.aLo5_QH))/3)))+(reaction.T>reaction.Tmid_QH)*(reaction.T<=reaction.Thi_QH)*(reaction.aHi6_QH+reaction.T*(reaction.aHi1_QH+0.5*reaction.T*(reaction.aHi2_QH+2*reaction.T*(reaction.aHi3_QH+0.75*reaction.T*(reaction.aHi4_QH+0.8*reaction.T*reaction.aHi5_QH))/3)))+(reaction.T>reaction.Thi_QH)*(reaction.aHi6_QH+reaction.Thi_QH*(reaction.aHi1_QH+0.5*reaction.Thi_QH*(reaction.aHi2_QH+2*reaction.Thi_QH*(reaction.aHi3_QH+0.75*reaction.Thi_QH*(reaction.aHi4_QH+0.8*reaction.Thi_QH*reaction.aHi5_QH))/3))))
      s = R_const*((reaction.T<=reaction.Tlo_QH)*(reaction.aLo7_QH+reaction.aLo1_QH*log(reaction.T/1[K])+reaction.Tlo_QH*(reaction.aLo2_QH+0.5*reaction.Tlo_QH*(reaction.aLo3_QH+2*reaction.Tlo_QH*(reaction.aLo4_QH+0.75*reaction.Tlo_QH*reaction.aLo5_QH)/3)))+(reaction.T>reaction.Tlo_QH)*(reaction.T<=reaction.Tmid_QH)*(reaction.aLo7_QH+reaction.aLo1_QH*log(reaction.T/1[K])+reaction.T*(reaction.aLo2_QH+0.5*reaction.T*(reaction.aLo3_QH+2*reaction.T*(reaction.aLo4_QH+0.75*reaction.T*reaction.aLo5_QH)/3)))+(reaction.T>reaction.Tmid_QH)*(reaction.T<=reaction.Thi_QH)*(reaction.aHi7_QH+reaction.aHi1_QH*log(reaction.T/1[K])+reaction.T*(reaction.aHi2_QH+0.5*reaction.T*(reaction.aHi3_QH+2*reaction.T*(reaction.aHi4_QH+0.75*reaction.T*reaction.aHi5_QH)/3)))+(reaction.T>reaction.Thi_QH)*(reaction.aHi7_QH+reaction.aHi1_QH*log(reaction.T/1[K])+reaction.Thi_QH*(reaction.aHi2_QH+0.5*reaction.Thi_QH*(reaction.aHi3_QH+2*reaction.Thi_QH*(reaction.aHi4_QH+0.75*reaction.Thi_QH*reaction.aHi5_QH)/3))))
      Cp = R_const*((reaction.T<=reaction.Tlo_QH)*(reaction.aLo1_QH+reaction.Tlo_QH*(reaction.aLo2_QH+reaction.Tlo_QH*(reaction.aLo3_QH+reaction.Tlo_QH*(reaction.aLo4_QH+reaction.Tlo_QH*reaction.aLo5_QH))))+(reaction.T>reaction.Tlo_QH)*(reaction.T<=reaction.Tmid_QH)*(reaction.aLo1_QH+reaction.T*(reaction.aLo2_QH+reaction.T*(reaction.aLo3_QH+reaction.T*(reaction.aLo4_QH+reaction.T*reaction.aLo5_QH))))+(reaction.T>reaction.Tmid_QH)*(reaction.T<=reaction.Thi_QH)*(reaction.aHi1_QH+reaction.T*(reaction.aHi2_QH+reaction.T*(reaction.aHi3_QH+reaction.T*(reaction.aHi4_QH+reaction.T*reaction.aHi5_QH))))+(reaction.T>reaction.Thi_QH)*(reaction.aHi1_QH+reaction.Thi_QH*(reaction.aHi2_QH+reaction.Thi_QH*(reaction.aHi3_QH+reaction.Thi_QH*(reaction.aHi4_QH+reaction.Thi_QH*reaction.aHi5_QH)))))
      ReactionTagInSpecies = {rch3, rch5, rch7, rch1}
      specName = QH
      R = -reaction.r_3+2*reaction.r_5+reaction.r_7+reaction.r_1
      mixtureSolvent = 1
    D: SpeciesChem "Species: D"
      sisDef = 1
      sSequenceNo = 9
      SpeciesSource = Reaction
      specLabel = D
      h = R_const*((reaction.T<=reaction.Tlo_D)*(reaction.aLo6_D+reaction.Tlo_D*(reaction.aLo1_D+0.5*reaction.Tlo_D*(reaction.aLo2_D+2*reaction.Tlo_D*(reaction.aLo3_D+0.75*reaction.Tlo_D*(reaction.aLo4_D+0.8*reaction.Tlo_D*reaction.aLo5_D))/3)))+(reaction.T>reaction.Tlo_D)*(reaction.T<=reaction.Tmid_D)*(reaction.aLo6_D+reaction.T*(reaction.aLo1_D+0.5*reaction.T*(reaction.aLo2_D+2*reaction.T*(reaction.aLo3_D+0.75*reaction.T*(reaction.aLo4_D+0.8*reaction.T*reaction.aLo5_D))/3)))+(reaction.T>reaction.Tmid_D)*(reaction.T<=reaction.Thi_D)*(reaction.aHi6_D+reaction.T*(reaction.aHi1_D+0.5*reaction.T*(reaction.aHi2_D+2*reaction.T*(reaction.aHi3_D+0.75*reaction.T*(reaction.aHi4_D+0.8*reaction.T*reaction.aHi5_D))/3)))+(reaction.T>reaction.Thi_D)*(reaction.aHi6_D+reaction.Thi_D*(reaction.aHi1_D+0.5*reaction.Thi_D*(reaction.aHi2_D+2*reaction.Thi_D*(reaction.aHi3_D+0.75*reaction.Thi_D*(reaction.aHi4_D+0.8*reaction.Thi_D*reaction.aHi5_D))/3))))
      s = R_const*((reaction.T<=reaction.Tlo_D)*(reaction.aLo7_D+reaction.aLo1_D*log(reaction.T/1[K])+reaction.Tlo_D*(reaction.aLo2_D+0.5*reaction.Tlo_D*(reaction.aLo3_D+2*reaction.Tlo_D*(reaction.aLo4_D+0.75*reaction.Tlo_D*reaction.aLo5_D)/3)))+(reaction.T>reaction.Tlo_D)*(reaction.T<=reaction.Tmid_D)*(reaction.aLo7_D+reaction.aLo1_D*log(reaction.T/1[K])+reaction.T*(reaction.aLo2_D+0.5*reaction.T*(reaction.aLo3_D+2*reaction.T*(reaction.aLo4_D+0.75*reaction.T*reaction.aLo5_D)/3)))+(reaction.T>reaction.Tmid_D)*(reaction.T<=reaction.Thi_D)*(reaction.aHi7_D+reaction.aHi1_D*log(reaction.T/1[K])+reaction.T*(reaction.aHi2_D+0.5*reaction.T*(reaction.aHi3_D+2*reaction.T*(reaction.aHi4_D+0.75*reaction.T*reaction.aHi5_D)/3)))+(reaction.T>reaction.Thi_D)*(reaction.aHi7_D+reaction.aHi1_D*log(reaction.T/1[K])+reaction.Thi_D*(reaction.aHi2_D+0.5*reaction.Thi_D*(reaction.aHi3_D+2*reaction.Thi_D*(reaction.aHi4_D+0.75*reaction.Thi_D*reaction.aHi5_D)/3))))
      Cp = R_const*((reaction.T<=reaction.Tlo_D)*(reaction.aLo1_D+reaction.Tlo_D*(reaction.aLo2_D+reaction.Tlo_D*(reaction.aLo3_D+reaction.Tlo_D*(reaction.aLo4_D+reaction.Tlo_D*reaction.aLo5_D))))+(reaction.T>reaction.Tlo_D)*(reaction.T<=reaction.Tmid_D)*(reaction.aLo1_D+reaction.T*(reaction.aLo2_D+reaction.T*(reaction.aLo3_D+reaction.T*(reaction.aLo4_D+reaction.T*reaction.aLo5_D))))+(reaction.T>reaction.Tmid_D)*(reaction.T<=reaction.Thi_D)*(reaction.aHi1_D+reaction.T*(reaction.aHi2_D+reaction.T*(reaction.aHi3_D+reaction.T*(reaction.aHi4_D+reaction.T*reaction.aHi5_D))))+(reaction.T>reaction.Thi_D)*(reaction.aHi1_D+reaction.Thi_D*(reaction.aHi2_D+reaction.Thi_D*(reaction.aHi3_D+reaction.Thi_D*(reaction.aHi4_D+reaction.Thi_D*reaction.aHi5_D)))))
      ReactionTagInSpecies = {rch3, rch8, rch9, rch1, rch10}
      specName = D
      R = -reaction.r_3+reaction.r_8-2*reaction.r_9+reaction.r_1-reaction.r_10
      mixtureSolvent = 1
    QHD: SpeciesChem "Species: QHD"
      sisDef = 1
      sSequenceNo = 10
      SpeciesSource = Reaction
      specLabel = QHD
      h = R_const*((reaction.T<=reaction.Tlo_QHD)*(reaction.aLo6_QHD+reaction.Tlo_QHD*(reaction.aLo1_QHD+0.5*reaction.Tlo_QHD*(reaction.aLo2_QHD+2*reaction.Tlo_QHD*(reaction.aLo3_QHD+0.75*reaction.Tlo_QHD*(reaction.aLo4_QHD+0.8*reaction.Tlo_QHD*reaction.aLo5_QHD))/3)))+(reaction.T>reaction.Tlo_QHD)*(reaction.T<=reaction.Tmid_QHD)*(reaction.aLo6_QHD+reaction.T*(reaction.aLo1_QHD+0.5*reaction.T*(reaction.aLo2_QHD+2*reaction.T*(reaction.aLo3_QHD+0.75*reaction.T*(reaction.aLo4_QHD+0.8*reaction.T*reaction.aLo5_QHD))/3)))+(reaction.T>reaction.Tmid_QHD)*(reaction.T<=reaction.Thi_QHD)*(reaction.aHi6_QHD+reaction.T*(reaction.aHi1_QHD+0.5*reaction.T*(reaction.aHi2_QHD+2*reaction.T*(reaction.aHi3_QHD+0.75*reaction.T*(reaction.aHi4_QHD+0.8*reaction.T*reaction.aHi5_QHD))/3)))+(reaction.T>reaction.Thi_QHD)*(reaction.aHi6_QHD+reaction.Thi_QHD*(reaction.aHi1_QHD+0.5*reaction.Thi_QHD*(reaction.aHi2_QHD+2*reaction.Thi_QHD*(reaction.aHi3_QHD+0.75*reaction.Thi_QHD*(reaction.aHi4_QHD+0.8*reaction.Thi_QHD*reaction.aHi5_QHD))/3))))
      s = R_const*((reaction.T<=reaction.Tlo_QHD)*(reaction.aLo7_QHD+reaction.aLo1_QHD*log(reaction.T/1[K])+reaction.Tlo_QHD*(reaction.aLo2_QHD+0.5*reaction.Tlo_QHD*(reaction.aLo3_QHD+2*reaction.Tlo_QHD*(reaction.aLo4_QHD+0.75*reaction.Tlo_QHD*reaction.aLo5_QHD)/3)))+(reaction.T>reaction.Tlo_QHD)*(reaction.T<=reaction.Tmid_QHD)*(reaction.aLo7_QHD+reaction.aLo1_QHD*log(reaction.T/1[K])+reaction.T*(reaction.aLo2_QHD+0.5*reaction.T*(reaction.aLo3_QHD+2*reaction.T*(reaction.aLo4_QHD+0.75*reaction.T*reaction.aLo5_QHD)/3)))+(reaction.T>reaction.Tmid_QHD)*(reaction.T<=reaction.Thi_QHD)*(reaction.aHi7_QHD+reaction.aHi1_QHD*log(reaction.T/1[K])+reaction.T*(reaction.aHi2_QHD+0.5*reaction.T*(reaction.aHi3_QHD+2*reaction.T*(reaction.aHi4_QHD+0.75*reaction.T*reaction.aHi5_QHD)/3)))+(reaction.T>reaction.Thi_QHD)*(reaction.aHi7_QHD+reaction.aHi1_QHD*log(reaction.T/1[K])+reaction.Thi_QHD*(reaction.aHi2_QHD+0.5*reaction.Thi_QHD*(reaction.aHi3_QHD+2*reaction.Thi_QHD*(reaction.aHi4_QHD+0.75*reaction.Thi_QHD*reaction.aHi5_QHD)/3))))
      Cp = R_const*((reaction.T<=reaction.Tlo_QHD)*(reaction.aLo1_QHD+reaction.Tlo_QHD*(reaction.aLo2_QHD+reaction.Tlo_QHD*(reaction.aLo3_QHD+reaction.Tlo_QHD*(reaction.aLo4_QHD+reaction.Tlo_QHD*reaction.aLo5_QHD))))+(reaction.T>reaction.Tlo_QHD)*(reaction.T<=reaction.Tmid_QHD)*(reaction.aLo1_QHD+reaction.T*(reaction.aLo2_QHD+reaction.T*(reaction.aLo3_QHD+reaction.T*(reaction.aLo4_QHD+reaction.T*reaction.aLo5_QHD))))+(reaction.T>reaction.Tmid_QHD)*(reaction.T<=reaction.Thi_QHD)*(reaction.aHi1_QHD+reaction.T*(reaction.aHi2_QHD+reaction.T*(reaction.aHi3_QHD+reaction.T*(reaction.aHi4_QHD+reaction.T*reaction.aHi5_QHD))))+(reaction.T>reaction.Thi_QHD)*(reaction.aHi1_QHD+reaction.Thi_QHD*(reaction.aHi2_QHD+reaction.Thi_QHD*(reaction.aHi3_QHD+reaction.Thi_QHD*(reaction.aHi4_QHD+reaction.Thi_QHD*reaction.aHi5_QHD)))))
      ReactionTagInSpecies = {rch3, rch4, rch7}
      specName = QHD
      R = reaction.r_3-reaction.r_4-reaction.r_7
      mixtureSolvent = 1
    QHH: SpeciesChem "Species: QHH"
      sisDef = 1
      sSequenceNo = 11
      SpeciesSource = Reaction
      specLabel = QHH
      h = R_const*((reaction.T<=reaction.Tlo_QHH)*(reaction.aLo6_QHH+reaction.Tlo_QHH*(reaction.aLo1_QHH+0.5*reaction.Tlo_QHH*(reaction.aLo2_QHH+2*reaction.Tlo_QHH*(reaction.aLo3_QHH+0.75*reaction.Tlo_QHH*(reaction.aLo4_QHH+0.8*reaction.Tlo_QHH*reaction.aLo5_QHH))/3)))+(reaction.T>reaction.Tlo_QHH)*(reaction.T<=reaction.Tmid_QHH)*(reaction.aLo6_QHH+reaction.T*(reaction.aLo1_QHH+0.5*reaction.T*(reaction.aLo2_QHH+2*reaction.T*(reaction.aLo3_QHH+0.75*reaction.T*(reaction.aLo4_QHH+0.8*reaction.T*reaction.aLo5_QHH))/3)))+(reaction.T>reaction.Tmid_QHH)*(reaction.T<=reaction.Thi_QHH)*(reaction.aHi6_QHH+reaction.T*(reaction.aHi1_QHH+0.5*reaction.T*(reaction.aHi2_QHH+2*reaction.T*(reaction.aHi3_QHH+0.75*reaction.T*(reaction.aHi4_QHH+0.8*reaction.T*reaction.aHi5_QHH))/3)))+(reaction.T>reaction.Thi_QHH)*(reaction.aHi6_QHH+reaction.Thi_QHH*(reaction.aHi1_QHH+0.5*reaction.Thi_QHH*(reaction.aHi2_QHH+2*reaction.Thi_QHH*(reaction.aHi3_QHH+0.75*reaction.Thi_QHH*(reaction.aHi4_QHH+0.8*reaction.Thi_QHH*reaction.aHi5_QHH))/3))))
      s = R_const*((reaction.T<=reaction.Tlo_QHH)*(reaction.aLo7_QHH+reaction.aLo1_QHH*log(reaction.T/1[K])+reaction.Tlo_QHH*(reaction.aLo2_QHH+0.5*reaction.Tlo_QHH*(reaction.aLo3_QHH+2*reaction.Tlo_QHH*(reaction.aLo4_QHH+0.75*reaction.Tlo_QHH*reaction.aLo5_QHH)/3)))+(reaction.T>reaction.Tlo_QHH)*(reaction.T<=reaction.Tmid_QHH)*(reaction.aLo7_QHH+reaction.aLo1_QHH*log(reaction.T/1[K])+reaction.T*(reaction.aLo2_QHH+0.5*reaction.T*(reaction.aLo3_QHH+2*reaction.T*(reaction.aLo4_QHH+0.75*reaction.T*reaction.aLo5_QHH)/3)))+(reaction.T>reaction.Tmid_QHH)*(reaction.T<=reaction.Thi_QHH)*(reaction.aHi7_QHH+reaction.aHi1_QHH*log(reaction.T/1[K])+reaction.T*(reaction.aHi2_QHH+0.5*reaction.T*(reaction.aHi3_QHH+2*reaction.T*(reaction.aHi4_QHH+0.75*reaction.T*reaction.aHi5_QHH)/3)))+(reaction.T>reaction.Thi_QHH)*(reaction.aHi7_QHH+reaction.aHi1_QHH*log(reaction.T/1[K])+reaction.Thi_QHH*(reaction.aHi2_QHH+0.5*reaction.Thi_QHH*(reaction.aHi3_QHH+2*reaction.Thi_QHH*(reaction.aHi4_QHH+0.75*reaction.Thi_QHH*reaction.aHi5_QHH)/3))))
      Cp = R_const*((reaction.T<=reaction.Tlo_QHH)*(reaction.aLo1_QHH+reaction.Tlo_QHH*(reaction.aLo2_QHH+reaction.Tlo_QHH*(reaction.aLo3_QHH+reaction.Tlo_QHH*(reaction.aLo4_QHH+reaction.Tlo_QHH*reaction.aLo5_QHH))))+(reaction.T>reaction.Tlo_QHH)*(reaction.T<=reaction.Tmid_QHH)*(reaction.aLo1_QHH+reaction.T*(reaction.aLo2_QHH+reaction.T*(reaction.aLo3_QHH+reaction.T*(reaction.aLo4_QHH+reaction.T*reaction.aLo5_QHH))))+(reaction.T>reaction.Tmid_QHH)*(reaction.T<=reaction.Thi_QHH)*(reaction.aHi1_QHH+reaction.T*(reaction.aHi2_QHH+reaction.T*(reaction.aHi3_QHH+reaction.T*(reaction.aHi4_QHH+reaction.T*reaction.aHi5_QHH))))+(reaction.T>reaction.Thi_QHH)*(reaction.aHi1_QHH+reaction.Thi_QHH*(reaction.aHi2_QHH+reaction.Thi_QHH*(reaction.aHi3_QHH+reaction.Thi_QHH*(reaction.aHi4_QHH+reaction.Thi_QHH*reaction.aHi5_QHH)))))
      ReactionTagInSpecies = {rch4, rch5}
      specName = QHH
      R = reaction.r_4-reaction.r_5
      mixtureSolvent = 1
    prod: SpeciesChem "Species: prod"
      sisDef = 1
      sSequenceNo = 12
      SpeciesSource = Reaction
      specLabel = prod
      h = R_const*((reaction.T<=reaction.Tlo_prod)*(reaction.aLo6_prod+reaction.Tlo_prod*(reaction.aLo1_prod+0.5*reaction.Tlo_prod*(reaction.aLo2_prod+2*reaction.Tlo_prod*(reaction.aLo3_prod+0.75*reaction.Tlo_prod*(reaction.aLo4_prod+0.8*reaction.Tlo_prod*reaction.aLo5_prod))/3)))+(reaction.T>reaction.Tlo_prod)*(reaction.T<=reaction.Tmid_prod)*(reaction.aLo6_prod+reaction.T*(reaction.aLo1_prod+0.5*reaction.T*(reaction.aLo2_prod+2*reaction.T*(reaction.aLo3_prod+0.75*reaction.T*(reaction.aLo4_prod+0.8*reaction.T*reaction.aLo5_prod))/3)))+(reaction.T>reaction.Tmid_prod)*(reaction.T<=reaction.Thi_prod)*(reaction.aHi6_prod+reaction.T*(reaction.aHi1_prod+0.5*reaction.T*(reaction.aHi2_prod+2*reaction.T*(reaction.aHi3_prod+0.75*reaction.T*(reaction.aHi4_prod+0.8*reaction.T*reaction.aHi5_prod))/3)))+(reaction.T>reaction.Thi_prod)*(reaction.aHi6_prod+reaction.Thi_prod*(reaction.aHi1_prod+0.5*reaction.Thi_prod*(reaction.aHi2_prod+2*reaction.Thi_prod*(reaction.aHi3_prod+0.75*reaction.Thi_prod*(reaction.aHi4_prod+0.8*reaction.Thi_prod*reaction.aHi5_prod))/3))))
      s = R_const*((reaction.T<=reaction.Tlo_prod)*(reaction.aLo7_prod+reaction.aLo1_prod*log(reaction.T/1[K])+reaction.Tlo_prod*(reaction.aLo2_prod+0.5*reaction.Tlo_prod*(reaction.aLo3_prod+2*reaction.Tlo_prod*(reaction.aLo4_prod+0.75*reaction.Tlo_prod*reaction.aLo5_prod)/3)))+(reaction.T>reaction.Tlo_prod)*(reaction.T<=reaction.Tmid_prod)*(reaction.aLo7_prod+reaction.aLo1_prod*log(reaction.T/1[K])+reaction.T*(reaction.aLo2_prod+0.5*reaction.T*(reaction.aLo3_prod+2*reaction.T*(reaction.aLo4_prod+0.75*reaction.T*reaction.aLo5_prod)/3)))+(reaction.T>reaction.Tmid_prod)*(reaction.T<=reaction.Thi_prod)*(reaction.aHi7_prod+reaction.aHi1_prod*log(reaction.T/1[K])+reaction.T*(reaction.aHi2_prod+0.5*reaction.T*(reaction.aHi3_prod+2*reaction.T*(reaction.aHi4_prod+0.75*reaction.T*reaction.aHi5_prod)/3)))+(reaction.T>reaction.Thi_prod)*(reaction.aHi7_prod+reaction.aHi1_prod*log(reaction.T/1[K])+reaction.Thi_prod*(reaction.aHi2_prod+0.5*reaction.Thi_prod*(reaction.aHi3_prod+2*reaction.Thi_prod*(reaction.aHi4_prod+0.75*reaction.Thi_prod*reaction.aHi5_prod)/3))))
      Cp = R_const*((reaction.T<=reaction.Tlo_prod)*(reaction.aLo1_prod+reaction.Tlo_prod*(reaction.aLo2_prod+reaction.Tlo_prod*(reaction.aLo3_prod+reaction.Tlo_prod*(reaction.aLo4_prod+reaction.Tlo_prod*reaction.aLo5_prod))))+(reaction.T>reaction.Tlo_prod)*(reaction.T<=reaction.Tmid_prod)*(reaction.aLo1_prod+reaction.T*(reaction.aLo2_prod+reaction.T*(reaction.aLo3_prod+reaction.T*(reaction.aLo4_prod+reaction.T*reaction.aLo5_prod))))+(reaction.T>reaction.Tmid_prod)*(reaction.T<=reaction.Thi_prod)*(reaction.aHi1_prod+reaction.T*(reaction.aHi2_prod+reaction.T*(reaction.aHi3_prod+reaction.T*(reaction.aHi4_prod+reaction.T*reaction.aHi5_prod))))+(reaction.T>reaction.Thi_prod)*(reaction.aHi1_prod+reaction.Thi_prod*(reaction.aHi2_prod+reaction.Thi_prod*(reaction.aHi3_prod+reaction.Thi_prod*(reaction.aHi4_prod+reaction.Thi_prod*reaction.aHi5_prod)))))
      ReactionTagInSpecies = {rch4, rch6, rch9}
      specName = prod
      R = reaction.r_4+reaction.r_6+reaction.r_9
      mixtureSolvent = 1
    QD: SpeciesChem "Species: QD"
      sisDef = 1
      sSequenceNo = 13
      SpeciesSource = Reaction
      specLabel = QD
      h = R_const*((reaction.T<=reaction.Tlo_QD)*(reaction.aLo6_QD+reaction.Tlo_QD*(reaction.aLo1_QD+0.5*reaction.Tlo_QD*(reaction.aLo2_QD+2*reaction.Tlo_QD*(reaction.aLo3_QD+0.75*reaction.Tlo_QD*(reaction.aLo4_QD+0.8*reaction.Tlo_QD*reaction.aLo5_QD))/3)))+(reaction.T>reaction.Tlo_QD)*(reaction.T<=reaction.Tmid_QD)*(reaction.aLo6_QD+reaction.T*(reaction.aLo1_QD+0.5*reaction.T*(reaction.aLo2_QD+2*reaction.T*(reaction.aLo3_QD+0.75*reaction.T*(reaction.aLo4_QD+0.8*reaction.T*reaction.aLo5_QD))/3)))+(reaction.T>reaction.Tmid_QD)*(reaction.T<=reaction.Thi_QD)*(reaction.aHi6_QD+reaction.T*(reaction.aHi1_QD+0.5*reaction.T*(reaction.aHi2_QD+2*reaction.T*(reaction.aHi3_QD+0.75*reaction.T*(reaction.aHi4_QD+0.8*reaction.T*reaction.aHi5_QD))/3)))+(reaction.T>reaction.Thi_QD)*(reaction.aHi6_QD+reaction.Thi_QD*(reaction.aHi1_QD+0.5*reaction.Thi_QD*(reaction.aHi2_QD+2*reaction.Thi_QD*(reaction.aHi3_QD+0.75*reaction.Thi_QD*(reaction.aHi4_QD+0.8*reaction.Thi_QD*reaction.aHi5_QD))/3))))
      s = R_const*((reaction.T<=reaction.Tlo_QD)*(reaction.aLo7_QD+reaction.aLo1_QD*log(reaction.T/1[K])+reaction.Tlo_QD*(reaction.aLo2_QD+0.5*reaction.Tlo_QD*(reaction.aLo3_QD+2*reaction.Tlo_QD*(reaction.aLo4_QD+0.75*reaction.Tlo_QD*reaction.aLo5_QD)/3)))+(reaction.T>reaction.Tlo_QD)*(reaction.T<=reaction.Tmid_QD)*(reaction.aLo7_QD+reaction.aLo1_QD*log(reaction.T/1[K])+reaction.T*(reaction.aLo2_QD+0.5*reaction.T*(reaction.aLo3_QD+2*reaction.T*(reaction.aLo4_QD+0.75*reaction.T*reaction.aLo5_QD)/3)))+(reaction.T>reaction.Tmid_QD)*(reaction.T<=reaction.Thi_QD)*(reaction.aHi7_QD+reaction.aHi1_QD*log(reaction.T/1[K])+reaction.T*(reaction.aHi2_QD+0.5*reaction.T*(reaction.aHi3_QD+2*reaction.T*(reaction.aHi4_QD+0.75*reaction.T*reaction.aHi5_QD)/3)))+(reaction.T>reaction.Thi_QD)*(reaction.aHi7_QD+reaction.aHi1_QD*log(reaction.T/1[K])+reaction.Thi_QD*(reaction.aHi2_QD+0.5*reaction.Thi_QD*(reaction.aHi3_QD+2*reaction.Thi_QD*(reaction.aHi4_QD+0.75*reaction.Thi_QD*reaction.aHi5_QD)/3))))
      Cp = R_const*((reaction.T<=reaction.Tlo_QD)*(reaction.aLo1_QD+reaction.Tlo_QD*(reaction.aLo2_QD+reaction.Tlo_QD*(reaction.aLo3_QD+reaction.Tlo_QD*(reaction.aLo4_QD+reaction.Tlo_QD*reaction.aLo5_QD))))+(reaction.T>reaction.Tlo_QD)*(reaction.T<=reaction.Tmid_QD)*(reaction.aLo1_QD+reaction.T*(reaction.aLo2_QD+reaction.T*(reaction.aLo3_QD+reaction.T*(reaction.aLo4_QD+reaction.T*reaction.aLo5_QD))))+(reaction.T>reaction.Tmid_QD)*(reaction.T<=reaction.Thi_QD)*(reaction.aHi1_QD+reaction.T*(reaction.aHi2_QD+reaction.T*(reaction.aHi3_QD+reaction.T*(reaction.aHi4_QD+reaction.T*reaction.aHi5_QD))))+(reaction.T>reaction.Thi_QD)*(reaction.aHi1_QD+reaction.Thi_QD*(reaction.aHi2_QD+reaction.Thi_QD*(reaction.aHi3_QD+reaction.Thi_QD*(reaction.aHi4_QD+reaction.Thi_QD*reaction.aHi5_QD)))))
      ReactionTagInSpecies = {rch7, rch8}
      specName = QD
      R = reaction.r_7-reaction.r_8
      mixtureSolvent = 1
    MONO: SpeciesChem "Species: MONO"
      sisDef = 1
      sType = volumetric
      sSequenceNo = 15
      SpeciesSource = Reaction
      specLabel = MONO
      Tlo = 300[K]
      Tmid = 1000[K]
      Thi = 5000[K]
      h = R_const*((reaction.T<=reaction.Tlo_MONO)*(reaction.aLo6_MONO+reaction.Tlo_MONO*(reaction.aLo1_MONO+0.5*reaction.Tlo_MONO*(reaction.aLo2_MONO+2*reaction.Tlo_MONO*(reaction.aLo3_MONO+0.75*reaction.Tlo_MONO*(reaction.aLo4_MONO+0.8*reaction.Tlo_MONO*reaction.aLo5_MONO))/3)))+(reaction.T>reaction.Tlo_MONO)*(reaction.T<=reaction.Tmid_MONO)*(reaction.aLo6_MONO+reaction.T*(reaction.aLo1_MONO+0.5*reaction.T*(reaction.aLo2_MONO+2*reaction.T*(reaction.aLo3_MONO+0.75*reaction.T*(reaction.aLo4_MONO+0.8*reaction.T*reaction.aLo5_MONO))/3)))+(reaction.T>reaction.Tmid_MONO)*(reaction.T<=reaction.Thi_MONO)*(reaction.aHi6_MONO+reaction.T*(reaction.aHi1_MONO+0.5*reaction.T*(reaction.aHi2_MONO+2*reaction.T*(reaction.aHi3_MONO+0.75*reaction.T*(reaction.aHi4_MONO+0.8*reaction.T*reaction.aHi5_MONO))/3)))+(reaction.T>reaction.Thi_MONO)*(reaction.aHi6_MONO+reaction.Thi_MONO*(reaction.aHi1_MONO+0.5*reaction.Thi_MONO*(reaction.aHi2_MONO+2*reaction.Thi_MONO*(reaction.aHi3_MONO+0.75*reaction.Thi_MONO*(reaction.aHi4_MONO+0.8*reaction.Thi_MONO*reaction.aHi5_MONO))/3))))
      s = R_const*((reaction.T<=reaction.Tlo_MONO)*(reaction.aLo7_MONO+reaction.aLo1_MONO*log(reaction.T/1[K])+reaction.Tlo_MONO*(reaction.aLo2_MONO+0.5*reaction.Tlo_MONO*(reaction.aLo3_MONO+2*reaction.Tlo_MONO*(reaction.aLo4_MONO+0.75*reaction.Tlo_MONO*reaction.aLo5_MONO)/3)))+(reaction.T>reaction.Tlo_MONO)*(reaction.T<=reaction.Tmid_MONO)*(reaction.aLo7_MONO+reaction.aLo1_MONO*log(reaction.T/1[K])+reaction.T*(reaction.aLo2_MONO+0.5*reaction.T*(reaction.aLo3_MONO+2*reaction.T*(reaction.aLo4_MONO+0.75*reaction.T*reaction.aLo5_MONO)/3)))+(reaction.T>reaction.Tmid_MONO)*(reaction.T<=reaction.Thi_MONO)*(reaction.aHi7_MONO+reaction.aHi1_MONO*log(reaction.T/1[K])+reaction.T*(reaction.aHi2_MONO+0.5*reaction.T*(reaction.aHi3_MONO+2*reaction.T*(reaction.aHi4_MONO+0.75*reaction.T*reaction.aHi5_MONO)/3)))+(reaction.T>reaction.Thi_MONO)*(reaction.aHi7_MONO+reaction.aHi1_MONO*log(reaction.T/1[K])+reaction.Thi_MONO*(reaction.aHi2_MONO+0.5*reaction.Thi_MONO*(reaction.aHi3_MONO+2*reaction.Thi_MONO*(reaction.aHi4_MONO+0.75*reaction.Thi_MONO*reaction.aHi5_MONO)/3))))
      Cp = R_const*((reaction.T<=reaction.Tlo_MONO)*(reaction.aLo1_MONO+reaction.Tlo_MONO*(reaction.aLo2_MONO+reaction.Tlo_MONO*(reaction.aLo3_MONO+reaction.Tlo_MONO*(reaction.aLo4_MONO+reaction.Tlo_MONO*reaction.aLo5_MONO))))+(reaction.T>reaction.Tlo_MONO)*(reaction.T<=reaction.Tmid_MONO)*(reaction.aLo1_MONO+reaction.T*(reaction.aLo2_MONO+reaction.T*(reaction.aLo3_MONO+reaction.T*(reaction.aLo4_MONO+reaction.T*reaction.aLo5_MONO))))+(reaction.T>reaction.Tmid_MONO)*(reaction.T<=reaction.Thi_MONO)*(reaction.aHi1_MONO+reaction.T*(reaction.aHi2_MONO+reaction.T*(reaction.aHi3_MONO+reaction.T*(reaction.aHi4_MONO+reaction.T*reaction.aHi5_MONO))))+(reaction.T>reaction.Thi_MONO)*(reaction.aHi1_MONO+reaction.Thi_MONO*(reaction.aHi2_MONO+reaction.Thi_MONO*(reaction.aHi3_MONO+reaction.Thi_MONO*(reaction.aHi4_MONO+reaction.Thi_MONO*reaction.aHi5_MONO)))))
      sigma = 3.458[angstrom]
      epsilonkb = 107.4[K]
      mu = 0[C*m]
      ActivityCoefficient = 1
      speciesEnthalpy = NASA
      ReactionTagInSpecies = rch10
      updatefeat = 1
      GasThermalConductivitySel = Automatic
      GasDiffusivitySel = Automatic
      LiquidDiffusivitySel = Automatic
      k = 0.02[W/(m*K)]
      De = 1e-5[m^2/s]
      SpeciesrateSelection = Automatic
      specName = MONO
      R = -reaction.r_10
      Speciesrate = 0[mol/(m^3*s)]
      SpeciesrateSurf = 0[mol/(m^2*s)]
      Speciessurfacerate = 0[mol/(m^2*s)]
      typeGUIControl = volumetric
      mixtureSolvent = 1
      Dgas = 10^-5[m^2/s]
      Dliquid = 10^-8[m^2/s]
      kgas = 0.015[W/(m*K)]
      MolarMassSelection = Thermodynamics
      M = 0.0[kg/mol]
      liquidDensitySel = Thermodynamics
      rho = 1000[kg/m^3]
      LiquidThermalConductivitySel = Thermodynamics
    MONOR: SpeciesChem "Species: MONOR"
      sisDef = 1
      sType = volumetric
      sSequenceNo = 16
      SpeciesSource = Reaction
      specLabel = MONOR
      Tlo = 300[K]
      Tmid = 1000[K]
      Thi = 5000[K]
      h = R_const*((reaction.T<=reaction.Tlo_MONOR)*(reaction.aLo6_MONOR+reaction.Tlo_MONOR*(reaction.aLo1_MONOR+0.5*reaction.Tlo_MONOR*(reaction.aLo2_MONOR+2*reaction.Tlo_MONOR*(reaction.aLo3_MONOR+0.75*reaction.Tlo_MONOR*(reaction.aLo4_MONOR+0.8*reaction.Tlo_MONOR*reaction.aLo5_MONOR))/3)))+(reaction.T>reaction.Tlo_MONOR)*(reaction.T<=reaction.Tmid_MONOR)*(reaction.aLo6_MONOR+reaction.T*(reaction.aLo1_MONOR+0.5*reaction.T*(reaction.aLo2_MONOR+2*reaction.T*(reaction.aLo3_MONOR+0.75*reaction.T*(reaction.aLo4_MONOR+0.8*reaction.T*reaction.aLo5_MONOR))/3)))+(reaction.T>reaction.Tmid_MONOR)*(reaction.T<=reaction.Thi_MONOR)*(reaction.aHi6_MONOR+reaction.T*(reaction.aHi1_MONOR+0.5*reaction.T*(reaction.aHi2_MONOR+2*reaction.T*(reaction.aHi3_MONOR+0.75*reaction.T*(reaction.aHi4_MONOR+0.8*reaction.T*reaction.aHi5_MONOR))/3)))+(reaction.T>reaction.Thi_MONOR)*(reaction.aHi6_MONOR+reaction.Thi_MONOR*(reaction.aHi1_MONOR+0.5*reaction.Thi_MONOR*(reaction.aHi2_MONOR+2*reaction.Thi_MONOR*(reaction.aHi3_MONOR+0.75*reaction.Thi_MONOR*(reaction.aHi4_MONOR+0.8*reaction.Thi_MONOR*reaction.aHi5_MONOR))/3))))
      s = R_const*((reaction.T<=reaction.Tlo_MONOR)*(reaction.aLo7_MONOR+reaction.aLo1_MONOR*log(reaction.T/1[K])+reaction.Tlo_MONOR*(reaction.aLo2_MONOR+0.5*reaction.Tlo_MONOR*(reaction.aLo3_MONOR+2*reaction.Tlo_MONOR*(reaction.aLo4_MONOR+0.75*reaction.Tlo_MONOR*reaction.aLo5_MONOR)/3)))+(reaction.T>reaction.Tlo_MONOR)*(reaction.T<=reaction.Tmid_MONOR)*(reaction.aLo7_MONOR+reaction.aLo1_MONOR*log(reaction.T/1[K])+reaction.T*(reaction.aLo2_MONOR+0.5*reaction.T*(reaction.aLo3_MONOR+2*reaction.T*(reaction.aLo4_MONOR+0.75*reaction.T*reaction.aLo5_MONOR)/3)))+(reaction.T>reaction.Tmid_MONOR)*(reaction.T<=reaction.Thi_MONOR)*(reaction.aHi7_MONOR+reaction.aHi1_MONOR*log(reaction.T/1[K])+reaction.T*(reaction.aHi2_MONOR+0.5*reaction.T*(reaction.aHi3_MONOR+2*reaction.T*(reaction.aHi4_MONOR+0.75*reaction.T*reaction.aHi5_MONOR)/3)))+(reaction.T>reaction.Thi_MONOR)*(reaction.aHi7_MONOR+reaction.aHi1_MONOR*log(reaction.T/1[K])+reaction.Thi_MONOR*(reaction.aHi2_MONOR+0.5*reaction.Thi_MONOR*(reaction.aHi3_MONOR+2*reaction.Thi_MONOR*(reaction.aHi4_MONOR+0.75*reaction.Thi_MONOR*reaction.aHi5_MONOR)/3))))
      Cp = R_const*((reaction.T<=reaction.Tlo_MONOR)*(reaction.aLo1_MONOR+reaction.Tlo_MONOR*(reaction.aLo2_MONOR+reaction.Tlo_MONOR*(reaction.aLo3_MONOR+reaction.Tlo_MONOR*(reaction.aLo4_MONOR+reaction.Tlo_MONOR*reaction.aLo5_MONOR))))+(reaction.T>reaction.Tlo_MONOR)*(reaction.T<=reaction.Tmid_MONOR)*(reaction.aLo1_MONOR+reaction.T*(reaction.aLo2_MONOR+reaction.T*(reaction.aLo3_MONOR+reaction.T*(reaction.aLo4_MONOR+reaction.T*reaction.aLo5_MONOR))))+(reaction.T>reaction.Tmid_MONOR)*(reaction.T<=reaction.Thi_MONOR)*(reaction.aHi1_MONOR+reaction.T*(reaction.aHi2_MONOR+reaction.T*(reaction.aHi3_MONOR+reaction.T*(reaction.aHi4_MONOR+reaction.T*reaction.aHi5_MONOR))))+(reaction.T>reaction.Thi_MONOR)*(reaction.aHi1_MONOR+reaction.Thi_MONOR*(reaction.aHi2_MONOR+reaction.Thi_MONOR*(reaction.aHi3_MONOR+reaction.Thi_MONOR*(reaction.aHi4_MONOR+reaction.Thi_MONOR*reaction.aHi5_MONOR)))))
      sigma = 3.458[angstrom]
      epsilonkb = 107.4[K]
      mu = 0[C*m]
      ActivityCoefficient = 1
      speciesEnthalpy = NASA
      ReactionTagInSpecies = {rch10, rch11}
      updatefeat = 1
      GasThermalConductivitySel = Automatic
      GasDiffusivitySel = Automatic
      LiquidDiffusivitySel = Automatic
      k = 0.02[W/(m*K)]
      De = 1e-5[m^2/s]
      SpeciesrateSelection = Automatic
      specName = MONOR
      R = reaction.r_10-2*reaction.r_11
      Speciesrate = 0[mol/(m^3*s)]
      SpeciesrateSurf = 0[mol/(m^2*s)]
      Speciessurfacerate = 0[mol/(m^2*s)]
      typeGUIControl = volumetric
      mixtureSolvent = 1
      Dgas = 10^-5[m^2/s]
      Dliquid = 10^-8[m^2/s]
      kgas = 0.015[W/(m*K)]
      MolarMassSelection = Thermodynamics
      M = 0.0[kg/mol]
      liquidDensitySel = Thermodynamics
      rho = 1000[kg/m^3]
      LiquidThermalConductivitySel = Thermodynamics
    rch1: ReactionChem "Ke: Q+DH=>QH+D"
      reset = 1
      formulaID = irrev_D_DH_Q_QH_
      KeqNum = reaction.c_QH*reaction.c_D*(1[m^3/mol])^2
      KeqDen = reaction.c_Q*reaction.c_DH*(1[m^3/mol])^2
      rIsValid = 1
      rType = irrev
      stoichArray = {-1, -1, 1, 1}
      fwdSpecies = {Q, DH}
      revSpecies = {QH, D}
      fwdSpeciesTags = {Q, DH}
      revSpeciesTags = {QH, D}
      Species = {Q, DH, QH, D}
      textOverallOrder = Overall forward reaction order: 2
      bulkFwdOrder = 2
      bulkRevOrder = 2
      formula = Q+DH=>QH+D
      kf = Ke*light [l/(mol*s)]
    rch3: ReactionChem "Kr: QH + D => QHD"
      reset = 1
      formulaID = irrev_D_QH_QHD_
      KeqNum = reaction.c_QHD*1[m^3/mol]
      KeqDen = reaction.c_QH*reaction.c_D*(1[m^3/mol])^2
      rIsValid = 1
      rType = irrev
      stoichArray = {-1, -1, 1}
      fwdSpecies = {QH, D}
      revSpecies = QHD
      fwdSpeciesTags = {QH, D}
      revSpeciesTags = QHD
      Species = {QH, D, QHD}
      textOverallOrder = Overall forward reaction order: 2
      bulkFwdOrder = 2
      bulkRevOrder = 1
      formula = QH+D=>QHD
      kf = Kr [l/(mol*s)]
    rch4: ReactionChem "Kp: QHD =>QHH + prod"
      reset = 1
      formulaID = irrev_prod_QHD_QHH_
      KeqNum = reaction.c_QHH*reaction.c_prod*(1[m^3/mol])^2
      KeqDen = reaction.c_QHD*1[m^3/mol]
      rIsValid = 1
      rType = irrev
      stoichArray = {-1, 1, 1}
      fwdSpecies = QHD
      revSpecies = {QHH, prod}
      fwdSpeciesTags = QHD
      revSpeciesTags = {QHH, prod}
      Species = {QHD, QHH, prod}
      textOverallOrder = Overall forward reaction order: 1
      bulkFwdOrder = 1
      bulkRevOrder = 2
      formula = QHD=>QHH+prod
      kf = Kp [1/s]
    rch5: ReactionChem "KqH/Kdisp: Q + QHH <=> 2 QH"
      reset = 1
      formulaID = rev_Q_QH_QHH_
      KeqNum = (reaction.c_QH*1[m^3/mol])^2
      KeqDen = reaction.c_Q*reaction.c_QHH*(1[m^3/mol])^2
      rIsValid = 1
      stoichArray = {-1, -1, 2}
      fwdSpecies = {Q, QHH}
      revSpecies = QH
      fwdSpeciesTags = {Q, QHH}
      revSpeciesTags = QH
      Species = {Q, QHH, QH}
      textOverallOrder = Overall forward reaction order: 2 Overall reverse reaction order: 2
      bulkFwdOrder = 2
      bulkRevOrder = 2
      formula = Q+QHH<=>2QH
      kf = KqH [l/(mol*s)]
      kr = Kdisp [l/(mol*s)]
    rch6: ReactionChem "Kph: Q => prod"
      reset = 1
      formulaID = irrev_prod_Q_
      KeqNum = reaction.c_prod*1[m^3/mol]
      KeqDen = reaction.c_Q*1[m^3/mol]
      rIsValid = 1
      rType = irrev
      stoichArray = {-1, 1}
      fwdSpecies = Q
      revSpecies = prod
      fwdSpeciesTags = Q
      revSpeciesTags = prod
      Species = {Q, prod}
      textOverallOrder = Overall forward reaction order: 1
      bulkFwdOrder = 1
      bulkRevOrder = 1
      formula = Q=>prod
      kf = Kph [1/s]
    rch7: ReactionChem "Ks: Q + QHD =>QH + QD"
      reset = 1
      formulaID = irrev_Q_QD_QH_QHD_
      KeqNum = reaction.c_QH*reaction.c_QD*(1[m^3/mol])^2
      KeqDen = reaction.c_Q*reaction.c_QHD*(1[m^3/mol])^2
      rIsValid = 1
      rType = irrev
      stoichArray = {-1, -1, 1, 1}
      fwdSpecies = {Q, QHD}
      revSpecies = {QH, QD}
      fwdSpeciesTags = {Q, QHD}
      revSpeciesTags = {QH, QD}
      Species = {Q, QHD, QH, QD}
      textOverallOrder = Overall forward reaction order: 2
      bulkFwdOrder = 2
      bulkRevOrder = 2
      formula = Q+QHD=>QH+QD
      kf = Ks [l/(mol*s)]
    rch8: ReactionChem "Kd/Kc: QD <=>Q + D"
      reset = 1
      formulaID = rev_D_Q_QD_
      KeqNum = reaction.c_Q*reaction.c_D*(1[m^3/mol])^2
      KeqDen = reaction.c_QD*1[m^3/mol]
      rIsValid = 1
      stoichArray = {-1, 1, 1}
      fwdSpecies = QD
      revSpecies = {Q, D}
      fwdSpeciesTags = QD
      revSpeciesTags = {Q, D}
      Species = {QD, Q, D}
      textOverallOrder = Overall forward reaction order: 1 Overall reverse reaction order: 2
      bulkFwdOrder = 1
      bulkRevOrder = 2
      formula = QD<=>Q+D
      kf = Kd [1/s]
      kr = Kc [l/(mol*s)]
    rch9: ReactionChem "KrD: 2 D => prod"
      reset = 1
      formulaID = irrev_D_prod_
      KeqNum = reaction.c_prod*1[m^3/mol]
      KeqDen = (reaction.c_D*1[m^3/mol])^2
      rIsValid = 1
      rType = irrev
      stoichArray = {-2, 1}
      fwdSpecies = D
      revSpecies = prod
      fwdSpeciesTags = D
      revSpeciesTags = prod
      Species = {D, prod}
      textOverallOrder = Overall forward reaction order: 2
      bulkFwdOrder = 2
      bulkRevOrder = 1
      formula = 2D=>prod
      kf = KrD [l/(mol*s)]
    rch10: ReactionChem "Kact: MONO + D =>DH + MONOR" | formula = MONO+D=>DH+MONOR; kf = Kact [l/(mol*s)]
    rch11: ReactionChem "Kpol: 2MONOR =>POL" | formula = 2MONOR=>POL; kf = Kpol [l/(mol*s)]
    est1: ParameterEstimation "Estimation" (disabled)
    POL: SpeciesChem "Species: POL"
      sisDef = 1
      sType = volumetric
      sSequenceNo = 17
      SpeciesSource = Reaction
      specLabel = POL
      Tlo = 300[K]
      Tmid = 1000[K]
      Thi = 5000[K]
      h = R_const*((reaction.T<=reaction.Tlo_POL)*(reaction.aLo6_POL+reaction.Tlo_POL*(reaction.aLo1_POL+0.5*reaction.Tlo_POL*(reaction.aLo2_POL+2*reaction.Tlo_POL*(reaction.aLo3_POL+0.75*reaction.Tlo_POL*(reaction.aLo4_POL+0.8*reaction.Tlo_POL*reaction.aLo5_POL))/3)))+(reaction.T>reaction.Tlo_POL)*(reaction.T<=reaction.Tmid_POL)*(reaction.aLo6_POL+reaction.T*(reaction.aLo1_POL+0.5*reaction.T*(reaction.aLo2_POL+2*reaction.T*(reaction.aLo3_POL+0.75*reaction.T*(reaction.aLo4_POL+0.8*reaction.T*reaction.aLo5_POL))/3)))+(reaction.T>reaction.Tmid_POL)*(reaction.T<=reaction.Thi_POL)*(reaction.aHi6_POL+reaction.T*(reaction.aHi1_POL+0.5*reaction.T*(reaction.aHi2_POL+2*reaction.T*(reaction.aHi3_POL+0.75*reaction.T*(reaction.aHi4_POL+0.8*reaction.T*reaction.aHi5_POL))/3)))+(reaction.T>reaction.Thi_POL)*(reaction.aHi6_POL+reaction.Thi_POL*(reaction.aHi1_POL+0.5*reaction.Thi_POL*(reaction.aHi2_POL+2*reaction.Thi_POL*(reaction.aHi3_POL+0.75*reaction.Thi_POL*(reaction.aHi4_POL+0.8*reaction.Thi_POL*reaction.aHi5_POL))/3))))
      s = R_const*((reaction.T<=reaction.Tlo_POL)*(reaction.aLo7_POL+reaction.aLo1_POL*log(reaction.T/1[K])+reaction.Tlo_POL*(reaction.aLo2_POL+0.5*reaction.Tlo_POL*(reaction.aLo3_POL+2*reaction.Tlo_POL*(reaction.aLo4_POL+0.75*reaction.Tlo_POL*reaction.aLo5_POL)/3)))+(reaction.T>reaction.Tlo_POL)*(reaction.T<=reaction.Tmid_POL)*(reaction.aLo7_POL+reaction.aLo1_POL*log(reaction.T/1[K])+reaction.T*(reaction.aLo2_POL+0.5*reaction.T*(reaction.aLo3_POL+2*reaction.T*(reaction.aLo4_POL+0.75*reaction.T*reaction.aLo5_POL)/3)))+(reaction.T>reaction.Tmid_POL)*(reaction.T<=reaction.Thi_POL)*(reaction.aHi7_POL+reaction.aHi1_POL*log(reaction.T/1[K])+reaction.T*(reaction.aHi2_POL+0.5*reaction.T*(reaction.aHi3_POL+2*reaction.T*(reaction.aHi4_POL+0.75*reaction.T*reaction.aHi5_POL)/3)))+(reaction.T>reaction.Thi_POL)*(reaction.aHi7_POL+reaction.aHi1_POL*log(reaction.T/1[K])+reaction.Thi_POL*(reaction.aHi2_POL+0.5*reaction.Thi_POL*(reaction.aHi3_POL+2*reaction.Thi_POL*(reaction.aHi4_POL+0.75*reaction.Thi_POL*reaction.aHi5_POL)/3))))
      Cp = R_const*((reaction.T<=reaction.Tlo_POL)*(reaction.aLo1_POL+reaction.Tlo_POL*(reaction.aLo2_POL+reaction.Tlo_POL*(reaction.aLo3_POL+reaction.Tlo_POL*(reaction.aLo4_POL+reaction.Tlo_POL*reaction.aLo5_POL))))+(reaction.T>reaction.Tlo_POL)*(reaction.T<=reaction.Tmid_POL)*(reaction.aLo1_POL+reaction.T*(reaction.aLo2_POL+reaction.T*(reaction.aLo3_POL+reaction.T*(reaction.aLo4_POL+reaction.T*reaction.aLo5_POL))))+(reaction.T>reaction.Tmid_POL)*(reaction.T<=reaction.Thi_POL)*(reaction.aHi1_POL+reaction.T*(reaction.aHi2_POL+reaction.T*(reaction.aHi3_POL+reaction.T*(reaction.aHi4_POL+reaction.T*reaction.aHi5_POL))))+(reaction.T>reaction.Thi_POL)*(reaction.aHi1_POL+reaction.Thi_POL*(reaction.aHi2_POL+reaction.Thi_POL*(reaction.aHi3_POL+reaction.Thi_POL*(reaction.aHi4_POL+reaction.Thi_POL*reaction.aHi5_POL)))))
      sigma = 3.458[angstrom]
      epsilonkb = 107.4[K]
      mu = 0[C*m]
      ActivityCoefficient = 1
      speciesEnthalpy = NASA
      ReactionTagInSpecies = rch11
      updatefeat = 1
      GasThermalConductivitySel = Automatic
      GasDiffusivitySel = Automatic
      LiquidDiffusivitySel = Automatic
      k = 0.02[W/(m*K)]
      De = 1e-5[m^2/s]
      SpeciesrateSelection = Automatic
      specName = POL
      R = reaction.r_11
      Speciesrate = 0[mol/(m^3*s)]
      SpeciesrateSurf = 0[mol/(m^2*s)]
      Speciessurfacerate = 0[mol/(m^2*s)]
      typeGUIControl = volumetric
      mixtureSolvent = 1
      Dgas = 10^-5[m^2/s]
      Dliquid = 10^-8[m^2/s]
      kgas = 0.015[W/(m*K)]
      MolarMassSelection = Thermodynamics
      M = 0.0[kg/mol]
      liquidDensitySel = Thermodynamics
      rho = 1000[kg/m^3]
      LiquidThermalConductivitySel = Thermodynamics

Studies
  std1 "Generator"
    time: Transient "Time Dependent" | tlist = range(0,time_end/10,time_end)
  std4 "Sensitivity"
    sens: Sensitivity
      gradientMethod = forward
      gradientStep = time
      optobj = comp.reaction.c_D
      descr = Concentration
      optobjEvaluateFor = time
      initval = {1, 0.05, 1000000000, 1000000000, 1000000000, 0.001, 0.00001, 2000, 1000000000, 1000000000, 2, 0.0001, 0, 1, 0, 0, 1, 0, 0, 0, 0, 0}
      scale = {1, 1, 1, 1, 1, 1, 1, 1, 1, 1, 1, 1, 1, 1, 1, 1, 1, 1, 1, 1, 1, 1}
      valuetype = {real, real, real, real, real, real, real, real, real, real, real, real, real, real, real, real, real, real, real, real, real, real}
      pname = {Kc, Kd, Kdisp, Ke, KH, Kp, Kph, KqH, Kr, KrD, Ks, light, D0, DH0, DHp0, prod0, Q0, QD0, QH0, QHD0, QHH0, Qm0}
    time: Transient "Time Dependent" | tlist = range(0,time_end/10,time_end)
  std3 "Estimator"
    opt: Optimization | optsolver = lm; opttolinner = 0.01; gradientStep = time; objtable = tbl1; plotobj = on
    time: Transient "Time Dependent" | tlist = range(0,1e-4,time_end)

Solver configurations
  sol1 "Generator_Solution" (study std1)
    v1: Variables "Dependent Variables 1"
    t1: Time "Time-Dependent Solver 1"
      tlist = range(0,time_end/10,time_end)
      tout = tsteps
      rtol = 1.0E-5
      maxorder = 2
      masssingular = yes
      dDef: Direct | linsolver = pardiso
      fc1: FullyCoupled | dtech = auto
  sol4 "Estimator_Solution" (study std3)
    v1: Variables "Dependent Variables 1"
    o1: Optimization "Optimization Solver 1" | opttol = 0.01; optsolver = lm
      t1: TimeAttrib "Time-Dependent Solver 1"
        tlist = range(0,1e-4,time_end)
        tout = tsteps
        rtol = 1.0E-5
        tlistlsq = {0, 7.10714182498e-12, 1.421428365e-11, 2.84285672999e-11}
        dDef: Direct | linsolver = pardiso
        fc1: FullyCoupled | dtech = auto
  sol5 "Sensitivity_Solution" (study std4)
    v1: Variables "Dependent Variables 1"
    t1: Time "Time-Dependent Solver 1" | tlist = range(0,time_end/10,time_end); tout = tsteps; rtol = 1.0E-5
      dDef: Direct
      sn1: Sensitivity | sensfunc = all_obj_contrib
      fc1: FullyCoupled | dtech = auto

Datasets
  dset1: Solution "Generator_data" | solution = sol1
  dset4: Solution "Estimator_data" | solution = sol4
  dset5: Solution "Sensitivity_data" | solution = sol5

Evaluation groups
  eg1: EvaluationGroup "Generator_export" | data = dset1; filename = D:\WORKS\COMSOL_polymers\Batch\generator_out.csv
    gev1: EvalGlobal "All"
      expr = {reaction.c_Q, reaction.c_DH, reaction.c_QHD, reaction.c_QHH, reaction.c_prod, reaction.c_Qm, reaction.c_DHp, reaction.c_QH, reaction.c_D, reaction.c_QD}
      unit = {mol/m^3, mol/m^3, mol/m^3, mol/m^3, mol/m^3, , , mol/m^3, mol/m^3, mol/m^3}
      descr = {Q, DH, QHD, QHH, prod, Qm, DHp, QH, D, QD}

Plots
  pg1: PlotGroup1D "Generator_Stable" | data = dset1
    glob1: Global
      expr = {reaction.c_Q, reaction.c_DH, reaction.c_QHD, reaction.c_QHH, reaction.c_prod, reaction.c_POL}
      unit = {mol/m^3, mol/m^3, mol/m^3, mol/m^3, mol/m^3, mol/m^3}
      descr = {Q, DH, QHD, QHH, prod, POL}
  pg3: PlotGroup1D "Generator_Radicals" | data = dset1
    glob2: Global (disabled)
      expr = {reaction.c_Qm, reaction.c_DHp, reaction.c_QH, reaction.c_D, reaction.c_QD}
      unit = {, , mol/m^3, mol/m^3, mol/m^3}
      descr = {Qm, DHp, QH, D, QD}
    glob3: Global
      expr = {reaction.c_QH, reaction.c_D, reaction.c_QD}
      unit = {mol/m^3, mol/m^3, mol/m^3}
      descr = {QH, D, QD}
  pg8: PlotGroup1D "Loss_plot" | data = none; xlabel = Iterations; ylabel = MSE
    tblp1: Table "Plot" | table = tbl1; xaxisdata = rowindex; plotcolumninput = manual

Methods
  solve_view: CodeEditor "Method 1"
    public class solve_view extends ApplicationMethod {
      public void execute() {
        model.study("std1").run(); model.result("pg1").run();
        useGraphics(model.result("pg1"), "plots/graphics1");
        useGraphics(model.result("pg3"), "plots/graphics2");
      }
    }