// COMSOL Multiphysics 6.0.0.318 model "Старая модель — копия.mph"
// Outline of the model tree
// Unit system: none

Parameters
  a_par = 0.01  // N M dif
  b_par = a_par  // M P dif
  e_par = a_par*10  // N P dif
  gamma = 4

Functions
  gp1: GaussianPulse (disabled) | location = 0.7; sigma = 0.05; normalization = peak; peakvalue = 8
  gp2: GaussianPulse (disabled) | location = 1.3; sigma = 0.05; normalization = peak; peakvalue = 8
  an1: Analytic "L" | funcname = L; expr = if(t<0.2, (gp1(x)+gp2(x)),5) + t*0; args = {t, x}; argunit = {, }
  rect1: Rectangle | funcname = gp1; lower = 0.25; upper = 0.75; smooth = 0.01
  rect2: Rectangle | funcname = gp2; lower = 1.25; upper = 1.75; smooth = 0.01

Variables
  var1 "dif constants"
    a = a_par
    b = b_par*exp(-p/0.13)
    e = e_par*exp(-p/0.13)
    R = gamma*(1-p-n)*log((1-n)/(1-p-n))^((gamma-1)/gamma)

Selections
  sel1: Explicit on no boundaries

Geometry
  geom1 "Geometry" (1D, length unit m)
    i1: Interval "central" | coord = {0, 2}
    fin: Finalize "Form Union"

Physics
  n_flux: GeneralFormPDE "N flux" on all domains
    dependent variable n
    gfeq1: GeneralFormPDE (default) | f = 0; Ga = -a*nx + a*p*nx - e*p*nx - a*n*px + e*n*px; da = 1
    zflx1: ZeroFluxBoundary "Zero Flux 1" (default)
    init1: init "Initial Values 1" (default) | n = 0.1
  p_flux: GeneralFormPDE "P flux" on all domains
    dependent variable p
    gfeq1: GeneralFormPDE (default) | f = root.L(t,x) * R; Ga = -b*px - b*p*nx + e*p*nx + b*n*px - e*n*px; da = 1
    zflx1: ZeroFluxBoundary "Zero Flux 1" (default)
    init1: init "Initial Values 1" (default) | p = 0.001
  cb: CoefficientFormBoundaryPDE (disabled) on no boundaries
    dependent variable n
    ShapeProperty.order = 1
    cfeq1: CoefficientFormPDE (default) | c = 1; f = 0; da = 0
    init1: init "Initial Values 1" (default) | n = 0.01
  cb2: CoefficientFormBoundaryPDE (disabled) on no boundaries
    dependent variable p
    ShapeProperty.order = 1
    cfeq1: CoefficientFormPDE (default) | c = 1; f = 0; da = 0
    init1: init "Initial Values 1" (default) | p = gp1(x)

Mesh
  mesh1 "Central"
    size: MeshSizeDefault "Size cenral" | hmax = 0.01; hmin = 3.6E-4; hauto = 4; custom = on
    edg1: Edge on remaining entities
  mesh2 "Mesh 2"

Studies
  std1 "Study"
    time: Transient "Time Dependent" | tlist = range(0,0.01,10)

Solver configurations
  sol1 "Solution 1" (study std1)
    v1: Variables "Dependent Variables 1"
    t1: Time "Time-Dependent Solver 1" | tlist = range(0,0.01,10); maxorder = 3
      dDef: Direct
      fc1: FullyCoupled | dtech = hnlin
  sol2 "Refined Mesh Solution 1" (study std1)

Datasets
  dset1: Solution | solution = sol1
  dset2: Solution | solution = sol2
  gp1_ds1: Grid1D | function = gp1; data = none; parmin1 = 0.7; parmax1 = 1.3
  gp1_ds2: Grid1D | function = gp1; data = none; parmin1 = 0.7; parmax1 = 1.3
  gp1_ds3: Grid1D | function = gp1; data = none; parmin1 = 0.7; parmax1 = 1.3
  gp1_ds4: Grid1D | function = gp1; data = none; parmin1 = 0.4
  gp1_ds5: Grid1D | function = gp1; data = none; parmin1 = 0.1; parmax1 = 1.3
  gp1_ds6: Grid1D | function = gp1; data = none; parmin1 = 0.55; parmax1 = 0.85
  an1_ds1: Grid1D "Grid 1D 1a" | function = all; data = none; res1 = 10000; distribution = mixed
  an1_ds2: Grid1D "Grid 1D 2a" | function = all; data = none; res1 = 10000; distribution = mixed
  an1_ds3: Grid2D | function = all; data = none; parmax1 = 2; par2 = t
  rect1_ds1: Grid1D "Grid 1D 1b" | function = rect1; data = none; parmin1 = -1.5; parmax1 = 1.5
  rect1_ds2: Grid1D "Grid 1D 2b" | function = rect1; data = none; parmin1 = -0.6; parmax1 = 0.6
  rect1_ds3: Grid1D "Grid 1D 3a" | function = rect1; data = none; parmin1 = 0.4; parmax1 = 0.7
  an1_ds4: Grid2D | function = all; data = none; parmax1 = 2; par2 = t
  an1_ds5: Grid2D | function = all; data = none; parmax1 = 2; par2 = t
  an1_ds6: Grid2D | function = all; data = none; parmax1 = 2; par2 = t
  an1_ds7: Grid2D | function = all; data = none; parmax1 = 2; par2 = t
  an1_ds8: Grid2D | function = all; data = none; parmax1 = 2; par2 = t
  an1_ds9: Grid2D | function = all; data = none; parmax1 = 2; par2 = t

Plots
  pg3: PlotGroup1D "Base Group" | data = dset1; xlabel = Coordinate; ylabel = Concentration
    lngr1: LineGraph "neutral plot" on domains 1 | expr = n; descr = Neutral; legends = neutral
    lngr2: LineGraph "polimer plot" on domains 1 | expr = p; descr = Polymer; legends = polimer
    lngr3: LineGraph "monomer plot" on domains 1 | expr = 1-n-p; descr = monomer; autosolution = off
    lngr4: LineGraph "light plot" on domains 1 | expr = L(x)
  pg4: PlotGroup2D "2D Plot Group 4" | data = an1_ds8; title = L(x,t)
    plot1: Function2D "Function 1" | expr = L(x,t)
      height1: Height "Height Expression 1"
  pg5: PlotGroup2D "2D Plot Group 5" | data = an1_ds9; title = L(x,t)
    plot1: Function2D "Function 1" | expr = L(x,t)
      height1: Height "Height Expression 1"

Exports
  anim1: Animation | target = player; framesel = all