// COMSOL Multiphysics 6.0.0.318 model "Mix.mph"
// Outline of the model tree

Parameters
  DH0 = 0.5 [mol/l]
  Q0 = 0.004 [mol/l]
  Q_mass = 108 [g/mol]
  DH_mass = 59 [g/mol]
  QHD_mass = 167 [g/mol]
  QHH_mass = 110 [g/mol]
  prod_mass = 58 [g/mol]
  Qm_mass = 108 [g/mol]
  DHp_mass = 59 [g/mol]
  QH_mass = 109 [g/mol]
  D_mass = 58 [g/mol]
  QD_mass = 166 [g/mol]
  time_end = 20
  light_start = 0
  light_end = 1e-3
  light_step = 1e-4
  KL = 1e-4*100
  Kdiff = 1e8
  Kr = 1e8
  Kp = 1e-4
  KdQ = 1e9
  KrDrec = 1e9
  KrDdis = 1e9
  Kinit = 1e3
  Kprop = 1e3
  Ktranssol = 5
  Ktransm = 1e-3
  Kinh = 1e2
  Kterlin = 1e2*0
  M0 = 2 [mol/l]
  Kterrec = 1e7

Physics
  reaction: ReactionEng "Reaction Engineering"
    reactor.Vr = 1
    energybalance.T = 1
    mixture.mixture = liquid
    calcTransport.dynamicViscositySel = UserDefined
    simpropChem.sSequenceNo = 21
    ActiveSpecies.SumActiveSpecies = 14
    ActiveSpecies.NumActiveVolumeSpecies = 14
    SimpropMass.Species = {Q, DH, QH, D, QHD, QHH, prod, Qact, PR, M, P, sol, solR}
    SimpropMass.SpeciesInputType = {Variable, Variable, Variable, Variable, Variable, Variable, Variable, Variable, Variable, Variable, Variable, Variable, Variable}
    SimpropMass.Notes = {reaction.R_Q, reaction.R_DH, reaction.R_QH, reaction.R_D, reaction.R_QHD, reaction.R_QHH, reaction.R_prod, reaction.R_Qact, reaction.R_PR, reaction.R_M, reaction.R_P, reaction.R_sol, reaction.R_solR}
    inits1: SpeciesInitialValue "Initial Values"
      VolumetricSpecies = {D, DH, M, P, PR, Q, QH, QHD, QHH, Qact, Qt, prod, sol, solR}
      initialValue = {0 [mol/l], DH0, M0, 0 [mol/l], 0 [mol/l], Q0, 0[mol/l], 0[mol/l], 0[mol/l], 0 [mol/l], 0 [mol/l], 0 [mol/l], 0, 0}
      F0 = {0 [mol/l], DH0 [mol/l], 0, 0, 0, Q0 [mol/l], 0[mol/l], 0[mol/l], 0[mol/l], 0 [mol/l], 0 [mol/l], 0 [mol/l], 0, 0}
    Q: SpeciesChem "Species: Q"
      sisDef = 1
      sSequenceNo = 4
      SpeciesSource = Reaction
      specLabel = Q
      h = R_const*((reaction.T<=reaction.Tlo_Q)*(reaction.aLo6_Q+reaction.Tlo_Q*(reaction.aLo1_Q+0.5*reaction.Tlo_Q*(reaction.aLo2_Q+2*reaction.Tlo_Q*(reaction.aLo3_Q+0.75*reaction.Tlo_Q*(reaction.aLo4_Q+0.8*reaction.Tlo_Q*reaction.aLo5_Q))/3)))+(reaction.T>reaction.Tlo_Q)*(reaction.T<=reaction.Tmid_Q)*(reaction.aLo6_Q+reaction.T*(reaction.aLo1_Q+0.5*reaction.T*(reaction.aLo2_Q+2*reaction.T*(reaction.aLo3_Q+0.75*reaction.T*(reaction.aLo4_Q+0.8*reaction.T*reaction.aLo5_Q))/3)))+(reaction.T>reaction.Tmid_Q)*(reaction.T<=reaction.Thi_Q)*(reaction.aHi6_Q+reaction.T*(reaction.aHi1_Q+0.5*reaction.T*(reaction.aHi2_Q+2*reaction.T*(reaction.aHi3_Q+0.75*reaction.T*(reaction.aHi4_Q+0.8*reaction.T*reaction.aHi5_Q))/3)))+(reaction.T>reaction.Thi_Q)*(reaction.aHi6_Q+reaction.Thi_Q*(reaction.aHi1_Q+0.5*reaction.Thi_Q*(reaction.aHi2_Q+2*reaction.Thi_Q*(reaction.aHi3_Q+0.75*reaction.Thi_Q*(reaction.aHi4_Q+0.8*reaction.Thi_Q*reaction.aHi5_Q))/3))))
      s = R_const*((reaction.T<=reaction.Tlo_Q)*(reaction.aLo7_Q+reaction.aLo1_Q*log(reaction.T/1[K])+reaction.Tlo_Q*(reaction.aLo2_Q+0.5*reaction.Tlo_Q*(reaction.aLo3_Q+2*reaction.Tlo_Q*(reaction.aLo4_Q+0.75*reaction.Tlo_Q*reaction.aLo5_Q)/3)))+(reaction.T>reaction.Tlo_Q)*(reaction.T<=reaction.Tmid_Q)*(reaction.aLo7_Q+reaction.aLo1_Q*log(reaction.T/1[K])+reaction.T*(reaction.aLo2_Q+0.5*reaction.T*(reaction.aLo3_Q+2*reaction.T*(reaction.aLo4_Q+0.75*reaction.T*reaction.aLo5_Q)/3)))+(reaction.T>reaction.Tmid_Q)*(reaction.T<=reaction.Thi_Q)*(reaction.aHi7_Q+reaction.aHi1_Q*log(reaction.T/1[K])+reaction.T*(reaction.aHi2_Q+0.5*reaction.T*(reaction.aHi3_Q+2*reaction.T*(reaction.aHi4_Q+0.75*reaction.T*reaction.aHi5_Q)/3)))+(reaction.T>reaction.Thi_Q)*(reaction.aHi7_Q+reaction.aHi1_Q*log(reaction.T/1[K])+reaction.Thi_Q*(reaction.aHi2_Q+0.5*reaction.Thi_Q*(reaction.aHi3_Q+2*reaction.Thi_Q*(reaction.aHi4_Q+0.75*reaction.Thi_Q*reaction.aHi5_Q)/3))))
      Cp = R_const*((reaction.T<=reaction.Tlo_Q)*(reaction.aLo1_Q+reaction.Tlo_Q*(reaction.aLo2_Q+reaction.Tlo_Q*(reaction.aLo3_Q+reaction.Tlo_Q*(reaction.aLo4_Q+reaction.Tlo_Q*reaction.aLo5_Q))))+(reaction.T>reaction.Tlo_Q)*(reaction.T<=reaction.Tmid_Q)*(reaction.aLo1_Q+reaction.T*(reaction.aLo2_Q+reaction.T*(reaction.aLo3_Q+reaction.T*(reaction.aLo4_Q+reaction.T*reaction.aLo5_Q))))+(reaction.T>reaction.Tmid_Q)*(reaction.T<=reaction.Thi_Q)*(reaction.aHi1_Q+reaction.T*(reaction.aHi2_Q+reaction.T*(reaction.aHi3_Q+reaction.T*(reaction.aHi4_Q+reaction.T*reaction.aHi5_Q))))+(reaction.T>reaction.Thi_Q)*(reaction.aHi1_Q+reaction.Thi_Q*(reaction.aHi2_Q+reaction.Thi_Q*(reaction.aHi3_Q+reaction.Thi_Q*(reaction.aHi4_Q+reaction.Thi_Q*reaction.aHi5_Q)))))
      ReactionTagInSpecies = {rch5, rch11, rch18}
      specName = Q
      R = reaction.r_5-reaction.r_11-reaction.r_18
      mixtureSolvent = 1
    DH: SpeciesChem "Species: DH"
      sisDef = 1
      sSequenceNo = 5
      SpeciesSource = Reaction
      specLabel = DH
      h = R_const*((reaction.T<=reaction.Tlo_DH)*(reaction.aLo6_DH+reaction.Tlo_DH*(reaction.aLo1_DH+0.5*reaction.Tlo_DH*(reaction.aLo2_DH+2*reaction.Tlo_DH*(reaction.aLo3_DH+0.75*reaction.Tlo_DH*(reaction.aLo4_DH+0.8*reaction.Tlo_DH*reaction.aLo5_DH))/3)))+(reaction.T>reaction.Tlo_DH)*(reaction.T<=reaction.Tmid_DH)*(reaction.aLo6_DH+reaction.T*(reaction.aLo1_DH+0.5*reaction.T*(reaction.aLo2_DH+2*reaction.T*(reaction.aLo3_DH+0.75*reaction.T*(reaction.aLo4_DH+0.8*reaction.T*reaction.aLo5_DH))/3)))+(reaction.T>reaction.Tmid_DH)*(reaction.T<=reaction.Thi_DH)*(reaction.aHi6_DH+reaction.T*(reaction.aHi1_DH+0.5*reaction.T*(reaction.aHi2_DH+2*reaction.T*(reaction.aHi3_DH+0.75*reaction.T*(reaction.aHi4_DH+0.8*reaction.T*reaction.aHi5_DH))/3)))+(reaction.T>reaction.Thi_DH)*(reaction.aHi6_DH+reaction.Thi_DH*(reaction.aHi1_DH+0.5*reaction.Thi_DH*(reaction.aHi2_DH+2*reaction.Thi_DH*(reaction.aHi3_DH+0.75*reaction.Thi_DH*(reaction.aHi4_DH+0.8*reaction.Thi_DH*reaction.aHi5_DH))/3))))
      s = R_const*((reaction.T<=reaction.Tlo_DH)*(reaction.aLo7_DH+reaction.aLo1_DH*log(reaction.T/1[K])+reaction.Tlo_DH*(reaction.aLo2_DH+0.5*reaction.Tlo_DH*(reaction.aLo3_DH+2*reaction.Tlo_DH*(reaction.aLo4_DH+0.75*reaction.Tlo_DH*reaction.aLo5_DH)/3)))+(reaction.T>reaction.Tlo_DH)*(reaction.T<=reaction.Tmid_DH)*(reaction.aLo7_DH+reaction.aLo1_DH*log(reaction.T/1[K])+reaction.T*(reaction.aLo2_DH+0.5*reaction.T*(reaction.aLo3_DH+2*reaction.T*(reaction.aLo4_DH+0.75*reaction.T*reaction.aLo5_DH)/3)))+(reaction.T>reaction.Tmid_DH)*(reaction.T<=reaction.Thi_DH)*(reaction.aHi7_DH+reaction.aHi1_DH*log(reaction.T/1[K])+reaction.T*(reaction.aHi2_DH+0.5*reaction.T*(reaction.aHi3_DH+2*reaction.T*(reaction.aHi4_DH+0.75*reaction.T*reaction.aHi5_DH)/3)))+(reaction.T>reaction.Thi_DH)*(reaction.aHi7_DH+reaction.aHi1_DH*log(reaction.T/1[K])+reaction.Thi_DH*(reaction.aHi2_DH+0.5*reaction.Thi_DH*(reaction.aHi3_DH+2*reaction.Thi_DH*(reaction.aHi4_DH+0.75*reaction.Thi_DH*reaction.aHi5_DH)/3))))
      Cp = R_const*((reaction.T<=reaction.Tlo_DH)*(reaction.aLo1_DH+reaction.Tlo_DH*(reaction.aLo2_DH+reaction.Tlo_DH*(reaction.aLo3_DH+reaction.Tlo_DH*(reaction.aLo4_DH+reaction.Tlo_DH*reaction.aLo5_DH))))+(reaction.T>reaction.Tlo_DH)*(reaction.T<=reaction.Tmid_DH)*(reaction.aLo1_DH+reaction.T*(reaction.aLo2_DH+reaction.T*(reaction.aLo3_DH+reaction.T*(reaction.aLo4_DH+reaction.T*reaction.aLo5_DH))))+(reaction.T>reaction.Tmid_DH)*(reaction.T<=reaction.Thi_DH)*(reaction.aHi1_DH+reaction.T*(reaction.aHi2_DH+reaction.T*(reaction.aHi3_DH+reaction.T*(reaction.aHi4_DH+reaction.T*reaction.aHi5_DH))))+(reaction.T>reaction.Thi_DH)*(reaction.aHi1_DH+reaction.Thi_DH*(reaction.aHi2_DH+reaction.Thi_DH*(reaction.aHi3_DH+reaction.Thi_DH*(reaction.aHi4_DH+reaction.Thi_DH*reaction.aHi5_DH)))))
      ReactionTagInSpecies = rch1
      specName = DH
      R = -reaction.r_1
      mixtureSolvent = 1
    QH: SpeciesChem "Species: QH"
      sisDef = 1
      sSequenceNo = 8
      SpeciesSource = Reaction
      specLabel = QH
      h = R_const*((reaction.T<=reaction.Tlo_QH)*(reaction.aLo6_QH+reaction.Tlo_QH*(reaction.aLo1_QH+0.5*reaction.Tlo_QH*(reaction.aLo2_QH+2*reaction.Tlo_QH*(reaction.aLo3_QH+0.75*reaction.Tlo_QH*(reaction.aLo4_QH+0.8*reaction.Tlo_QH*reaction.aLo5_QH))/3)))+(reaction.T>reaction.Tlo_QH)*(reaction.T<=reaction.Tmid_QH)*(reaction.aLo6_QH+reaction.T*(reaction.aLo1_QH+0.5*reaction.T*(reaction.aLo2_QH+2*reaction.T*(reaction.aLo3_QH+0.75*reaction.T*(reaction.aLo4_QH+0.8*reaction.T*reaction.aLo5_QH))/3)))+(reaction.T>reaction.Tmid_QH)*(reaction.T<=reaction.Thi_QH)*(reaction.aHi6_QH+reaction.T*(reaction.aHi1_QH+0.5*reaction.T*(reaction.aHi2_QH+2*reaction.T*(reaction.aHi3_QH+0.75*reaction.T*(reaction.aHi4_QH+0.8*reaction.T*reaction.aHi5_QH))/3)))+(reaction.T>reaction.Thi_QH)*(reaction.aHi6_QH+reaction.Thi_QH*(reaction.aHi1_QH+0.5*reaction.Thi_QH*(reaction.aHi2_QH+2*reaction.Thi_QH*(reaction.aHi3_QH+0.75*reaction.Thi_QH*(reaction.aHi4_QH+0.8*reaction.Thi_QH*reaction.aHi5_QH))/3))))
      s = R_const*((reaction.T<=reaction.Tlo_QH)*(reaction.aLo7_QH+reaction.aLo1_QH*log(reaction.T/1[K])+reaction.Tlo_QH*(reaction.aLo2_QH+0.5*reaction.Tlo_QH*(reaction.aLo3_QH+2*reaction.Tlo_QH*(reaction.aLo4_QH+0.75*reaction.Tlo_QH*reaction.aLo5_QH)/3)))+(reaction.T>reaction.Tlo_QH)*(reaction.T<=reaction.Tmid_QH)*(reaction.aLo7_QH+reaction.aLo1_QH*log(reaction.T/1[K])+reaction.T*(reaction.aLo2_QH+0.5*reaction.T*(reaction.aLo3_QH+2*reaction.T*(reaction.aLo4_QH+0.75*reaction.T*reaction.aLo5_QH)/3)))+(reaction.T>reaction.Tmid_QH)*(reaction.T<=reaction.Thi_QH)*(reaction.aHi7_QH+reaction.aHi1_QH*log(reaction.T/1[K])+reaction.T*(reaction.aHi2_QH+0.5*reaction.T*(reaction.aHi3_QH+2*reaction.T*(reaction.aHi4_QH+0.75*reaction.T*reaction.aHi5_QH)/3)))+(reaction.T>reaction.Thi_QH)*(reaction.aHi7_QH+reaction.aHi1_QH*log(reaction.T/1[K])+reaction.Thi_QH*(reaction.aHi2_QH+0.5*reaction.Thi_QH*(reaction.aHi3_QH+2*reaction.Thi_QH*(reaction.aHi4_QH+0.75*reaction.Thi_QH*reaction.aHi5_QH)/3))))
      Cp = R_const*((reaction.T<=reaction.Tlo_QH)*(reaction.aLo1_QH+reaction.Tlo_QH*(reaction.aLo2_QH+reaction.Tlo_QH*(reaction.aLo3_QH+reaction.Tlo_QH*(reaction.aLo4_QH+reaction.Tlo_QH*reaction.aLo5_QH))))+(reaction.T>reaction.Tlo_QH)*(reaction.T<=reaction.Tmid_QH)*(reaction.aLo1_QH+reaction.T*(reaction.aLo2_QH+reaction.T*(reaction.aLo3_QH+reaction.T*(reaction.aLo4_QH+reaction.T*reaction.aLo5_QH))))+(reaction.T>reaction.Tmid_QH)*(reaction.T<=reaction.Thi_QH)*(reaction.aHi1_QH+reaction.T*(reaction.aHi2_QH+reaction.T*(reaction.aHi3_QH+reaction.T*(reaction.aHi4_QH+reaction.T*reaction.aHi5_QH))))+(reaction.T>reaction.Thi_QH)*(reaction.aHi1_QH+reaction.Thi_QH*(reaction.aHi2_QH+reaction.Thi_QH*(reaction.aHi3_QH+reaction.Thi_QH*(reaction.aHi4_QH+reaction.Thi_QH*reaction.aHi5_QH)))))
      ReactionTagInSpecies = {rch3, rch5, rch1, rch18}
      specName = QH
      R = -reaction.r_3-2*reaction.r_5+reaction.r_1+reaction.r_18
      mixtureSolvent = 1
    D: SpeciesChem "Species: D"
      sisDef = 1
      sSequenceNo = 9
      SpeciesSource = Reaction
      specLabel = D
      h = R_const*((reaction.T<=reaction.Tlo_D)*(reaction.aLo6_D+reaction.Tlo_D*(reaction.aLo1_D+0.5*reaction.Tlo_D*(reaction.aLo2_D+2*reaction.Tlo_D*(reaction.aLo3_D+0.75*reaction.Tlo_D*(reaction.aLo4_D+0.8*reaction.Tlo_D*reaction.aLo5_D))/3)))+(reaction.T>reaction.Tlo_D)*(reaction.T<=reaction.Tmid_D)*(reaction.aLo6_D+reaction.T*(reaction.aLo1_D+0.5*reaction.T*(reaction.aLo2_D+2*reaction.T*(reaction.aLo3_D+0.75*reaction.T*(reaction.aLo4_D+0.8*reaction.T*reaction.aLo5_D))/3)))+(reaction.T>reaction.Tmid_D)*(reaction.T<=reaction.Thi_D)*(reaction.aHi6_D+reaction.T*(reaction.aHi1_D+0.5*reaction.T*(reaction.aHi2_D+2*reaction.T*(reaction.aHi3_D+0.75*reaction.T*(reaction.aHi4_D+0.8*reaction.T*reaction.aHi5_D))/3)))+(reaction.T>reaction.Thi_D)*(reaction.aHi6_D+reaction.Thi_D*(reaction.aHi1_D+0.5*reaction.Thi_D*(reaction.aHi2_D+2*reaction.Thi_D*(reaction.aHi3_D+0.75*reaction.Thi_D*(reaction.aHi4_D+0.8*reaction.Thi_D*reaction.aHi5_D))/3))))
      s = R_const*((reaction.T<=reaction.Tlo_D)*(reaction.aLo7_D+reaction.aLo1_D*log(reaction.T/1[K])+reaction.Tlo_D*(reaction.aLo2_D+0.5*reaction.Tlo_D*(reaction.aLo3_D+2*reaction.Tlo_D*(reaction.aLo4_D+0.75*reaction.Tlo_D*reaction.aLo5_D)/3)))+(reaction.T>reaction.Tlo_D)*(reaction.T<=reaction.Tmid_D)*(reaction.aLo7_D+reaction.aLo1_D*log(reaction.T/1[K])+reaction.T*(reaction.aLo2_D+0.5*reaction.T*(reaction.aLo3_D+2*reaction.T*(reaction.aLo4_D+0.75*reaction.T*reaction.aLo5_D)/3)))+(reaction.T>reaction.Tmid_D)*(reaction.T<=reaction.Thi_D)*(reaction.aHi7_D+reaction.aHi1_D*log(reaction.T/1[K])+reaction.T*(reaction.aHi2_D+0.5*reaction.T*(reaction.aHi3_D+2*reaction.T*(reaction.aHi4_D+0.75*reaction.T*reaction.aHi5_D)/3)))+(reaction.T>reaction.Thi_D)*(reaction.aHi7_D+reaction.aHi1_D*log(reaction.T/1[K])+reaction.Thi_D*(reaction.aHi2_D+0.5*reaction.Thi_D*(reaction.aHi3_D+2*reaction.Thi_D*(reaction.aHi4_D+0.75*reaction.Thi_D*reaction.aHi5_D)/3))))
      Cp = R_const*((reaction.T<=reaction.Tlo_D)*(reaction.aLo1_D+reaction.Tlo_D*(reaction.aLo2_D+reaction.Tlo_D*(reaction.aLo3_D+reaction.Tlo_D*(reaction.aLo4_D+reaction.Tlo_D*reaction.aLo5_D))))+(reaction.T>reaction.Tlo_D)*(reaction.T<=reaction.Tmid_D)*(reaction.aLo1_D+reaction.T*(reaction.aLo2_D+reaction.T*(reaction.aLo3_D+reaction.T*(reaction.aLo4_D+reaction.T*reaction.aLo5_D))))+(reaction.T>reaction.Tmid_D)*(reaction.T<=reaction.Thi_D)*(reaction.aHi1_D+reaction.T*(reaction.aHi2_D+reaction.T*(reaction.aHi3_D+reaction.T*(reaction.aHi4_D+reaction.T*reaction.aHi5_D))))+(reaction.T>reaction.Thi_D)*(reaction.aHi1_D+reaction.Thi_D*(reaction.aHi2_D+reaction.Thi_D*(reaction.aHi3_D+reaction.Thi_D*(reaction.aHi4_D+reaction.Thi_D*reaction.aHi5_D)))))
      ReactionTagInSpecies = {rch3, rch9, rch1, rch13, rch14}
      specName = D
      R = -reaction.r_3-2*reaction.r_9+reaction.r_1-2*reaction.r_13-reaction.r_14-2*reaction.r_15-2*reaction.r_18-2*reaction.r_19-2*reaction.r_20
      mixtureSolvent = 1
    QHD: SpeciesChem "Species: QHD"
      sisDef = 1
      sSequenceNo = 10
      SpeciesSource = Reaction
      specLabel = QHD
      h = R_const*((reaction.T<=reaction.Tlo_QHD)*(reaction.aLo6_QHD+reaction.Tlo_QHD*(reaction.aLo1_QHD+0.5*reaction.Tlo_QHD*(reaction.aLo2_QHD+2*reaction.Tlo_QHD*(reaction.aLo3_QHD+0.75*reaction.Tlo_QHD*(reaction.aLo4_QHD+0.8*reaction.Tlo_QHD*reaction.aLo5_QHD))/3)))+(reaction.T>reaction.Tlo_QHD)*(reaction.T<=reaction.Tmid_QHD)*(reaction.aLo6_QHD+reaction.T*(reaction.aLo1_QHD+0.5*reaction.T*(reaction.aLo2_QHD+2*reaction.T*(reaction.aLo3_QHD+0.75*reaction.T*(reaction.aLo4_QHD+0.8*reaction.T*reaction.aLo5_QHD))/3)))+(reaction.T>reaction.Tmid_QHD)*(reaction.T<=reaction.Thi_QHD)*(reaction.aHi6_QHD+reaction.T*(reaction.aHi1_QHD+0.5*reaction.T*(reaction.aHi2_QHD+2*reaction.T*(reaction.aHi3_QHD+0.75*reaction.T*(reaction.aHi4_QHD+0.8*reaction.T*reaction.aHi5_QHD))/3)))+(reaction.T>reaction.Thi_QHD)*(reaction.aHi6_QHD+reaction.Thi_QHD*(reaction.aHi1_QHD+0.5*reaction.Thi_QHD*(reaction.aHi2_QHD+2*reaction.Thi_QHD*(reaction.aHi3_QHD+0.75*reaction.Thi_QHD*(reaction.aHi4_QHD+0.8*reaction.Thi_QHD*reaction.aHi5_QHD))/3))))
      s = R_const*((reaction.T<=reaction.Tlo_QHD)*(reaction.aLo7_QHD+reaction.aLo1_QHD*log(reaction.T/1[K])+reaction.Tlo_QHD*(reaction.aLo2_QHD+0.5*reaction.Tlo_QHD*(reaction.aLo3_QHD+2*reaction.Tlo_QHD*(reaction.aLo4_QHD+0.75*reaction.Tlo_QHD*reaction.aLo5_QHD)/3)))+(reaction.T>reaction.Tlo_QHD)*(reaction.T<=reaction.Tmid_QHD)*(reaction.aLo7_QHD+reaction.aLo1_QHD*log(reaction.T/1[K])+reaction.T*(reaction.aLo2_QHD+0.5*reaction.T*(reaction.aLo3_QHD+2*reaction.T*(reaction.aLo4_QHD+0.75*reaction.T*reaction.aLo5_QHD)/3)))+(reaction.T>reaction.Tmid_QHD)*(reaction.T<=reaction.Thi_QHD)*(reaction.aHi7_QHD+reaction.aHi1_QHD*log(reaction.T/1[K])+reaction.T*(reaction.aHi2_QHD+0.5*reaction.T*(reaction.aHi3_QHD+2*reaction.T*(reaction.aHi4_QHD+0.75*reaction.T*reaction.aHi5_QHD)/3)))+(reaction.T>reaction.Thi_QHD)*(reaction.aHi7_QHD+reaction.aHi1_QHD*log(reaction.T/1[K])+reaction.Thi_QHD*(reaction.aHi2_QHD+0.5*reaction.Thi_QHD*(reaction.aHi3_QHD+2*reaction.Thi_QHD*(reaction.aHi4_QHD+0.75*reaction.Thi_QHD*reaction.aHi5_QHD)/3))))
      Cp = R_const*((reaction.T<=reaction.Tlo_QHD)*(reaction.aLo1_QHD+reaction.Tlo_QHD*(reaction.aLo2_QHD+reaction.Tlo_QHD*(reaction.aLo3_QHD+reaction.Tlo_QHD*(reaction.aLo4_QHD+reaction.Tlo_QHD*reaction.aLo5_QHD))))+(reaction.T>reaction.Tlo_QHD)*(reaction.T<=reaction.Tmid_QHD)*(reaction.aLo1_QHD+reaction.T*(reaction.aLo2_QHD+reaction.T*(reaction.aLo3_QHD+reaction.T*(reaction.aLo4_QHD+reaction.T*reaction.aLo5_QHD))))+(reaction.T>reaction.Tmid_QHD)*(reaction.T<=reaction.Thi_QHD)*(reaction.aHi1_QHD+reaction.T*(reaction.aHi2_QHD+reaction.T*(reaction.aHi3_QHD+reaction.T*(reaction.aHi4_QHD+reaction.T*reaction.aHi5_QHD))))+(reaction.T>reaction.Thi_QHD)*(reaction.aHi1_QHD+reaction.Thi_QHD*(reaction.aHi2_QHD+reaction.Thi_QHD*(reaction.aHi3_QHD+reaction.Thi_QHD*(reaction.aHi4_QHD+reaction.Thi_QHD*reaction.aHi5_QHD)))))
      ReactionTagInSpecies = {rch3, rch4}
      specName = QHD
      R = reaction.r_3-reaction.r_4
      mixtureSolvent = 1
    QHH: SpeciesChem "Species: QHH"
      sisDef = 1
      sSequenceNo = 11
      SpeciesSource = Reaction
      specLabel = QHH
      h = R_const*((reaction.T<=reaction.Tlo_QHH)*(reaction.aLo6_QHH+reaction.Tlo_QHH*(reaction.aLo1_QHH+0.5*reaction.Tlo_QHH*(reaction.aLo2_QHH+2*reaction.Tlo_QHH*(reaction.aLo3_QHH+0.75*reaction.Tlo_QHH*(reaction.aLo4_QHH+0.8*reaction.Tlo_QHH*reaction.aLo5_QHH))/3)))+(reaction.T>reaction.Tlo_QHH)*(reaction.T<=reaction.Tmid_QHH)*(reaction.aLo6_QHH+reaction.T*(reaction.aLo1_QHH+0.5*reaction.T*(reaction.aLo2_QHH+2*reaction.T*(reaction.aLo3_QHH+0.75*reaction.T*(reaction.aLo4_QHH+0.8*reaction.T*reaction.aLo5_QHH))/3)))+(reaction.T>reaction.Tmid_QHH)*(reaction.T<=reaction.Thi_QHH)*(reaction.aHi6_QHH+reaction.T*(reaction.aHi1_QHH+0.5*reaction.T*(reaction.aHi2_QHH+2*reaction.T*(reaction.aHi3_QHH+0.75*reaction.T*(reaction.aHi4_QHH+0.8*reaction.T*reaction.aHi5_QHH))/3)))+(reaction.T>reaction.Thi_QHH)*(reaction.aHi6_QHH+reaction.Thi_QHH*(reaction.aHi1_QHH+0.5*reaction.Thi_QHH*(reaction.aHi2_QHH+2*reaction.Thi_QHH*(reaction.aHi3_QHH+0.75*reaction.Thi_QHH*(reaction.aHi4_QHH+0.8*reaction.Thi_QHH*reaction.aHi5_QHH))/3))))
      s = R_const*((reaction.T<=reaction.Tlo_QHH)*(reaction.aLo7_QHH+reaction.aLo1_QHH*log(reaction.T/1[K])+reaction.Tlo_QHH*(reaction.aLo2_QHH+0.5*reaction.Tlo_QHH*(reaction.aLo3_QHH+2*reaction.Tlo_QHH*(reaction.aLo4_QHH+0.75*reaction.Tlo_QHH*reaction.aLo5_QHH)/3)))+(reaction.T>reaction.Tlo_QHH)*(reaction.T<=reaction.Tmid_QHH)*(reaction.aLo7_QHH+reaction.aLo1_QHH*log(reaction.T/1[K])+reaction.T*(reaction.aLo2_QHH+0.5*reaction.T*(reaction.aLo3_QHH+2*reaction.T*(reaction.aLo4_QHH+0.75*reaction.T*reaction.aLo5_QHH)/3)))+(reaction.T>reaction.Tmid_QHH)*(reaction.T<=reaction.Thi_QHH)*(reaction.aHi7_QHH+reaction.aHi1_QHH*log(reaction.T/1[K])+reaction.T*(reaction.aHi2_QHH+0.5*reaction.T*(reaction.aHi3_QHH+2*reaction.T*(reaction.aHi4_QHH+0.75*reaction.T*reaction.aHi5_QHH)/3)))+(reaction.T>reaction.Thi_QHH)*(reaction.aHi7_QHH+reaction.aHi1_QHH*log(reaction.T/1[K])+reaction.Thi_QHH*(reaction.aHi2_QHH+0.5*reaction.Thi_QHH*(reaction.aHi3_QHH+2*reaction.Thi_QHH*(reaction.aHi4_QHH+0.75*reaction.Thi_QHH*reaction.aHi5_QHH)/3))))
      Cp = R_const*((reaction.T<=reaction.Tlo_QHH)*(reaction.aLo1_QHH+reaction.Tlo_QHH*(reaction.aLo2_QHH+reaction.Tlo_QHH*(reaction.aLo3_QHH+reaction.Tlo_QHH*(reaction.aLo4_QHH+reaction.Tlo_QHH*reaction.aLo5_QHH))))+(reaction.T>reaction.Tlo_QHH)*(reaction.T<=reaction.Tmid_QHH)*(reaction.aLo1_QHH+reaction.T*(reaction.aLo2_QHH+reaction.T*(reaction.aLo3_QHH+reaction.T*(reaction.aLo4_QHH+reaction.T*reaction.aLo5_QHH))))+(reaction.T>reaction.Tmid_QHH)*(reaction.T<=reaction.Thi_QHH)*(reaction.aHi1_QHH+reaction.T*(reaction.aHi2_QHH+reaction.T*(reaction.aHi3_QHH+reaction.T*(reaction.aHi4_QHH+reaction.T*reaction.aHi5_QHH))))+(reaction.T>reaction.Thi_QHH)*(reaction.aHi1_QHH+reaction.Thi_QHH*(reaction.aHi2_QHH+reaction.Thi_QHH*(reaction.aHi3_QHH+reaction.Thi_QHH*(reaction.aHi4_QHH+reaction.Thi_QHH*reaction.aHi5_QHH)))))
      ReactionTagInSpecies = {rch4, rch5}
      specName = QHH
      R = reaction.r_4+reaction.r_5
      mixtureSolvent = 1
    prod: SpeciesChem "Species: prod"
      sisDef = 1
      sSequenceNo = 12
      SpeciesSource = Reaction
      specLabel = prod
      h = R_const*((reaction.T<=reaction.Tlo_prod)*(reaction.aLo6_prod+reaction.Tlo_prod*(reaction.aLo1_prod+0.5*reaction.Tlo_prod*(reaction.aLo2_prod+2*reaction.Tlo_prod*(reaction.aLo3_prod+0.75*reaction.Tlo_prod*(reaction.aLo4_prod+0.8*reaction.Tlo_prod*reaction.aLo5_prod))/3)))+(reaction.T>reaction.Tlo_prod)*(reaction.T<=reaction.Tmid_prod)*(reaction.aLo6_prod+reaction.T*(reaction.aLo1_prod+0.5*reaction.T*(reaction.aLo2_prod+2*reaction.T*(reaction.aLo3_prod+0.75*reaction.T*(reaction.aLo4_prod+0.8*reaction.T*reaction.aLo5_prod))/3)))+(reaction.T>reaction.Tmid_prod)*(reaction.T<=reaction.Thi_prod)*(reaction.aHi6_prod+reaction.T*(reaction.aHi1_prod+0.5*reaction.T*(reaction.aHi2_prod+2*reaction.T*(reaction.aHi3_prod+0.75*reaction.T*(reaction.aHi4_prod+0.8*reaction.T*reaction.aHi5_prod))/3)))+(reaction.T>reaction.Thi_prod)*(reaction.aHi6_prod+reaction.Thi_prod*(reaction.aHi1_prod+0.5*reaction.Thi_prod*(reaction.aHi2_prod+2*reaction.Thi_prod*(reaction.aHi3_prod+0.75*reaction.Thi_prod*(reaction.aHi4_prod+0.8*reaction.Thi_prod*reaction.aHi5_prod))/3))))
      s = R_const*((reaction.T<=reaction.Tlo_prod)*(reaction.aLo7_prod+reaction.aLo1_prod*log(reaction.T/1[K])+reaction.Tlo_prod*(reaction.aLo2_prod+0.5*reaction.Tlo_prod*(reaction.aLo3_prod+2*reaction.Tlo_prod*(reaction.aLo4_prod+0.75*reaction.Tlo_prod*reaction.aLo5_prod)/3)))+(reaction.T>reaction.Tlo_prod)*(reaction.T<=reaction.Tmid_prod)*(reaction.aLo7_prod+reaction.aLo1_prod*log(reaction.T/1[K])+reaction.T*(reaction.aLo2_prod+0.5*reaction.T*(reaction.aLo3_prod+2*reaction.T*(reaction.aLo4_prod+0.75*reaction.T*reaction.aLo5_prod)/3)))+(reaction.T>reaction.Tmid_prod)*(reaction.T<=reaction.Thi_prod)*(reaction.aHi7_prod+reaction.aHi1_prod*log(reaction.T/1[K])+reaction.T*(reaction.aHi2_prod+0.5*reaction.T*(reaction.aHi3_prod+2*reaction.T*(reaction.aHi4_prod+0.75*reaction.T*reaction.aHi5_prod)/3)))+(reaction.T>reaction.Thi_prod)*(reaction.aHi7_prod+reaction.aHi1_prod*log(reaction.T/1[K])+reaction.Thi_prod*(reaction.aHi2_prod+0.5*reaction.Thi_prod*(reaction.aHi3_prod+2*reaction.Thi_prod*(reaction.aHi4_prod+0.75*reaction.Thi_prod*reaction.aHi5_prod)/3))))
      Cp = R_const*((reaction.T<=reaction.Tlo_prod)*(reaction.aLo1_prod+reaction.Tlo_prod*(reaction.aLo2_prod+reaction.Tlo_prod*(reaction.aLo3_prod+reaction.Tlo_prod*(reaction.aLo4_prod+reaction.Tlo_prod*reaction.aLo5_prod))))+(reaction.T>reaction.Tlo_prod)*(reaction.T<=reaction.Tmid_prod)*(reaction.aLo1_prod+reaction.T*(reaction.aLo2_prod+reaction.T*(reaction.aLo3_prod+reaction.T*(reaction.aLo4_prod+reaction.T*reaction.aLo5_prod))))+(reaction.T>reaction.Tmid_prod)*(reaction.T<=reaction.Thi_prod)*(reaction.aHi1_prod+reaction.T*(reaction.aHi2_prod+reaction.T*(reaction.aHi3_prod+reaction.T*(reaction.aHi4_prod+reaction.T*reaction.aHi5_prod))))+(reaction.T>reaction.Thi_prod)*(reaction.aHi1_prod+reaction.Thi_prod*(reaction.aHi2_prod+reaction.Thi_prod*(reaction.aHi3_prod+reaction.Thi_prod*(reaction.aHi4_prod+reaction.Thi_prod*reaction.aHi5_prod)))))
      ReactionTagInSpecies = {rch4, rch9, rch13}
      specName = prod
      R = reaction.r_4+reaction.r_9+reaction.r_13+reaction.r_14+reaction.r_15+reaction.r_16+reaction.r_17+reaction.r_18+reaction.r_19+reaction.r_20
      mixtureSolvent = 1
    Qact: SpeciesChem "Species: Qact"
      sisDef = 1
      sType = volumetric
      sSequenceNo = 16
      SpeciesSource = Reaction
      specLabel = Qact
      Tlo = 300[K]
      Tmid = 1000[K]
      Thi = 5000[K]
      h = R_const*((reaction.T<=reaction.Tlo_Qact)*(reaction.aLo6_Qact+reaction.Tlo_Qact*(reaction.aLo1_Qact+0.5*reaction.Tlo_Qact*(reaction.aLo2_Qact+2*reaction.Tlo_Qact*(reaction.aLo3_Qact+0.75*reaction.Tlo_Qact*(reaction.aLo4_Qact+0.8*reaction.Tlo_Qact*reaction.aLo5_Qact))/3)))+(reaction.T>reaction.Tlo_Qact)*(reaction.T<=reaction.Tmid_Qact)*(reaction.aLo6_Qact+reaction.T*(reaction.aLo1_Qact+0.5*reaction.T*(reaction.aLo2_Qact+2*reaction.T*(reaction.aLo3_Qact+0.75*reaction.T*(reaction.aLo4_Qact+0.8*reaction.T*reaction.aLo5_Qact))/3)))+(reaction.T>reaction.Tmid_Qact)*(reaction.T<=reaction.Thi_Qact)*(reaction.aHi6_Qact+reaction.T*(reaction.aHi1_Qact+0.5*reaction.T*(reaction.aHi2_Qact+2*reaction.T*(reaction.aHi3_Qact+0.75*reaction.T*(reaction.aHi4_Qact+0.8*reaction.T*reaction.aHi5_Qact))/3)))+(reaction.T>reaction.Thi_Qact)*(reaction.aHi6_Qact+reaction.Thi_Qact*(reaction.aHi1_Qact+0.5*reaction.Thi_Qact*(reaction.aHi2_Qact+2*reaction.Thi_Qact*(reaction.aHi3_Qact+0.75*reaction.Thi_Qact*(reaction.aHi4_Qact+0.8*reaction.Thi_Qact*reaction.aHi5_Qact))/3))))
      s = R_const*((reaction.T<=reaction.Tlo_Qact)*(reaction.aLo7_Qact+reaction.aLo1_Qact*log(reaction.T/1[K])+reaction.Tlo_Qact*(reaction.aLo2_Qact+0.5*reaction.Tlo_Qact*(reaction.aLo3_Qact+2*reaction.Tlo_Qact*(reaction.aLo4_Qact+0.75*reaction.Tlo_Qact*reaction.aLo5_Qact)/3)))+(reaction.T>reaction.Tlo_Qact)*(reaction.T<=reaction.Tmid_Qact)*(reaction.aLo7_Qact+reaction.aLo1_Qact*log(reaction.T/1[K])+reaction.T*(reaction.aLo2_Qact+0.5*reaction.T*(reaction.aLo3_Qact+2*reaction.T*(reaction.aLo4_Qact+0.75*reaction.T*reaction.aLo5_Qact)/3)))+(reaction.T>reaction.Tmid_Qact)*(reaction.T<=reaction.Thi_Qact)*(reaction.aHi7_Qact+reaction.aHi1_Qact*log(reaction.T/1[K])+reaction.T*(reaction.aHi2_Qact+0.5*reaction.T*(reaction.aHi3_Qact+2*reaction.T*(reaction.aHi4_Qact+0.75*reaction.T*reaction.aHi5_Qact)/3)))+(reaction.T>reaction.Thi_Qact)*(reaction.aHi7_Qact+reaction.aHi1_Qact*log(reaction.T/1[K])+reaction.Thi_Qact*(reaction.aHi2_Qact+0.5*reaction.Thi_Qact*(reaction.aHi3_Qact+2*reaction.Thi_Qact*(reaction.aHi4_Qact+0.75*reaction.Thi_Qact*reaction.aHi5_Qact)/3))))
      Cp = R_const*((reaction.T<=reaction.Tlo_Qact)*(reaction.aLo1_Qact+reaction.Tlo_Qact*(reaction.aLo2_Qact+reaction.Tlo_Qact*(reaction.aLo3_Qact+reaction.Tlo_Qact*(reaction.aLo4_Qact+reaction.Tlo_Qact*reaction.aLo5_Qact))))+(reaction.T>reaction.Tlo_Qact)*(reaction.T<=reaction.Tmid_Qact)*(reaction.aLo1_Qact+reaction.T*(reaction.aLo2_Qact+reaction.T*(reaction.aLo3_Qact+reaction.T*(reaction.aLo4_Qact+reaction.T*reaction.aLo5_Qact))))+(reaction.T>reaction.Tmid_Qact)*(reaction.T<=reaction.Thi_Qact)*(reaction.aHi1_Qact+reaction.T*(reaction.aHi2_Qact+reaction.T*(reaction.aHi3_Qact+reaction.T*(reaction.aHi4_Qact+reaction.T*reaction.aHi5_Qact))))+(reaction.T>reaction.Thi_Qact)*(reaction.aHi1_Qact+reaction.Thi_Qact*(reaction.aHi2_Qact+reaction.Thi_Qact*(reaction.aHi3_Qact+reaction.Thi_Qact*(reaction.aHi4_Qact+reaction.Thi_Qact*reaction.aHi5_Qact)))))
      sigma = 3.458[angstrom]
      epsilonkb = 107.4[K]
      mu = 0[C*m]
      ActivityCoefficient = 1
      speciesEnthalpy = NASA
      ReactionTagInSpecies = {rch11, rch1}
      updatefeat = 1
      GasThermalConductivitySel = Automatic
      GasDiffusivitySel = Automatic
      LiquidDiffusivitySel = Automatic
      k = 0.02[W/(m*K)]
      De = 1e-5[m^2/s]
      SpeciesrateSelection = Automatic
      specName = Qact
      R = reaction.r_11-reaction.r_1
      Speciesrate = 0[mol/(m^3*s)]
      SpeciesrateSurf = 0[mol/(m^2*s)]
      Speciessurfacerate = 0[mol/(m^2*s)]
      typeGUIControl = volumetric
      mixtureSolvent = 1
      Dgas = 10^-5[m^2/s]
      Dliquid = 10^-8[m^2/s]
      kgas = 0.015[W/(m*K)]
      MolarMassSelection = Thermodynamics
      M = 0.0[kg/mol]
      liquidDensitySel = Thermodynamics
      rho = 1000[kg/m^3]
      LiquidThermalConductivitySel = Thermodynamics
    rch11: ReactionChem "L: Q=>Qact" | formula = Q=>Qact; kf = KL [1/s]
    rch1: ReactionChem "Kdiff: Qact + DH => QH + D"
      reset = 1
      formulaID = irrev_D_DH_Qact_QH_
      KeqNum = reaction.c_QH*reaction.c_D*(1[m^3/mol])^2
      KeqDen = reaction.c_Qact*reaction.c_DH*(1[m^3/mol])^2
      rIsValid = 1
      rType = irrev
      stoichArray = {-1, -1, 1, 1}
      fwdSpecies = {Qact, DH}
      revSpecies = {QH, D}
      fwdSpeciesTags = {Qact, DH}
      revSpeciesTags = {QH, D}
      Species = {Qact, DH, QH, D}
      textOverallOrder = Overall forward reaction order: 2
      bulkFwdOrder = 2
      bulkRevOrder = 2
      formula = Qact+DH=>QH+D
      kf = Kdiff [l/(mol*s)]
    rch3: ReactionChem "Kr: QH + D => QHD"
      reset = 1
      formulaID = irrev_D_QH_QHD_
      KeqNum = reaction.c_QHD*1[m^3/mol]
      KeqDen = reaction.c_QH*reaction.c_D*(1[m^3/mol])^2
      rIsValid = 1
      rType = irrev
      stoichArray = {-1, -1, 1}
      fwdSpecies = {QH, D}
      revSpecies = QHD
      fwdSpeciesTags = {QH, D}
      revSpeciesTags = QHD
      Species = {QH, D, QHD}
      textOverallOrder = Overall forward reaction order: 2
      bulkFwdOrder = 2
      bulkRevOrder = 1
      formula = QH+D=>QHD
      kf = Kr [l/(mol*s)]
    rch4: ReactionChem "Kp: QHD =>QHH + prod"
      reset = 1
      formulaID = irrev_prod_QHD_QHH_
      KeqNum = reaction.c_QHH*reaction.c_prod*(1[m^3/mol])^2
      KeqDen = reaction.c_QHD*1[m^3/mol]
      rIsValid = 1
      rType = irrev
      stoichArray = {-1, 1, 1}
      fwdSpecies = QHD
      revSpecies = {QHH, prod}
      fwdSpeciesTags = QHD
      revSpeciesTags = {QHH, prod}
      Species = {QHD, QHH, prod}
      textOverallOrder = Overall forward reaction order: 1
      bulkFwdOrder = 1
      bulkRevOrder = 2
      formula = QHD=>QHH+prod
      kf = Kp [1/s]
    rch5: ReactionChem "KdQ: QH + QH => Q+ QHH"
      reset = 1
      formulaID = irrev_Q_QH_QHH_
      KeqNum = reaction.c_Q*reaction.c_QHH*(1[m^3/mol])^2
      KeqDen = (reaction.c_QH*1[m^3/mol])^2
      rIsValid = 1
      stoichArray = {-2, 1, 1}
      fwdSpecies = QH
      revSpecies = {Q, QHH}
      fwdSpeciesTags = QH
      revSpeciesTags = {Q, QHH}
      Species = {QH, Q, QHH}
      textOverallOrder = Overall forward reaction order: 2
      bulkFwdOrder = 2
      bulkRevOrder = 2
      formula = QH+QH=>Q+QHH
      kf = KdQ [l/(mol*s)]
      kr = Kdisp [l/(mol*s)]
    rch9: ReactionChem "KrDrec: 2 D => prod"
      reset = 1
      formulaID = irrev_D_prod_
      KeqNum = reaction.c_prod*1[m^3/mol]
      KeqDen = (reaction.c_D*1[m^3/mol])^2
      rIsValid = 1
      rType = irrev
      stoichArray = {-2, 1}
      fwdSpecies = D
      revSpecies = prod
      fwdSpeciesTags = D
      revSpeciesTags = prod
      Species = {D, prod}
      textOverallOrder = Overall forward reaction order: 2
      bulkFwdOrder = 2
      bulkRevOrder = 1
      formula = 2D=>prod
      kf = KrDrec [l/(mol*s)]
    rch13: ReactionChem "KrDdis: 2D=>DH + prod"
      reset = 1
      formulaID = irrev_D_prod_
      KeqNum = reaction.c_prod*1[m^3/mol]
      KeqDen = (reaction.c_D*1[m^3/mol])^2
      rIsValid = 1
      rType = irrev
      stoichArray = {-2, 1}
      fwdSpecies = D
      revSpecies = prod
      fwdSpeciesTags = D
      revSpeciesTags = prod
      Species = {D, prod}
      textOverallOrder = Overall forward reaction order: 2
      bulkFwdOrder = 2
      bulkRevOrder = 1
      formula = 2D=>prod
      kf = KrDdis [l/(mol*s)]
    est1: ParameterEstimation "Estimation" (disabled)
    PR: SpeciesChem "Species: PR"
      sisDef = 1
      sType = volumetric
      sSequenceNo = 17
      SpeciesSource = Reaction
      specLabel = PR
      Tlo = 300[K]
      Tmid = 1000[K]
      Thi = 5000[K]
      h = R_const*((reaction.T<=reaction.Tlo_PR)*(reaction.aLo6_PR+reaction.Tlo_PR*(reaction.aLo1_PR+0.5*reaction.Tlo_PR*(reaction.aLo2_PR+2*reaction.Tlo_PR*(reaction.aLo3_PR+0.75*reaction.Tlo_PR*(reaction.aLo4_PR+0.8*reaction.Tlo_PR*reaction.aLo5_PR))/3)))+(reaction.T>reaction.Tlo_PR)*(reaction.T<=reaction.Tmid_PR)*(reaction.aLo6_PR+reaction.T*(reaction.aLo1_PR+0.5*reaction.T*(reaction.aLo2_PR+2*reaction.T*(reaction.aLo3_PR+0.75*reaction.T*(reaction.aLo4_PR+0.8*reaction.T*reaction.aLo5_PR))/3)))+(reaction.T>reaction.Tmid_PR)*(reaction.T<=reaction.Thi_PR)*(reaction.aHi6_PR+reaction.T*(reaction.aHi1_PR+0.5*reaction.T*(reaction.aHi2_PR+2*reaction.T*(reaction.aHi3_PR+0.75*reaction.T*(reaction.aHi4_PR+0.8*reaction.T*reaction.aHi5_PR))/3)))+(reaction.T>reaction.Thi_PR)*(reaction.aHi6_PR+reaction.Thi_PR*(reaction.aHi1_PR+0.5*reaction.Thi_PR*(reaction.aHi2_PR+2*reaction.Thi_PR*(reaction.aHi3_PR+0.75*reaction.Thi_PR*(reaction.aHi4_PR+0.8*reaction.Thi_PR*reaction.aHi5_PR))/3))))
      s = R_const*((reaction.T<=reaction.Tlo_PR)*(reaction.aLo7_PR+reaction.aLo1_PR*log(reaction.T/1[K])+reaction.Tlo_PR*(reaction.aLo2_PR+0.5*reaction.Tlo_PR*(reaction.aLo3_PR+2*reaction.Tlo_PR*(reaction.aLo4_PR+0.75*reaction.Tlo_PR*reaction.aLo5_PR)/3)))+(reaction.T>reaction.Tlo_PR)*(reaction.T<=reaction.Tmid_PR)*(reaction.aLo7_PR+reaction.aLo1_PR*log(reaction.T/1[K])+reaction.T*(reaction.aLo2_PR+0.5*reaction.T*(reaction.aLo3_PR+2*reaction.T*(reaction.aLo4_PR+0.75*reaction.T*reaction.aLo5_PR)/3)))+(reaction.T>reaction.Tmid_PR)*(reaction.T<=reaction.Thi_PR)*(reaction.aHi7_PR+reaction.aHi1_PR*log(reaction.T/1[K])+reaction.T*(reaction.aHi2_PR+0.5*reaction.T*(reaction.aHi3_PR+2*reaction.T*(reaction.aHi4_PR+0.75*reaction.T*reaction.aHi5_PR)/3)))+(reaction.T>reaction.Thi_PR)*(reaction.aHi7_PR+reaction.aHi1_PR*log(reaction.T/1[K])+reaction.Thi_PR*(reaction.aHi2_PR+0.5*reaction.Thi_PR*(reaction.aHi3_PR+2*reaction.Thi_PR*(reaction.aHi4_PR+0.75*reaction.Thi_PR*reaction.aHi5_PR)/3))))
      Cp = R_const*((reaction.T<=reaction.Tlo_PR)*(reaction.aLo1_PR+reaction.Tlo_PR*(reaction.aLo2_PR+reaction.Tlo_PR*(reaction.aLo3_PR+reaction.Tlo_PR*(reaction.aLo4_PR+reaction.Tlo_PR*reaction.aLo5_PR))))+(reaction.T>reaction.Tlo_PR)*(reaction.T<=reaction.Tmid_PR)*(reaction.aLo1_PR+reaction.T*(reaction.aLo2_PR+reaction.T*(reaction.aLo3_PR+reaction.T*(reaction.aLo4_PR+reaction.T*reaction.aLo5_PR))))+(reaction.T>reaction.Tmid_PR)*(reaction.T<=reaction.Thi_PR)*(reaction.aHi1_PR+reaction.T*(reaction.aHi2_PR+reaction.T*(reaction.aHi3_PR+reaction.T*(reaction.aHi4_PR+reaction.T*reaction.aHi5_PR))))+(reaction.T>reaction.Thi_PR)*(reaction.aHi1_PR+reaction.Thi_PR*(reaction.aHi2_PR+reaction.Thi_PR*(reaction.aHi3_PR+reaction.Thi_PR*(reaction.aHi4_PR+reaction.Thi_PR*reaction.aHi5_PR)))))
      sigma = 3.458[angstrom]
      epsilonkb = 107.4[K]
      mu = 0[C*m]
      ActivityCoefficient = 1
      speciesEnthalpy = NASA
      ReactionTagInSpecies = {rch17, rch16, rch14, rch18, rch19, rch20, rch15}
      updatefeat = 1
      GasThermalConductivitySel = Automatic
      GasDiffusivitySel = Automatic
      LiquidDiffusivitySel = Automatic
      k = 0.02[W/(m*K)]
      De = 1e-5[m^2/s]
      SpeciesrateSelection = Automatic
      specName = PR
      R = -reaction.r_16+reaction.r_14-reaction.r_18-reaction.r_19-2*reaction.r_20
      Speciesrate = 0[mol/(m^3*s)]
      SpeciesrateSurf = 0[mol/(m^2*s)]
      Speciessurfacerate = 0[mol/(m^2*s)]
      typeGUIControl = volumetric
      mixtureSolvent = 1
      Dgas = 10^-5[m^2/s]
      Dliquid = 10^-8[m^2/s]
      kgas = 0.015[W/(m*K)]
      MolarMassSelection = Thermodynamics
      M = 0.0[kg/mol]
      liquidDensitySel = Thermodynamics
      rho = 1000[kg/m^3]
      LiquidThermalConductivitySel = Thermodynamics
    M: SpeciesChem "Species: M"
      sisDef = 1
      sType = volumetric
      sSequenceNo = 18
      SpeciesSource = Reaction
      specLabel = M
      Tlo = 300[K]
      Tmid = 1000[K]
      Thi = 5000[K]
      h = R_const*((reaction.T<=reaction.Tlo_M)*(reaction.aLo6_M+reaction.Tlo_M*(reaction.aLo1_M+0.5*reaction.Tlo_M*(reaction.aLo2_M+2*reaction.Tlo_M*(reaction.aLo3_M+0.75*reaction.Tlo_M*(reaction.aLo4_M+0.8*reaction.Tlo_M*reaction.aLo5_M))/3)))+(reaction.T>reaction.Tlo_M)*(reaction.T<=reaction.Tmid_M)*(reaction.aLo6_M+reaction.T*(reaction.aLo1_M+0.5*reaction.T*(reaction.aLo2_M+2*reaction.T*(reaction.aLo3_M+0.75*reaction.T*(reaction.aLo4_M+0.8*reaction.T*reaction.aLo5_M))/3)))+(reaction.T>reaction.Tmid_M)*(reaction.T<=reaction.Thi_M)*(reaction.aHi6_M+reaction.T*(reaction.aHi1_M+0.5*reaction.T*(reaction.aHi2_M+2*reaction.T*(reaction.aHi3_M+0.75*reaction.T*(reaction.aHi4_M+0.8*reaction.T*reaction.aHi5_M))/3)))+(reaction.T>reaction.Thi_M)*(reaction.aHi6_M+reaction.Thi_M*(reaction.aHi1_M+0.5*reaction.Thi_M*(reaction.aHi2_M+2*reaction.Thi_M*(reaction.aHi3_M+0.75*reaction.Thi_M*(reaction.aHi4_M+0.8*reaction.Thi_M*reaction.aHi5_M))/3))))
      s = R_const*((reaction.T<=reaction.Tlo_M)*(reaction.aLo7_M+reaction.aLo1_M*log(reaction.T/1[K])+reaction.Tlo_M*(reaction.aLo2_M+0.5*reaction.Tlo_M*(reaction.aLo3_M+2*reaction.Tlo_M*(reaction.aLo4_M+0.75*reaction.Tlo_M*reaction.aLo5_M)/3)))+(reaction.T>reaction.Tlo_M)*(reaction.T<=reaction.Tmid_M)*(reaction.aLo7_M+reaction.aLo1_M*log(reaction.T/1[K])+reaction.T*(reaction.aLo2_M+0.5*reaction.T*(reaction.aLo3_M+2*reaction.T*(reaction.aLo4_M+0.75*reaction.T*reaction.aLo5_M)/3)))+(reaction.T>reaction.Tmid_M)*(reaction.T<=reaction.Thi_M)*(reaction.aHi7_M+reaction.aHi1_M*log(reaction.T/1[K])+reaction.T*(reaction.aHi2_M+0.5*reaction.T*(reaction.aHi3_M+2*reaction.T*(reaction.aHi4_M+0.75*reaction.T*reaction.aHi5_M)/3)))+(reaction.T>reaction.Thi_M)*(reaction.aHi7_M+reaction.aHi1_M*log(reaction.T/1[K])+reaction.Thi_M*(reaction.aHi2_M+0.5*reaction.Thi_M*(reaction.aHi3_M+2*reaction.Thi_M*(reaction.aHi4_M+0.75*reaction.Thi_M*reaction.aHi5_M)/3))))
      Cp = R_const*((reaction.T<=reaction.Tlo_M)*(reaction.aLo1_M+reaction.Tlo_M*(reaction.aLo2_M+reaction.Tlo_M*(reaction.aLo3_M+reaction.Tlo_M*(reaction.aLo4_M+reaction.Tlo_M*reaction.aLo5_M))))+(reaction.T>reaction.Tlo_M)*(reaction.T<=reaction.Tmid_M)*(reaction.aLo1_M+reaction.T*(reaction.aLo2_M+reaction.T*(reaction.aLo3_M+reaction.T*(reaction.aLo4_M+reaction.T*reaction.aLo5_M))))+(reaction.T>reaction.Tmid_M)*(reaction.T<=reaction.Thi_M)*(reaction.aHi1_M+reaction.T*(reaction.aHi2_M+reaction.T*(reaction.aHi3_M+reaction.T*(reaction.aHi4_M+reaction.T*reaction.aHi5_M))))+(reaction.T>reaction.Thi_M)*(reaction.aHi1_M+reaction.Thi_M*(reaction.aHi2_M+reaction.Thi_M*(reaction.aHi3_M+reaction.Thi_M*(reaction.aHi4_M+reaction.Thi_M*reaction.aHi5_M)))))
      sigma = 3.458[angstrom]
      epsilonkb = 107.4[K]
      mu = 0[C*m]
      ActivityCoefficient = 1
      speciesEnthalpy = NASA
      ReactionTagInSpecies = {rch17, rch14, rch15}
      updatefeat = 1
      GasThermalConductivitySel = Automatic
      GasDiffusivitySel = Automatic
      LiquidDiffusivitySel = Automatic
      k = 0.02[W/(m*K)]
      De = 1e-5[m^2/s]
      SpeciesrateSelection = Automatic
      specName = M
      R = -reaction.r_17-reaction.r_14-reaction.r_15
      Speciesrate = 0[mol/(m^3*s)]
      SpeciesrateSurf = 0[mol/(m^2*s)]
      Speciessurfacerate = 0[mol/(m^2*s)]
      typeGUIControl = volumetric
      mixtureSolvent = 1
      Dgas = 10^-5[m^2/s]
      Dliquid = 10^-8[m^2/s]
      kgas = 0.015[W/(m*K)]
      MolarMassSelection = Thermodynamics
      M = 0.0[kg/mol]
      liquidDensitySel = Thermodynamics
      rho = 1000[kg/m^3]
      LiquidThermalConductivitySel = Thermodynamics
    P: SpeciesChem "Species: P"
      sisDef = 1
      sType = volumetric
      sSequenceNo = 19
      SpeciesSource = Reaction
      specLabel = P
      Tlo = 300[K]
      Tmid = 1000[K]
      Thi = 5000[K]
      h = R_const*((reaction.T<=reaction.Tlo_P)*(reaction.aLo6_P+reaction.Tlo_P*(reaction.aLo1_P+0.5*reaction.Tlo_P*(reaction.aLo2_P+2*reaction.Tlo_P*(reaction.aLo3_P+0.75*reaction.Tlo_P*(reaction.aLo4_P+0.8*reaction.Tlo_P*reaction.aLo5_P))/3)))+(reaction.T>reaction.Tlo_P)*(reaction.T<=reaction.Tmid_P)*(reaction.aLo6_P+reaction.T*(reaction.aLo1_P+0.5*reaction.T*(reaction.aLo2_P+2*reaction.T*(reaction.aLo3_P+0.75*reaction.T*(reaction.aLo4_P+0.8*reaction.T*reaction.aLo5_P))/3)))+(reaction.T>reaction.Tmid_P)*(reaction.T<=reaction.Thi_P)*(reaction.aHi6_P+reaction.T*(reaction.aHi1_P+0.5*reaction.T*(reaction.aHi2_P+2*reaction.T*(reaction.aHi3_P+0.75*reaction.T*(reaction.aHi4_P+0.8*reaction.T*reaction.aHi5_P))/3)))+(reaction.T>reaction.Thi_P)*(reaction.aHi6_P+reaction.Thi_P*(reaction.aHi1_P+0.5*reaction.Thi_P*(reaction.aHi2_P+2*reaction.Thi_P*(reaction.aHi3_P+0.75*reaction.Thi_P*(reaction.aHi4_P+0.8*reaction.Thi_P*reaction.aHi5_P))/3))))
      s = R_const*((reaction.T<=reaction.Tlo_P)*(reaction.aLo7_P+reaction.aLo1_P*log(reaction.T/1[K])+reaction.Tlo_P*(reaction.aLo2_P+0.5*reaction.Tlo_P*(reaction.aLo3_P+2*reaction.Tlo_P*(reaction.aLo4_P+0.75*reaction.Tlo_P*reaction.aLo5_P)/3)))+(reaction.T>reaction.Tlo_P)*(reaction.T<=reaction.Tmid_P)*(reaction.aLo7_P+reaction.aLo1_P*log(reaction.T/1[K])+reaction.T*(reaction.aLo2_P+0.5*reaction.T*(reaction.aLo3_P+2*reaction.T*(reaction.aLo4_P+0.75*reaction.T*reaction.aLo5_P)/3)))+(reaction.T>reaction.Tmid_P)*(reaction.T<=reaction.Thi_P)*(reaction.aHi7_P+reaction.aHi1_P*log(reaction.T/1[K])+reaction.T*(reaction.aHi2_P+0.5*reaction.T*(reaction.aHi3_P+2*reaction.T*(reaction.aHi4_P+0.75*reaction.T*reaction.aHi5_P)/3)))+(reaction.T>reaction.Thi_P)*(reaction.aHi7_P+reaction.aHi1_P*log(reaction.T/1[K])+reaction.Thi_P*(reaction.aHi2_P+0.5*reaction.Thi_P*(reaction.aHi3_P+2*reaction.Thi_P*(reaction.aHi4_P+0.75*reaction.Thi_P*reaction.aHi5_P)/3))))
      Cp = R_const*((reaction.T<=reaction.Tlo_P)*(reaction.aLo1_P+reaction.Tlo_P*(reaction.aLo2_P+reaction.Tlo_P*(reaction.aLo3_P+reaction.Tlo_P*(reaction.aLo4_P+reaction.Tlo_P*reaction.aLo5_P))))+(reaction.T>reaction.Tlo_P)*(reaction.T<=reaction.Tmid_P)*(reaction.aLo1_P+reaction.T*(reaction.aLo2_P+reaction.T*(reaction.aLo3_P+reaction.T*(reaction.aLo4_P+reaction.T*reaction.aLo5_P))))+(reaction.T>reaction.Tmid_P)*(reaction.T<=reaction.Thi_P)*(reaction.aHi1_P+reaction.T*(reaction.aHi2_P+reaction.T*(reaction.aHi3_P+reaction.T*(reaction.aHi4_P+reaction.T*reaction.aHi5_P))))+(reaction.T>reaction.Thi_P)*(reaction.aHi1_P+reaction.Thi_P*(reaction.aHi2_P+reaction.Thi_P*(reaction.aHi3_P+reaction.Thi_P*(reaction.aHi4_P+reaction.Thi_P*reaction.aHi5_P)))))
      sigma = 3.458[angstrom]
      epsilonkb = 107.4[K]
      mu = 0[C*m]
      ActivityCoefficient = 1
      speciesEnthalpy = NASA
      ReactionTagInSpecies = {rch17, rch16, rch18, rch19, rch20}
      updatefeat = 1
      GasThermalConductivitySel = Automatic
      GasDiffusivitySel = Automatic
      LiquidDiffusivitySel = Automatic
      k = 0.02[W/(m*K)]
      De = 1e-5[m^2/s]
      SpeciesrateSelection = Automatic
      specName = P
      R = reaction.r_17+reaction.r_16+reaction.r_18+root.comp.reaction.r_19+root.comp.reaction.r_20
      Speciesrate = 0[mol/(m^3*s)]
      SpeciesrateSurf = 0[mol/(m^2*s)]
      Speciessurfacerate = 0[mol/(m^2*s)]
      typeGUIControl = volumetric
      mixtureSolvent = 1
      Dgas = 10^-5[m^2/s]
      Dliquid = 10^-8[m^2/s]
      kgas = 0.015[W/(m*K)]
      MolarMassSelection = Thermodynamics
      M = 30.97376[g/mol]
      liquidDensitySel = Thermodynamics
      rho = 1000[kg/m^3]
      LiquidThermalConductivitySel = Thermodynamics
    sol: SpeciesChem "Species: sol"
      sisDef = 1
      sType = volumetric
      sSequenceNo = 20
      SpeciesSource = Reaction
      specLabel = sol
      Tlo = 300[K]
      Tmid = 1000[K]
      Thi = 5000[K]
      h = R_const*((reaction.T<=reaction.Tlo_sol)*(reaction.aLo6_sol+reaction.Tlo_sol*(reaction.aLo1_sol+0.5*reaction.Tlo_sol*(reaction.aLo2_sol+2*reaction.Tlo_sol*(reaction.aLo3_sol+0.75*reaction.Tlo_sol*(reaction.aLo4_sol+0.8*reaction.Tlo_sol*reaction.aLo5_sol))/3)))+(reaction.T>reaction.Tlo_sol)*(reaction.T<=reaction.Tmid_sol)*(reaction.aLo6_sol+reaction.T*(reaction.aLo1_sol+0.5*reaction.T*(reaction.aLo2_sol+2*reaction.T*(reaction.aLo3_sol+0.75*reaction.T*(reaction.aLo4_sol+0.8*reaction.T*reaction.aLo5_sol))/3)))+(reaction.T>reaction.Tmid_sol)*(reaction.T<=reaction.Thi_sol)*(reaction.aHi6_sol+reaction.T*(reaction.aHi1_sol+0.5*reaction.T*(reaction.aHi2_sol+2*reaction.T*(reaction.aHi3_sol+0.75*reaction.T*(reaction.aHi4_sol+0.8*reaction.T*reaction.aHi5_sol))/3)))+(reaction.T>reaction.Thi_sol)*(reaction.aHi6_sol+reaction.Thi_sol*(reaction.aHi1_sol+0.5*reaction.Thi_sol*(reaction.aHi2_sol+2*reaction.Thi_sol*(reaction.aHi3_sol+0.75*reaction.Thi_sol*(reaction.aHi4_sol+0.8*reaction.Thi_sol*reaction.aHi5_sol))/3))))
      s = R_const*((reaction.T<=reaction.Tlo_sol)*(reaction.aLo7_sol+reaction.aLo1_sol*log(reaction.T/1[K])+reaction.Tlo_sol*(reaction.aLo2_sol+0.5*reaction.Tlo_sol*(reaction.aLo3_sol+2*reaction.Tlo_sol*(reaction.aLo4_sol+0.75*reaction.Tlo_sol*reaction.aLo5_sol)/3)))+(reaction.T>reaction.Tlo_sol)*(reaction.T<=reaction.Tmid_sol)*(reaction.aLo7_sol+reaction.aLo1_sol*log(reaction.T/1[K])+reaction.T*(reaction.aLo2_sol+0.5*reaction.T*(reaction.aLo3_sol+2*reaction.T*(reaction.aLo4_sol+0.75*reaction.T*reaction.aLo5_sol)/3)))+(reaction.T>reaction.Tmid_sol)*(reaction.T<=reaction.Thi_sol)*(reaction.aHi7_sol+reaction.aHi1_sol*log(reaction.T/1[K])+reaction.T*(reaction.aHi2_sol+0.5*reaction.T*(reaction.aHi3_sol+2*reaction.T*(reaction.aHi4_sol+0.75*reaction.T*reaction.aHi5_sol)/3)))+(reaction.T>reaction.Thi_sol)*(reaction.aHi7_sol+reaction.aHi1_sol*log(reaction.T/1[K])+reaction.Thi_sol*(reaction.aHi2_sol+0.5*reaction.Thi_sol*(reaction.aHi3_sol+2*reaction.Thi_sol*(reaction.aHi4_sol+0.75*reaction.Thi_sol*reaction.aHi5_sol)/3))))
      Cp = R_const*((reaction.T<=reaction.Tlo_sol)*(reaction.aLo1_sol+reaction.Tlo_sol*(reaction.aLo2_sol+reaction.Tlo_sol*(reaction.aLo3_sol+reaction.Tlo_sol*(reaction.aLo4_sol+reaction.Tlo_sol*reaction.aLo5_sol))))+(reaction.T>reaction.Tlo_sol)*(reaction.T<=reaction.Tmid_sol)*(reaction.aLo1_sol+reaction.T*(reaction.aLo2_sol+reaction.T*(reaction.aLo3_sol+reaction.T*(reaction.aLo4_sol+reaction.T*reaction.aLo5_sol))))+(reaction.T>reaction.Tmid_sol)*(reaction.T<=reaction.Thi_sol)*(reaction.aHi1_sol+reaction.T*(reaction.aHi2_sol+reaction.T*(reaction.aHi3_sol+reaction.T*(reaction.aHi4_sol+reaction.T*reaction.aHi5_sol))))+(reaction.T>reaction.Thi_sol)*(reaction.aHi1_sol+reaction.Thi_sol*(reaction.aHi2_sol+reaction.Thi_sol*(reaction.aHi3_sol+reaction.Thi_sol*(reaction.aHi4_sol+reaction.Thi_sol*reaction.aHi5_sol)))))
      sigma = 3.458[angstrom]
      epsilonkb = 107.4[K]
      mu = 0[C*m]
      ActivityCoefficient = 1
      speciesEnthalpy = NASA
      ReactionTagInSpecies = rch16
      updatefeat = 1
      GasThermalConductivitySel = Automatic
      GasDiffusivitySel = Automatic
      LiquidDiffusivitySel = Automatic
      k = 0.02[W/(m*K)]
      De = 1e-5[m^2/s]
      SpeciesrateSelection = Automatic
      specName = sol
      R = -reaction.r_16
      Speciesrate = 0[mol/(m^3*s)]
      SpeciesrateSurf = 0[mol/(m^2*s)]
      Speciessurfacerate = 0[mol/(m^2*s)]
      typeGUIControl = volumetric
      mixtureSolvent = 1
      Dgas = 10^-5[m^2/s]
      Dliquid = 10^-8[m^2/s]
      kgas = 0.015[W/(m*K)]
      MolarMassSelection = Thermodynamics
      M = 0.0[kg/mol]
      liquidDensitySel = Thermodynamics
      rho = 1000[kg/m^3]
      LiquidThermalConductivitySel = Thermodynamics
    solR: SpeciesChem "Species: solR"
      sisDef = 1
      sType = volumetric
      sSequenceNo = 21
      SpeciesSource = Reaction
      specLabel = solR
      Tlo = 300[K]
      Tmid = 1000[K]
      Thi = 5000[K]
      h = R_const*((reaction.T<=reaction.Tlo_solR)*(reaction.aLo6_solR+reaction.Tlo_solR*(reaction.aLo1_solR+0.5*reaction.Tlo_solR*(reaction.aLo2_solR+2*reaction.Tlo_solR*(reaction.aLo3_solR+0.75*reaction.Tlo_solR*(reaction.aLo4_solR+0.8*reaction.Tlo_solR*reaction.aLo5_solR))/3)))+(reaction.T>reaction.Tlo_solR)*(reaction.T<=reaction.Tmid_solR)*(reaction.aLo6_solR+reaction.T*(reaction.aLo1_solR+0.5*reaction.T*(reaction.aLo2_solR+2*reaction.T*(reaction.aLo3_solR+0.75*reaction.T*(reaction.aLo4_solR+0.8*reaction.T*reaction.aLo5_solR))/3)))+(reaction.T>reaction.Tmid_solR)*(reaction.T<=reaction.Thi_solR)*(reaction.aHi6_solR+reaction.T*(reaction.aHi1_solR+0.5*reaction.T*(reaction.aHi2_solR+2*reaction.T*(reaction.aHi3_solR+0.75*reaction.T*(reaction.aHi4_solR+0.8*reaction.T*reaction.aHi5_solR))/3)))+(reaction.T>reaction.Thi_solR)*(reaction.aHi6_solR+reaction.Thi_solR*(reaction.aHi1_solR+0.5*reaction.Thi_solR*(reaction.aHi2_solR+2*reaction.Thi_solR*(reaction.aHi3_solR+0.75*reaction.Thi_solR*(reaction.aHi4_solR+0.8*reaction.Thi_solR*reaction.aHi5_solR))/3))))
      s = R_const*((reaction.T<=reaction.Tlo_solR)*(reaction.aLo7_solR+reaction.aLo1_solR*log(reaction.T/1[K])+reaction.Tlo_solR*(reaction.aLo2_solR+0.5*reaction.Tlo_solR*(reaction.aLo3_solR+2*reaction.Tlo_solR*(reaction.aLo4_solR+0.75*reaction.Tlo_solR*reaction.aLo5_solR)/3)))+(reaction.T>reaction.Tlo_solR)*(reaction.T<=reaction.Tmid_solR)*(reaction.aLo7_solR+reaction.aLo1_solR*log(reaction.T/1[K])+reaction.T*(reaction.aLo2_solR+0.5*reaction.T*(reaction.aLo3_solR+2*reaction.T*(reaction.aLo4_solR+0.75*reaction.T*reaction.aLo5_solR)/3)))+(reaction.T>reaction.Tmid_solR)*(reaction.T<=reaction.Thi_solR)*(reaction.aHi7_solR+reaction.aHi1_solR*log(reaction.T/1[K])+reaction.T*(reaction.aHi2_solR+0.5*reaction.T*(reaction.aHi3_solR+2*reaction.T*(reaction.aHi4_solR+0.75*reaction.T*reaction.aHi5_solR)/3)))+(reaction.T>reaction.Thi_solR)*(reaction.aHi7_solR+reaction.aHi1_solR*log(reaction.T/1[K])+reaction.Thi_solR*(reaction.aHi2_solR+0.5*reaction.Thi_solR*(reaction.aHi3_solR+2*reaction.Thi_solR*(reaction.aHi4_solR+0.75*reaction.Thi_solR*reaction.aHi5_solR)/3))))
      Cp = R_const*((reaction.T<=reaction.Tlo_solR)*(reaction.aLo1_solR+reaction.Tlo_solR*(reaction.aLo2_solR+reaction.Tlo_solR*(reaction.aLo3_solR+reaction.Tlo_solR*(reaction.aLo4_solR+reaction.Tlo_solR*reaction.aLo5_solR))))+(reaction.T>reaction.Tlo_solR)*(reaction.T<=reaction.Tmid_solR)*(reaction.aLo1_solR+reaction.T*(reaction.aLo2_solR+reaction.T*(reaction.aLo3_solR+reaction.T*(reaction.aLo4_solR+reaction.T*reaction.aLo5_solR))))+(reaction.T>reaction.Tmid_solR)*(reaction.T<=reaction.Thi_solR)*(reaction.aHi1_solR+reaction.T*(reaction.aHi2_solR+reaction.T*(reaction.aHi3_solR+reaction.T*(reaction.aHi4_solR+reaction.T*reaction.aHi5_solR))))+(reaction.T>reaction.Thi_solR)*(reaction.aHi1_solR+reaction.Thi_solR*(reaction.aHi2_solR+reaction.Thi_solR*(reaction.aHi3_solR+reaction.Thi_solR*(reaction.aHi4_solR+reaction.Thi_solR*reaction.aHi5_solR)))))
      sigma = 3.458[angstrom]
      epsilonkb = 107.4[K]
      mu = 0[C*m]
      ActivityCoefficient = 1
      speciesEnthalpy = NASA
      ReactionTagInSpecies = rch16
      updatefeat = 1
      GasThermalConductivitySel = Automatic
      GasDiffusivitySel = Automatic
      LiquidDiffusivitySel = Automatic
      k = 0.02[W/(m*K)]
      De = 1e-5[m^2/s]
      SpeciesrateSelection = Automatic
      specName = solR
      R = reaction.r_16
      Speciesrate = 0[mol/(m^3*s)]
      SpeciesrateSurf = 0[mol/(m^2*s)]
      Speciessurfacerate = 0[mol/(m^2*s)]
      typeGUIControl = volumetric
      mixtureSolvent = 1
      Dgas = 10^-5[m^2/s]
      Dliquid = 10^-8[m^2/s]
      kgas = 0.015[W/(m*K)]
      MolarMassSelection = Thermodynamics
      M = 0.0[kg/mol]
      liquidDensitySel = Thermodynamics
      rho = 1000[kg/m^3]
      LiquidThermalConductivitySel = Thermodynamics
    rch14: ReactionChem "Kinit : D + M=>PR"
      reset = 1
      formulaID = irrev_D_M_PR_
      KeqNum = reaction.c_PR*1[m^3/mol]
      KeqDen = reaction.c_D*reaction.c_M*(1[m^3/mol])^2
      rIsValid = 1
      rType = irrev
      stoichArray = {-1, -1, 1}
      fwdSpecies = {D, M}
      revSpecies = PR
      fwdSpeciesTags = {D, M}
      revSpeciesTags = PR
      Species = {D, M, PR}
      textOverallOrder = Overall forward reaction order: 2
      bulkFwdOrder = 2
      bulkRevOrder = 1
      formula = D+M=>PR
      kf = Kinit [l/(mol*s)]
    rch15: ReactionChem "Kprop : PR + M=>PR"
      reset = 1
      formulaID = irrev_M_PR_PR_
      KeqNum = reaction.c_PR*1[m^3/mol]
      KeqDen = reaction.c_PR*reaction.c_M*(1[m^3/mol])^2
      rIsValid = 1
      rType = irrev
      stoichArray = {-1, -1, 1}
      fwdSpecies = {PR, M}
      revSpecies = PR
      fwdSpeciesTags = {PR, M}
      revSpeciesTags = PR
      Species = {PR, M, PR}
      textOverallOrder = Overall forward reaction order: 2
      bulkFwdOrder = 2
      bulkRevOrder = 1
      formula = PR+M=>PR
      kf = Kprop [l/(mol*s)]
    rch16: ReactionChem "Ktranssol : PR + sol =>solR + P"
      reset = 1
      formulaID = irrev_P_PR_sol_solR_
      KeqNum = reaction.c_solR*reaction.c_P*(1[m^3/mol])^2
      KeqDen = reaction.c_PR*reaction.c_sol*(1[m^3/mol])^2
      rIsValid = 1
      rType = irrev
      stoichArray = {-1, -1, 1, 1}
      fwdSpecies = {PR, sol}
      revSpecies = {solR, P}
      fwdSpeciesTags = {PR, sol}
      revSpeciesTags = {solR, P}
      Species = {PR, sol, solR, P}
      textOverallOrder = Overall forward reaction order: 2
      bulkFwdOrder = 2
      bulkRevOrder = 2
      formula = PR+sol=>solR+P
      kf = Ktranssol [l/(mol*s)]
    rch17: ReactionChem "Ktransm : PR + M=>PR + P"
      reset = 1
      formulaID = irrev_M_P_PR_PR_
      KeqNum = reaction.c_PR*reaction.c_P*(1[m^3/mol])^2
      KeqDen = reaction.c_PR*reaction.c_M*(1[m^3/mol])^2
      rIsValid = 1
      rType = irrev
      stoichArray = {-1, -1, 1, 1}
      fwdSpecies = {PR, M}
      revSpecies = {PR, P}
      fwdSpeciesTags = {PR, M}
      revSpeciesTags = {PR, P}
      Species = {PR, M, PR, P}
      textOverallOrder = Overall forward reaction order: 2
      bulkFwdOrder = 2
      bulkRevOrder = 2
      formula = PR+M=>PR+P
      kf = Ktransm [l/(mol*s)]
    rch18: ReactionChem "Kinh : PR + Q=>QH+P"
      reset = 1
      formulaID = irrev_P_PR_Q_QH_
      KeqNum = reaction.c_QH*reaction.c_P*(1[m^3/mol])^2
      KeqDen = reaction.c_PR*reaction.c_Q*(1[m^3/mol])^2
      rIsValid = 1
      rType = irrev
      stoichArray = {-1, -1, 1, 1}
      fwdSpecies = {PR, Q}
      revSpecies = {QH, P}
      fwdSpeciesTags = {PR, Q}
      revSpeciesTags = {QH, P}
      Species = {PR, Q, QH, P}
      textOverallOrder = Overall forward reaction order: 2
      bulkFwdOrder = 2
      bulkRevOrder = 2
      formula = PR+Q=>QH+P
      kf = Kinh [l/(mol*s)]
    rch19: ReactionChem "Kterlin : PR=>P"
      reset = 1
      formulaID = irrev_P_PR_
      KeqNum = reaction.c_P*1[m^3/mol]
      KeqDen = reaction.c_PR*1[m^3/mol]
      rIsValid = 1
      rType = irrev
      stoichArray = {-1, 1}
      fwdSpecies = PR
      revSpecies = P
      fwdSpeciesTags = PR
      revSpeciesTags = P
      Species = {PR, P}
      textOverallOrder = Overall forward reaction order: 1
      bulkFwdOrder = 1
      bulkRevOrder = 1
      formula = PR=>P
      kf = Kterlin [1/s]
    rch20: ReactionChem "Kterrec : 2PR=>P"
      reset = 1
      formulaID = irrev_P_PR_
      KeqNum = reaction.c_P*1[m^3/mol]
      KeqDen = (reaction.c_PR*1[m^3/mol])^2
      rIsValid = 1
      rType = irrev
      stoichArray = {-2, 1}
      fwdSpecies = PR
      revSpecies = P
      fwdSpeciesTags = PR
      revSpeciesTags = P
      Species = {PR, P}
      textOverallOrder = Overall forward reaction order: 2
      bulkFwdOrder = 2
      bulkRevOrder = 1
      formula = 2PR=>P
      kf = Kterrec [l/(mol*s)]

Studies
  std1 "Generator"
    time: Transient "Time Dependent" | tlist = range(0,time_end/10,time_end)
  std4 "Sensitivity"
    sens: Sensitivity
      gradientMethod = forward
      gradientStep = time
      optobj = comp.reaction.c_D
      descr = Concentration
      optobjEvaluateFor = time
      initval = {1, 1}
      scale = {1, 1}
      valuetype = {real, real, real, real, real, real, real, real, real, real, real, real, real, real, real, real, real, real, real, real, real, real}
      pname = {DH0, Q0}
    time: Transient "Time Dependent" | tlist = range(0,time_end/10,time_end)
  std3 "Estimator"
    opt: Optimization | optsolver = lm; opttolinner = 0.01; gradientStep = time; objtable = tbl1; plotobj = on
    time: Transient "Time Dependent" | tlist = range(0,1e-4,time_end)

Solver configurations
  sol1 "Generator_Solution" (study std1)
    v1: Variables "Dependent Variables 1"
    t1: Time "Time-Dependent Solver 1"
      tlist = range(0,time_end/10,time_end)
      tout = tsteps
      rtol = 1.0E-5
      initialstepbdf = 0.0000001
      maxorder = 2
      eventtol = 0.001
      stabcntrl = on
      masssingular = yes
      dDef: Direct | linsolver = pardiso
      fc1: FullyCoupled | dtech = auto; ntermauto = itertol; niter = 100
  sol4 "Estimator_Solution" (study std3)
    v1: Variables "Dependent Variables 1"
    o1: Optimization "Optimization Solver 1" | opttol = 0.01; optsolver = lm
      t1: TimeAttrib "Time-Dependent Solver 1"
        tlist = range(0,1e-4,time_end)
        tout = tsteps
        rtol = 1.0E-5
        tlistlsq = {0, 7.10714182498e-12, 1.421428365e-11, 2.84285672999e-11}
        dDef: Direct | linsolver = pardiso
        fc1: FullyCoupled | dtech = auto
  sol5 "Sensitivity_Solution" (study std4)
    v1: Variables "Dependent Variables 1"
    t1: Time "Time-Dependent Solver 1" | tlist = range(0,time_end/10,time_end); tout = tsteps; rtol = 1.0E-5
      dDef: Direct
      sn1: Sensitivity
      fc1: FullyCoupled | linsolver = dDef; dtech = auto

Datasets
  dset1: Solution "Generator_data" | solution = sol1
  dset4: Solution "Estimator_data" | solution = sol4
  dset5: Solution "Sensitivity_data" | solution = sol5

Evaluation groups
  eg1: EvaluationGroup "Generator_export" | data = dset1; filename = D:\WORKS\COMSOL_polymers\Batch\generator_out.csv
    gev1: EvalGlobal "All"
      expr = {reaction.c_Q, reaction.c_DH, reaction.c_QHD, reaction.c_QHH, reaction.c_prod, reaction.c_Qm, reaction.c_DHp, reaction.c_QH, reaction.c_D, reaction.c_QD}
      unit = {mol/m^3, mol/m^3, mol/m^3, mol/m^3, mol/m^3, , , mol/m^3, mol/m^3, }
      descr = {Q, DH, QHD, QHH, prod, Qm, DHp, QH, D, QD}

Plots
  pg10: PlotGroup1D "Conversion" | data = dset1
    glob1: Global | expr = {(1 - reaction.c_M/M0)*100, (1-exp(-(t/10)^4))*100}; unit = {1, }; descr = {Solved, Real}
  pg1: PlotGroup1D "Generator_Stable" | data = dset1
    glob1: Global
      expr = {reaction.c_Q, reaction.c_DH, reaction.c_QHD, reaction.c_QHH, reaction.c_prod}
      unit = {mol/m^3, mol/m^3, mol/m^3, mol/m^3, mol/m^3}
      descr = {Q, DH, QHD, QHH, prod}
  pg3: PlotGroup1D "Generator_Radicals" | data = dset1
    glob2: Global (disabled)
      expr = {reaction.c_Qm, reaction.c_DHp, reaction.c_QH, reaction.c_D, reaction.c_QD}
      unit = {, , mol/m^3, mol/m^3, }
      descr = {Qm, DHp, QH, D, QD}
    glob3: Global | expr = {reaction.c_QH, reaction.c_D}; unit = {mol/m^3, mol/m^3}; descr = {QH, D}
  pg9: PlotGroup1D "Generator_Monomer" | data = dset1
    glob1: Global | expr = reaction.c_M; unit = mol/m^3; descr = M
  pg8: PlotGroup1D "Loss_plot" | data = none; xlabel = Iterations; ylabel = MSE
    tblp1: Table "Plot" | table = tbl1; xaxisdata = rowindex; plotcolumninput = manual

Methods
  solve_view: CodeEditor "Method 1"
    public class solve_view extends ApplicationMethod {
      public void execute() {
        model.study("std1").run(); model.result("pg1").run();
        useGraphics(model.result("pg1"), "plots/graphics1");
        useGraphics(model.result("pg3"), "plots/graphics2");
      }
    }