// COMSOL Multiphysics 6.0.0.318 model "Real_parameters.mph"
// Outline of the model tree

Parameters
  H0 = 8 [mW*s/cm^2]
  L = 500*10^(-6) [m]
  Px = 0.1
  DM = 0.01 * 10^(-12) *1e-5 [m^2/s]
  DMN = 10*DM
  g = 4
  d = 1/(0.256*10^(-6)) [m]
  I0 = 8 [mW/cm^2]
  tp = H0/I0
  td = L^2/DM
  a_par = H0*DMN/I0/L^2
  rho = 1.2

Functions
  an1: Analytic "L" | funcname = L; expr = if(t<0.2, (gp1(x)+gp2(x)),5) + t*0; args = {t, x}; argunit = {, }
  rect1: Rectangle | funcname = gp1; lower = 0.25; upper = 0.75; smooth = 0.01
  rect2: Rectangle | funcname = gp2; lower = 1.25; upper = 1.75; smooth = 0.01
  an2: Analytic | funcname = light; expr = I0*(1+0.99*cos(2*pi*x*d*L))/H0

Variables
  var1 "dif constants" on all domains
    R = if(1-p-n>2e-4, light(x)*rho*g*(1-p-n)*log((1-n)/(1-p-n))^((g-1)/g), 0)
    b_par = H0*DM/I0/L^2*exp(p/Px)  // N P dif
    e_par = H0*DMN/I0/L^2*exp(p/Px)  // N P dif

Selections
  sel1: Explicit on no boundaries

Geometry
  geom1 "Geometry" (1D, length unit m)
    i1: Interval "central" | coord = {0, 0.001}
    fin: Finalize "Form Union"

Physics
  n_flux: GeneralFormPDE "N flux" on all domains
    dependent variable n
    gfeq1: GeneralFormPDE (default) | f = 0; Ga = -a_par*nx + a_par*p*nx - e_par*p*nx - a_par*n*px + e_par*n*px; da = 1
    zflx1: ZeroFluxBoundary "Zero Flux 1" (default)
    init1: init "Initial Values 1" (default) | n = 0.001
  p_flux: GeneralFormPDE "P flux" on all domains
    dependent variable p
    gfeq1: GeneralFormPDE (default) | f = R; Ga = -b_par*px - b_par*p*nx + e_par*p*nx + b_par*n*px - e_par*n*px; da = 1
    zflx1: ZeroFluxBoundary "Zero Flux 1" (default)
    init1: init "Initial Values 1" (default) | p = 0.001

Mesh
  mesh1 "Central"
    size: MeshSizeDefault "Size cenral" | hmax = 0.0000001; hmin = 3.6E-4; hauto = 4; custom = on
    edg1: Edge on remaining entities

Studies
  std1 "Study"
    time: Transient "Time Dependent" | tlist = range(0,2,10)

Solver configurations
  sol1 "Solution 1" (study std1)
    v1: Variables "Dependent Variables 1"
    t1: Time "Time-Dependent Solver 1"
      tlist = range(0,2,10)
      tout = tsteps
      maxorder = 2
      masssingular = yes
      rescaleafterinitbw = on
      dDef: Direct
      fc1: FullyCoupled | dtech = auto
  sol2 "Refined Mesh Solution 1" (study std1)

Datasets
  dset1: Solution | solution = sol1
  dset2: Solution | solution = sol2
  an1_ds1: Grid1D "Grid 1D 1a" | function = all; data = none; res1 = 10000; distribution = mixed
  an1_ds2: Grid1D "Grid 1D 2a" | function = all; data = none; res1 = 10000; distribution = mixed
  an1_ds3: Grid2D | function = all; data = none; parmax1 = 2; par2 = t
  rect1_ds1: Grid1D "Grid 1D 1b" | function = rect1; data = none; parmin1 = -1.5; parmax1 = 1.5
  rect1_ds2: Grid1D "Grid 1D 2b" | function = rect1; data = none; parmin1 = -0.6; parmax1 = 0.6
  rect1_ds3: Grid1D "Grid 1D 3a" | function = rect1; data = none; parmin1 = 0.4; parmax1 = 0.7
  an1_ds4: Grid2D | function = all; data = none; parmax1 = 2; par2 = t
  an1_ds5: Grid2D | function = all; data = none; parmax1 = 2; par2 = t
  an1_ds6: Grid2D | function = all; data = none; parmax1 = 2; par2 = t
  an1_ds7: Grid2D | function = all; data = none; parmax1 = 2; par2 = t
  an1_ds8: Grid2D | function = all; data = none; parmax1 = 2; par2 = t
  an1_ds9: Grid2D | function = all; data = none; parmax1 = 2; par2 = t
  an2_ds1: Grid1D | function = an2; data = none; parmax1 = 10; res1 = 10000; distribution = mixed

Plots
  pg3: PlotGroup1D "Base Group" | data = dset1; xlabel = Coordinate; ylabel = Concentration
    lngr1: LineGraph "neutral plot" on domains 1 | expr = n; descr = Neutral; legends = neutral
    lngr2: LineGraph "polimer plot" on domains 1 | expr = p; descr = Polymer; legends = polimer
    lngr3: LineGraph "monomer plot" on domains 1 | expr = 1-n-p; descr = monomer; autosolution = off
    lngr4: LineGraph "light plot" on all domains | expr = light(x)/2

Exports
  anim1: Animation | target = player; framesel = all; frametime = 1