// COMSOL Multiphysics 6.0.0.318 model "Старая модель.mph"
// Outline of the model tree
// Unit system: none

Parameters
  a_par = 0.01  // N M dif
  b_par = 0.01  // M P dif
  e_par = 0.1  // N P dif
  gamma = 4

Functions
  gp1: GaussianPulse | location = 0.8; sigma = 0.1; normalization = peak; peakvalue = 0.8

Variables
  var1 "dif constants"
    a = a_par
    b = b_par*exp(-p/0.13)
    e = e_par*exp(-p/0.13)
    R = gamma*gp1(x)*(1-m-n)*(-log((1-p-m)/(1-n))^((gamma-1)/gamma))

Selections
  sel1: Explicit on no boundaries

Geometry
  geom1 "Geometry" (1D, length unit m)
    i1: Interval "central" | coord = {0, 2}
    fin: Finalize "Form Union"

Physics
  n_flux: GeneralFormPDE "N flux" on all domains
    dependent variable n
    gfeq1: GeneralFormPDE (default) | f = 0; Ga = -a*nx + a*p*nx - e*p*nx - a*n*px + e*n*px; da = 1
    zflx1: ZeroFluxBoundary "Zero Flux 1" (default)
    init1: init "Initial Values 1" (default) | n = 0.2
  p_flux: GeneralFormPDE "P flux" on all domains
    dependent variable p
    gfeq1: GeneralFormPDE (default) | f = R; Ga = -b*px - b*p*nx + e*p*nx + b*n*px - e*n*px; da = 1
    zflx1: ZeroFluxBoundary "Zero Flux 1" (default)
    init1: init "Initial Values 1" (default) | p = 0
  cb: CoefficientFormBoundaryPDE (disabled) on no boundaries
    dependent variable n
    ShapeProperty.order = 1
    cfeq1: CoefficientFormPDE (default) | c = 1; f = 0; da = 0
    init1: init "Initial Values 1" (default) | n = 0.01
  cb2: CoefficientFormBoundaryPDE (disabled) on no boundaries
    dependent variable p
    ShapeProperty.order = 1
    cfeq1: CoefficientFormPDE (default) | c = 1; f = 0; da = 0
    init1: init "Initial Values 1" (default) | p = gp1(x)

Mesh
  mesh1 "Central"
    size: MeshSizeDefault "Size cenral" | hmax = 0.01; hgrad = 1.3; hauto = 4; custom = on
    edg1: Edge on remaining entities

Studies
  std1 "Study"
    time: Transient "Time Dependent"
      tlist = range(0,0.0204081632653,1)
      mesh = {geom1, mesh1}
      timeadaption = on
      adaptselection = domains 1

Solver configurations
  sol1 "Solution 1" (study std1)
    v1: Variables "Dependent Variables 1"
    t1: Time "Time-Dependent Solver 1" | tlist = range(0,0.010101010101,1)
      dDef: Direct
      fc1: FullyCoupled | linsolver = dDef; dtech = hnlin

Datasets
  dset1: Solution | solution = sol1
  gp1_ds1: Grid1D

Plots
  pg3: PlotGroup1D "Base Group"
    data = dset1
    xlabel = Coordinate
    ylabel = Concentration
    manualgrid = on
    xspacing = 0.1
    yspacing = 0.1
    axiscommonexp = off
    axisprecision = 1
    lngr1: LineGraph "neutral plot" on domains 1 | expr = n; descr = Neutral; typeintitle = off; legends = neutral
    lngr2: LineGraph "polimer plot" on domains 1
      expr = p
      descr = Polymer
      typeintitle = off
      unitintitle = off
      legends = polimer
    lngr3: LineGraph "monomer plot" on domains 1 | expr = 1-n-p; descr = monomer

Exports
  anim1: Animation | target = player; framesel = all; maxframes = 100